<?xml version="1.0" encoding="UTF-8"?>
<channelml xmlns="http://morphml.org/channelml/schema"
		   xmlns:xsi="http://www.w3.org/2001/XMLSchema-instance"
		   xmlns:meta="http://morphml.org/metadata/schema"
		   xsi:schemaLocation="http://morphml.org/channelml/schema  ../../Schemata/v1.5/Level2/ChannelML_v1.5.xsd"
		   units="Physiological Units">

    <meta:notes>ChannelML file describing a synaptic mechanism</meta:notes>

    <synapse_type name="AMPA_GranGol">

    <meta:notes>AMPA synaptic mechanism from Granule cells to Golgi cells</meta:notes>

	<meta:authorList>
		<meta:modelAuthor>
			<meta:name>Maex, R.</meta:name>
		</meta:modelAuthor>
		<meta:modelAuthor>
			<meta:name>De Schutter, E.</meta:name>
		</meta:modelAuthor>
		<meta:modelTranslator>
			<meta:name>Padraig Gleeson</meta:name>
			<meta:institution>UCL</meta:institution>
			<meta:email>p.gleeson - at - ucl.ac.uk</meta:email>
		</meta:modelTranslator>
            </meta:authorList>

        <meta:neuronDBref>
        <meta:modelName>Receptor properties</meta:modelName>
            <meta:uri>http://senselab.med.yale.edu/senselab/NeuronDB/receptors2.asp</meta:uri>
        </meta:neuronDBref>

        <doub_exp_syn max_conductance="1.137355E-6" rise_time="0.03" decay_time="0.5" reversal_potential="0"/>

    </synapse_type>

</channelml>
