<?xml version="1.0" encoding="UTF-8"?>
<!--
    Example of a simple leak current specified in ChannelML.
    Taken from Michael Hines's initial proposal
-->

<channelml xmlns="http://morphml.org/channelml/schema" xmlns:xsi="http://www.w3.org/2001/XMLSchema-instance" xmlns:meta="http://morphml.org/metadata/schema" xsi:schemaLocation="http://morphml.org/channelml/schema     ../../Schemata/v1.3alpha/Level2/ChannelML_v1.3.xsd" units="Physiological Units">

    <meta:notes>ChannelML file containing a single Channel description</meta:notes>

            <!-- A suggestion for how to deal with a non specific current, in a similar way to dealing with other ions-->

    <ion name="non_specific" charge="1" default_erev="-65"/>          <!-- phys units: mV -->

    <channel_type name="GranPassiveCond" density="yes">

        <meta:notes>Simple leak conductance for Granule cell</meta:notes>

      <meta:publication>
        <meta:fullTitle>Maex, R and De Schutter, E.
          Synchronization of Golgi and Granule Cell Firing in a Detailed Network Model of the
          cerebellar Granule Cell Layer. J Neurophysiol, Nov 1998; 80: 2521 - 2537</meta:fullTitle>
        <meta:pubmedRef>http://www.ncbi.nlm.nih.gov/entrez/query.fcgi?cmd=Retrieve&amp;db=PubMed&amp;list_uids=9819260&amp;dopt=Abstract</meta:pubmedRef>
        </meta:publication>

        <current_voltage_relation>
            <ohmic ion="non_specific">
                <conductance default_gmax="0.0330033"/>           <!-- phys units: mS/cm2-->

            </ohmic>
        </current_voltage_relation>

    </channel_type>

</channelml>
