<?xml version="1.0" encoding="UTF-8"?>
<neuroml xmlns="http://morphml.org/neuroml/schema" xmlns:meta="http://morphml.org/metadata/schema" xmlns:mml="http://morphml.org/morphml/schema" xmlns:bio="http://morphml.org/biophysics/schema" xmlns:cml="http://morphml.org/channelml/schema" xmlns:xsi="http://www.w3.org/2001/XMLSchema-instance" xsi:schemaLocation="http://morphml.org/neuroml/schema  NeuroML.xsd" lengthUnits="micron">
<meta:notes>This Level 2 NeuroML file (specification version 1.7.1) has been generated by neuroConstruct v1.0.7</meta:notes>
<cells>
    <cell name="BasketCell">
        <meta:notes>Basket cell from Santhakumar V, Aradi I, Soltesz I. Role of mossy fiber sprouting and mossy cell loss in hyperexcitability: a network model of the dentate gyrus incorporating cell types and axonal topography. J Neurophysiol. 2005</meta:notes>
        <mml:segments>
            <mml:segment id="0" name="soma" cable="0">
                <mml:proximal x="0.0" y="0.0" z="0.0" diameter="15.0"/>
                    <mml:distal x="0.0" y="20.0" z="0.0" diameter="15.0"/>
                </mml:segment>
            <mml:segment id="1" name="bcdend1_0_seg" parent="0" cable="1">
                <mml:proximal x="0.0" y="20.0" z="0.0" diameter="4.0"/>
                    <mml:distal x="29.206377" y="89.079575" z="0.0" diameter="4.0"/>
                </mml:segment>
            <mml:segment id="2" name="bcdend1_1_seg" parent="1" cable="2">
                <mml:proximal x="29.206377" y="89.079575" z="0.0" diameter="3.0"/>
                    <mml:distal x="58.412754" y="158.15915" z="0.0" diameter="3.0"/>
                </mml:segment>
            <mml:segment id="3" name="bcdend1_2_seg" parent="2" cable="3">
                <mml:proximal x="58.412754" y="158.15915" z="0.0" diameter="2.0"/>
                    <mml:distal x="87.61913" y="227.23872" z="0.0" diameter="2.0"/>
                </mml:segment>
            <mml:segment id="4" name="bcdend1_3_seg" parent="3" cable="4">
                <mml:proximal x="87.61913" y="227.23872" z="0.0" diameter="1.0"/>
                    <mml:distal x="116.825516" y="296.3183" z="0.0" diameter="1.0"/>
                </mml:segment>
            <mml:segment id="5" name="bcdend2_0_seg" parent="0" cable="5">
                <mml:proximal x="0.0" y="20.0" z="0.0" diameter="4.0"/>
                    <mml:distal x="-29.206377" y="89.079575" z="0.0" diameter="4.0"/>
                </mml:segment>
            <mml:segment id="6" name="bcdend2_1_seg" parent="5" cable="6">
                <mml:proximal x="-29.206377" y="89.079575" z="0.0" diameter="3.0"/>
                    <mml:distal x="-58.412754" y="158.15915" z="0.0" diameter="3.0"/>
                </mml:segment>
            <mml:segment id="7" name="bcdend2_2_seg" parent="6" cable="7">
                <mml:proximal x="-58.412754" y="158.15915" z="0.0" diameter="2.0"/>
                    <mml:distal x="-87.61913" y="227.23872" z="0.0" diameter="2.0"/>
                </mml:segment>
            <mml:segment id="8" name="bcdend2_3_seg" parent="7" cable="8">
                <mml:proximal x="-87.61913" y="227.23872" z="0.0" diameter="1.0"/>
                    <mml:distal x="-116.825516" y="296.3183" z="0.0" diameter="1.0"/>
                </mml:segment>
            <mml:segment id="9" name="bcdend3_0_seg" parent="0" cable="9">
                <mml:proximal x="0.0" y="0.0" z="0.0" diameter="4.0"/>
                    <mml:distal x="-19.470915" y="-46.05305" z="0.0" diameter="4.0"/>
                </mml:segment>
            <mml:segment id="10" name="bcdend3_1_seg" parent="9" cable="10">
                <mml:proximal x="-19.470915" y="-46.05305" z="0.0" diameter="3.0"/>
                    <mml:distal x="-38.94183" y="-92.1061" z="0.0" diameter="3.0"/>
                </mml:segment>
            <mml:segment id="11" name="bcdend3_2_seg" parent="10" cable="11">
                <mml:proximal x="-38.94183" y="-92.1061" z="0.0" diameter="2.0"/>
                    <mml:distal x="-58.412743" y="-138.15915" z="0.0" diameter="2.0"/>
                </mml:segment>
            <mml:segment id="12" name="bcdend3_3_seg" parent="11" cable="12">
                <mml:proximal x="-58.412743" y="-138.15915" z="0.0" diameter="1.0"/>
                    <mml:distal x="-77.88365" y="-184.21219" z="0.0" diameter="1.0"/>
                </mml:segment>
            <mml:segment id="13" name="bcdend4_0_seg" parent="0" cable="13">
                <mml:proximal x="0.0" y="0.0" z="0.0" diameter="4.0"/>
                    <mml:distal x="19.470915" y="-46.05305" z="0.0" diameter="4.0"/>
                </mml:segment>
            <mml:segment id="14" name="bcdend4_1_seg" parent="13" cable="14">
                <mml:proximal x="19.470915" y="-46.05305" z="0.0" diameter="3.0"/>
                    <mml:distal x="38.94183" y="-92.1061" z="0.0" diameter="3.0"/>
                </mml:segment>
            <mml:segment id="15" name="bcdend4_2_seg" parent="14" cable="15">
                <mml:proximal x="38.94183" y="-92.1061" z="0.0" diameter="2.0"/>
                    <mml:distal x="58.412743" y="-138.15915" z="0.0" diameter="2.0"/>
                </mml:segment>
            <mml:segment id="16" name="bcdend4_3_seg" parent="15" cable="16">
                <mml:proximal x="58.412743" y="-138.15915" z="0.0" diameter="1.0"/>
                    <mml:distal x="77.88365" y="-184.21219" z="0.0" diameter="1.0"/>
                </mml:segment>
        </mml:segments>
        <mml:cables>
            <mml:cable id="0" name="soma">
                <meta:group>all</meta:group>
                <meta:group>soma_group</meta:group>
            </mml:cable>
            <mml:cable id="1" name="bcdend1_0">
                <meta:group>all</meta:group>
                <meta:group>dendrite_group</meta:group>
                <meta:group>adend</meta:group>
            </mml:cable>
            <mml:cable id="2" name="bcdend1_1">
                <meta:group>all</meta:group>
                <meta:group>dendrite_group</meta:group>
                <meta:group>bdend</meta:group>
                <meta:group>bdend_apical</meta:group>
            </mml:cable>
            <mml:cable id="3" name="bcdend1_2">
                <meta:group>all</meta:group>
                <meta:group>dendrite_group</meta:group>
                <meta:group>cdend</meta:group>
            </mml:cable>
            <mml:cable id="4" name="bcdend1_3">
                <meta:group>all</meta:group>
                <meta:group>dendrite_group</meta:group>
                <meta:group>ddend</meta:group>
                <meta:group>ddend_apical</meta:group>
            </mml:cable>
            <mml:cable id="5" name="bcdend2_0">
                <meta:group>all</meta:group>
                <meta:group>dendrite_group</meta:group>
                <meta:group>adend</meta:group>
            </mml:cable>
            <mml:cable id="6" name="bcdend2_1">
                <meta:group>all</meta:group>
                <meta:group>dendrite_group</meta:group>
                <meta:group>bdend</meta:group>
                <meta:group>bdend_apical</meta:group>
            </mml:cable>
            <mml:cable id="7" name="bcdend2_2">
                <meta:group>all</meta:group>
                <meta:group>dendrite_group</meta:group>
                <meta:group>cdend</meta:group>
            </mml:cable>
            <mml:cable id="8" name="bcdend2_3">
                <meta:group>all</meta:group>
                <meta:group>dendrite_group</meta:group>
                <meta:group>ddend</meta:group>
                <meta:group>ddend_apical</meta:group>
            </mml:cable>
            <mml:cable id="9" name="bcdend3_0" fractAlongParent="0.0">
                <meta:group>all</meta:group>
                <meta:group>dendrite_group</meta:group>
                <meta:group>adend</meta:group>
            </mml:cable>
            <mml:cable id="10" name="bcdend3_1">
                <meta:group>all</meta:group>
                <meta:group>dendrite_group</meta:group>
                <meta:group>bdend</meta:group>
            </mml:cable>
            <mml:cable id="11" name="bcdend3_2">
                <meta:group>all</meta:group>
                <meta:group>dendrite_group</meta:group>
                <meta:group>cdend</meta:group>
            </mml:cable>
            <mml:cable id="12" name="bcdend3_3">
                <meta:group>all</meta:group>
                <meta:group>dendrite_group</meta:group>
                <meta:group>ddend</meta:group>
            </mml:cable>
            <mml:cable id="13" name="bcdend4_0" fractAlongParent="0.0">
                <meta:group>all</meta:group>
                <meta:group>dendrite_group</meta:group>
                <meta:group>adend</meta:group>
            </mml:cable>
            <mml:cable id="14" name="bcdend4_1">
                <meta:group>all</meta:group>
                <meta:group>dendrite_group</meta:group>
                <meta:group>bdend</meta:group>
            </mml:cable>
            <mml:cable id="15" name="bcdend4_2">
                <meta:group>all</meta:group>
                <meta:group>dendrite_group</meta:group>
                <meta:group>cdend</meta:group>
            </mml:cable>
            <mml:cable id="16" name="bcdend4_3">
                <meta:group>all</meta:group>
                <meta:group>dendrite_group</meta:group>
                <meta:group>ddend</meta:group>
            </mml:cable>
        </mml:cables>
        <!--Adding the biophysical parameters-->
        <biophysics units="Physiological Units">
            <bio:mechanism name="BasketLeakCond" type="Channel Mechanism">
                <bio:parameter name="gmax" value="0.18">
                    <bio:group>all</bio:group>
                </bio:parameter>
            </bio:mechanism>
            <bio:mechanism name="Nat_CML" type="Channel Mechanism">
                <bio:parameter name="gmax" value="0.0">
                    <bio:group>ddend</bio:group>
                    <bio:group>bdend</bio:group>
                    <bio:group>cdend</bio:group>
                </bio:parameter>
            </bio:mechanism>
            <bio:mechanism name="Kf_CML" type="Channel Mechanism">
                <bio:parameter name="gmax" value="13.0">
                    <bio:group>adend</bio:group>
                    <bio:group>soma_group</bio:group>
                </bio:parameter>
            </bio:mechanism>
            <bio:mechanism name="Kf_CML" type="Channel Mechanism">
                <bio:parameter name="gmax" value="0.0">
                    <bio:group>bdend</bio:group>
                    <bio:group>ddend</bio:group>
                    <bio:group>cdend</bio:group>
                </bio:parameter>
            </bio:mechanism>
            <bio:mechanism name="ccanl" type="Channel Mechanism">
                <bio:parameter name="gmax" value="100000.0">
                    <bio:group>all</bio:group>
                </bio:parameter>
            </bio:mechanism>
            <bio:mechanism name="borgka" type="Channel Mechanism">
                <bio:parameter name="gmax" value="0.15">
                    <bio:group>all</bio:group>
                </bio:parameter>
            </bio:mechanism>
            <bio:mechanism name="cagk" type="Channel Mechanism">
                <bio:parameter name="gmax" value="0.2">
                    <bio:group>all</bio:group>
                </bio:parameter>
            </bio:mechanism>
            <bio:mechanism name="Nat_CML" type="Channel Mechanism">
                <bio:parameter name="gmax" value="120.0">
                    <bio:group>adend</bio:group>
                    <bio:group>soma_group</bio:group>
                </bio:parameter>
            </bio:mechanism>
            <bio:mechanism name="gskch" type="Channel Mechanism">
                <bio:parameter name="gmax" value="0.0020">
                    <bio:group>all</bio:group>
                </bio:parameter>
            </bio:mechanism>
            <bio:mechanism name="lca" type="Channel Mechanism">
                <bio:parameter name="gmax" value="5.0">
                    <bio:group>all</bio:group>
                </bio:parameter>
            </bio:mechanism>
            <bio:mechanism name="NCa_CML" type="Channel Mechanism">
                <bio:parameter name="gmax" value="0.8">
                    <bio:group>all</bio:group>
                </bio:parameter>
            </bio:mechanism>
            <bio:specificCapacitance>
                <bio:parameter value="1.4">
                    <bio:group>all</bio:group>
                </bio:parameter>
            </bio:specificCapacitance>
            <bio:specificAxialResistance>
                <bio:parameter value="0.1">
                    <bio:group>all</bio:group>
                </bio:parameter>
            </bio:specificAxialResistance>
            <bio:initialMembPotential>
                <bio:parameter value="-70.0">
                    <bio:group>all</bio:group>
                </bio:parameter>
            </bio:initialMembPotential>
        </biophysics>
    </cell>
</cells></neuroml>
