<?xml version="1.0" encoding="UTF-8"?>
<neuroml xmlns="http://morphml.org/neuroml/schema" xmlns:meta="http://morphml.org/metadata/schema" xmlns:mml="http://morphml.org/morphml/schema" xmlns:bio="http://morphml.org/biophysics/schema" xmlns:cml="http://morphml.org/channelml/schema" xmlns:xsi="http://www.w3.org/2001/XMLSchema-instance" xsi:schemaLocation="http://morphml.org/neuroml/schema  NeuroML.xsd" lengthUnits="micron">
<meta:notes>This Level 2 NeuroML file (specification version 1.7.1) has been generated by neuroConstruct v1.0.7</meta:notes>
<cells>
    <cell name="GranuleCell">
        <meta:notes>Granule cell from Santhakumar V, Aradi I, Soltesz I. Role of mossy fiber sprouting and mossy cell loss in hyperexcitability: a network model of the dentate gyrus incorporating cell types and axonal topography. J Neurophysiol. 2005</meta:notes>
        <mml:segments>
            <mml:segment id="0" name="soma" cable="0">
                <mml:proximal x="0.0" y="0.0" z="0.0" diameter="16.8"/>
                    <mml:distal x="0.0" y="16.8" z="0.0" diameter="16.8"/>
                </mml:segment>
            <mml:segment id="1" name="gcdend1_0_seg" parent="0" cable="1">
                <mml:proximal x="0.0" y="16.8" z="0.0" diameter="3.0"/>
                    <mml:distal x="19.470917" y="62.85305" z="0.0" diameter="3.0"/>
                </mml:segment>
            <mml:segment id="2" name="gcdend1_1_seg" parent="1" cable="2">
                <mml:proximal x="19.470917" y="62.85305" z="0.0" diameter="3.0"/>
                    <mml:distal x="77.88367" y="201.0122" z="0.0" diameter="3.0"/>
                </mml:segment>
            <mml:segment id="3" name="gcdend1_2_seg" parent="2" cable="3">
                <mml:proximal x="77.88367" y="201.0122" z="0.0" diameter="3.0"/>
                    <mml:distal x="136.29642" y="339.17136" z="0.0" diameter="3.0"/>
                </mml:segment>
            <mml:segment id="4" name="gcdend1_3_seg" parent="3" cable="4">
                <mml:proximal x="136.29642" y="339.17136" z="0.0" diameter="3.0"/>
                    <mml:distal x="194.70917" y="477.3305" z="0.0" diameter="3.0"/>
                </mml:segment>
            <mml:segment id="5" name="gcdend2_0_seg" parent="0" cable="5">
                <mml:proximal x="0.0" y="16.8" z="0.0" diameter="3.0"/>
                    <mml:distal x="-19.470917" y="62.85305" z="0.0" diameter="3.0"/>
                </mml:segment>
            <mml:segment id="6" name="gcdend2_1_seg" parent="5" cable="6">
                <mml:proximal x="-19.470917" y="62.85305" z="0.0" diameter="3.0"/>
                    <mml:distal x="-77.88367" y="201.0122" z="0.0" diameter="3.0"/>
                </mml:segment>
            <mml:segment id="7" name="gcdend2_2_seg" parent="6" cable="7">
                <mml:proximal x="-77.88367" y="201.0122" z="0.0" diameter="3.0"/>
                    <mml:distal x="-136.29642" y="339.17136" z="0.0" diameter="3.0"/>
                </mml:segment>
            <mml:segment id="8" name="gcdend2_3_seg" parent="7" cable="8">
                <mml:proximal x="-136.29642" y="339.17136" z="0.0" diameter="3.0"/>
                    <mml:distal x="-194.70917" y="477.3305" z="0.0" diameter="3.0"/>
                </mml:segment>
        </mml:segments>
        <mml:cables>
            <mml:cable id="0" name="soma">
                <meta:group>all</meta:group>
                <meta:group>soma_group</meta:group>
            </mml:cable>
            <mml:cable id="1" name="gcdend1_0">
                <meta:group>all</meta:group>
                <meta:group>dendrite_group</meta:group>
                <meta:group>gcldend</meta:group>
            </mml:cable>
            <mml:cable id="2" name="gcdend1_1">
                <meta:group>all</meta:group>
                <meta:group>dendrite_group</meta:group>
                <meta:group>pdend</meta:group>
            </mml:cable>
            <mml:cable id="3" name="gcdend1_2">
                <meta:group>all</meta:group>
                <meta:group>dendrite_group</meta:group>
                <meta:group>mdend</meta:group>
            </mml:cable>
            <mml:cable id="4" name="gcdend1_3">
                <meta:group>all</meta:group>
                <meta:group>dendrite_group</meta:group>
                <meta:group>ddend</meta:group>
            </mml:cable>
            <mml:cable id="5" name="gcdend2_0">
                <meta:group>all</meta:group>
                <meta:group>dendrite_group</meta:group>
                <meta:group>gcldend</meta:group>
            </mml:cable>
            <mml:cable id="6" name="gcdend2_1">
                <meta:group>all</meta:group>
                <meta:group>dendrite_group</meta:group>
                <meta:group>pdend</meta:group>
            </mml:cable>
            <mml:cable id="7" name="gcdend2_2">
                <meta:group>all</meta:group>
                <meta:group>dendrite_group</meta:group>
                <meta:group>mdend</meta:group>
            </mml:cable>
            <mml:cable id="8" name="gcdend2_3">
                <meta:group>all</meta:group>
                <meta:group>dendrite_group</meta:group>
                <meta:group>ddend</meta:group>
            </mml:cable>
        </mml:cables>
        <!--Adding the biophysical parameters-->
        <biophysics units="Physiological Units">
            <bio:mechanism name="tca" type="Channel Mechanism">
                <bio:parameter name="gmax" value="0.075">
                    <bio:group>gcldend</bio:group>
                </bio:parameter>
            </bio:mechanism>
            <bio:mechanism name="borgka" type="Channel Mechanism">
                <bio:parameter name="gmax" value="12.0">
                    <bio:group>soma_group</bio:group>
                </bio:parameter>
            </bio:mechanism>
            <bio:mechanism name="lca" type="Channel Mechanism">
                <bio:parameter name="gmax" value="0.5">
                    <bio:group>mdend</bio:group>
                </bio:parameter>
            </bio:mechanism>
            <bio:mechanism name="gskch" type="Channel Mechanism">
                <bio:parameter name="gmax" value="0.4">
                    <bio:group>gcldend</bio:group>
                </bio:parameter>
            </bio:mechanism>
            <bio:mechanism name="gskch" type="Channel Mechanism">
                <bio:parameter name="gmax" value="0.0">
                    <bio:group>mdend</bio:group>
                    <bio:group>ddend</bio:group>
                </bio:parameter>
            </bio:mechanism>
            <bio:mechanism name="tca" type="Channel Mechanism">
                <bio:parameter name="gmax" value="0.5">
                    <bio:group>mdend</bio:group>
                </bio:parameter>
            </bio:mechanism>
            <bio:mechanism name="tca" type="Channel Mechanism">
                <bio:parameter name="gmax" value="0.037">
                    <bio:group>soma_group</bio:group>
                </bio:parameter>
            </bio:mechanism>
            <bio:mechanism name="tca" type="Channel Mechanism">
                <bio:parameter name="gmax" value="0.25">
                    <bio:group>pdend</bio:group>
                </bio:parameter>
            </bio:mechanism>
            <bio:mechanism name="Ks_CML" type="Channel Mechanism">
                <bio:parameter name="gmax" value="6.0">
                    <bio:group>mdend</bio:group>
                    <bio:group>gcldend</bio:group>
                    <bio:group>soma_group</bio:group>
                    <bio:group>pdend</bio:group>
                </bio:parameter>
            </bio:mechanism>
            <bio:mechanism name="NCa_CML" type="Channel Mechanism">
                <bio:parameter name="gmax" value="3.0">
                    <bio:group>gcldend</bio:group>
                </bio:parameter>
            </bio:mechanism>
            <bio:mechanism name="GranLeakCond" type="Channel Mechanism">
                <bio:parameter name="gmax" value="0.063">
                    <bio:group>pdend</bio:group>
                    <bio:group>mdend</bio:group>
                    <bio:group>ddend</bio:group>
                </bio:parameter>
            </bio:mechanism>
            <bio:mechanism name="Kf_CML" type="Channel Mechanism">
                <bio:parameter name="gmax" value="1.0">
                    <bio:group>ddend</bio:group>
                    <bio:group>mdend</bio:group>
                </bio:parameter>
            </bio:mechanism>
            <bio:mechanism name="Nat_CML" type="Channel Mechanism">
                <bio:parameter name="gmax" value="18.0">
                    <bio:group>gcldend</bio:group>
                </bio:parameter>
            </bio:mechanism>
            <bio:mechanism name="Nat_CML" type="Channel Mechanism">
                <bio:parameter name="gmax" value="8.0">
                    <bio:group>mdend</bio:group>
                </bio:parameter>
            </bio:mechanism>
            <bio:mechanism name="Nat_CML" type="Channel Mechanism">
                <bio:parameter name="gmax" value="0.0">
                    <bio:group>ddend</bio:group>
                </bio:parameter>
            </bio:mechanism>
            <bio:mechanism name="NCa_CML" type="Channel Mechanism">
                <bio:parameter name="gmax" value="2.0">
                    <bio:group>soma_group</bio:group>
                </bio:parameter>
            </bio:mechanism>
            <bio:mechanism name="Kf_CML" type="Channel Mechanism">
                <bio:parameter name="gmax" value="4.0">
                    <bio:group>pdend</bio:group>
                    <bio:group>gcldend</bio:group>
                </bio:parameter>
            </bio:mechanism>
            <bio:mechanism name="Ks_CML" type="Channel Mechanism">
                <bio:parameter name="gmax" value="8.0">
                    <bio:group>ddend</bio:group>
                </bio:parameter>
            </bio:mechanism>
            <bio:mechanism name="Nat_CML" type="Channel Mechanism">
                <bio:parameter name="gmax" value="13.0">
                    <bio:group>pdend</bio:group>
                </bio:parameter>
            </bio:mechanism>
            <bio:mechanism name="cagk" type="Channel Mechanism">
                <bio:parameter name="gmax" value="2.4">
                    <bio:group>mdend</bio:group>
                    <bio:group>ddend</bio:group>
                </bio:parameter>
            </bio:mechanism>
            <bio:mechanism name="cagk" type="Channel Mechanism">
                <bio:parameter name="gmax" value="1.0">
                    <bio:group>pdend</bio:group>
                </bio:parameter>
            </bio:mechanism>
            <bio:mechanism name="NCa_CML" type="Channel Mechanism">
                <bio:parameter name="gmax" value="1.0">
                    <bio:group>mdend</bio:group>
                    <bio:group>pdend</bio:group>
                    <bio:group>ddend</bio:group>
                </bio:parameter>
            </bio:mechanism>
            <bio:mechanism name="GranLeakCond" type="Channel Mechanism">
                <bio:parameter name="gmax" value="0.04">
                    <bio:group>soma_group</bio:group>
                    <bio:group>gcldend</bio:group>
                </bio:parameter>
            </bio:mechanism>
            <bio:mechanism name="Nat_CML" type="Channel Mechanism">
                <bio:parameter name="gmax" value="120.0">
                    <bio:group>soma_group</bio:group>
                </bio:parameter>
            </bio:mechanism>
            <bio:mechanism name="lca" type="Channel Mechanism">
                <bio:parameter name="gmax" value="7.5">
                    <bio:group>pdend</bio:group>
                    <bio:group>gcldend</bio:group>
                </bio:parameter>
            </bio:mechanism>
            <bio:mechanism name="gskch" type="Channel Mechanism">
                <bio:parameter name="gmax" value="0.2">
                    <bio:group>pdend</bio:group>
                </bio:parameter>
            </bio:mechanism>
            <bio:mechanism name="gskch" type="Channel Mechanism">
                <bio:parameter name="gmax" value="1.0">
                    <bio:group>soma_group</bio:group>
                </bio:parameter>
            </bio:mechanism>
            <bio:mechanism name="cagk" type="Channel Mechanism">
                <bio:parameter name="gmax" value="0.6">
                    <bio:group>soma_group</bio:group>
                    <bio:group>gcldend</bio:group>
                </bio:parameter>
            </bio:mechanism>
            <bio:mechanism name="Kf_CML" type="Channel Mechanism">
                <bio:parameter name="gmax" value="16.0">
                    <bio:group>soma_group</bio:group>
                </bio:parameter>
            </bio:mechanism>
            <bio:mechanism name="lca" type="Channel Mechanism">
                <bio:parameter name="gmax" value="5.0">
                    <bio:group>soma_group</bio:group>
                </bio:parameter>
            </bio:mechanism>
            <bio:mechanism name="ccanl" type="Channel Mechanism">
                <bio:parameter name="gmax" value="100000.0">
                    <bio:group>all</bio:group>
                </bio:parameter>
            </bio:mechanism>
            <bio:mechanism name="tca" type="Channel Mechanism">
                <bio:parameter name="gmax" value="1.0">
                    <bio:group>ddend</bio:group>
                </bio:parameter>
            </bio:mechanism>
            <bio:mechanism name="lca" type="Channel Mechanism">
                <bio:parameter name="gmax" value="0.0">
                    <bio:group>ddend</bio:group>
                </bio:parameter>
            </bio:mechanism>
            <bio:specificCapacitance>
                <bio:parameter value="1.0">
                    <bio:group>soma_group</bio:group>
                    <bio:group>gcldend</bio:group>
                </bio:parameter>
                <bio:parameter value="1.6">
                    <bio:group>pdend</bio:group>
                    <bio:group>mdend</bio:group>
                    <bio:group>ddend</bio:group>
                </bio:parameter>
            </bio:specificCapacitance>
            <bio:specificAxialResistance>
                <bio:parameter value="0.21">
                    <bio:group>all</bio:group>
                </bio:parameter>
            </bio:specificAxialResistance>
            <bio:initialMembPotential>
                <bio:parameter value="-70.0">
                    <bio:group>all</bio:group>
                </bio:parameter>
            </bio:initialMembPotential>
        </biophysics>
    </cell>
</cells></neuroml>
