<?xml version="1.0" encoding="UTF-8"?>
<neuroml xmlns="http://morphml.org/neuroml/schema" xmlns:meta="http://morphml.org/metadata/schema" xmlns:mml="http://morphml.org/morphml/schema" xmlns:bio="http://morphml.org/biophysics/schema" xmlns:cml="http://morphml.org/channelml/schema" xmlns:xsi="http://www.w3.org/2001/XMLSchema-instance" xsi:schemaLocation="http://morphml.org/neuroml/schema  NeuroML.xsd" lengthUnits="micron">
<meta:notes>This Level 2 NeuroML file (specification version 1.7.1) has been generated by neuroConstruct v1.0.7</meta:notes>
<cells>
    <cell name="PerforantPath">
        <meta:notes>Simple cell used to simulate perforant path input to network </meta:notes>
        <mml:segments>
            <mml:segment id="0" name="Soma" cable="0">
                <mml:proximal x="0.0" y="0.0" z="0.0" diameter="10.0"/>
                    <mml:distal x="10.0" y="0.0" z="0.0" diameter="10.0"/>
                </mml:segment>
            <mml:segment id="1" name="perfpath" parent="0" cable="1">
                <mml:proximal x="0.0" y="0.0" z="0.0" diameter="2.0"/>
                    <mml:distal x="0.0" y="0.0" z="100.0" diameter="2.0"/>
                </mml:segment>
            <mml:segment id="2" name="perfpath2" parent="0" cable="2">
                <mml:proximal x="0.0" y="0.0" z="0.0" diameter="2.0"/>
                    <mml:distal x="0.0" y="0.0" z="-100.0" diameter="2.0"/>
                </mml:segment>
        </mml:segments>
        <mml:cables>
            <mml:cable id="0" name="Soma">
                <meta:group>all</meta:group>
                <meta:group>soma_group</meta:group>
            </mml:cable>
            <mml:cable id="1" name="perfpath" fractAlongParent="0.0">
                <meta:group>all</meta:group>
                <meta:group>axon_group</meta:group>
                <meta:group>SynLoc</meta:group>
            </mml:cable>
            <mml:cable id="2" name="perfpath2" fractAlongParent="0.0">
                <meta:group>all</meta:group>
                <meta:group>SynLoc</meta:group>
                <meta:group>axon_group</meta:group>
            </mml:cable>
        </mml:cables>
        <!--Adding the biophysical parameters-->
        <biophysics units="Physiological Units">
            <bio:mechanism name="PPLeakCond" type="Channel Mechanism">
                <bio:parameter name="gmax" value="0.1">
                    <bio:group>all</bio:group>
                </bio:parameter>
            </bio:mechanism>
            <bio:specificCapacitance>
                <bio:parameter value="0.1">
                    <bio:group>all</bio:group>
                </bio:parameter>
            </bio:specificCapacitance>
            <bio:specificAxialResistance>
                <bio:parameter value="3.0E-4">
                    <bio:group>all</bio:group>
                </bio:parameter>
            </bio:specificAxialResistance>
            <bio:initialMembPotential>
                <bio:parameter value="-60.0">
                    <bio:group>all</bio:group>
                </bio:parameter>
            </bio:initialMembPotential>
        </biophysics>
    </cell>
</cells></neuroml>
