<?xml version="1.0" encoding="UTF-8"?>
<neuroml xmlns="http://morphml.org/neuroml/schema" xmlns:meta="http://morphml.org/metadata/schema" xmlns:mml="http://morphml.org/morphml/schema" xmlns:bio="http://morphml.org/biophysics/schema" xmlns:cml="http://morphml.org/channelml/schema" xmlns:xsi="http://www.w3.org/2001/XMLSchema-instance" xsi:schemaLocation="http://morphml.org/neuroml/schema  NeuroML.xsd" lengthUnits="micron">
<meta:notes>This Level 2 NeuroML file (specification version 1.7.1) has been generated by neuroConstruct v1.0.7</meta:notes>
<cells>
    <cell name="SimpleOrig">
        <meta:notes>A single segment/compartment cell with the mod file based channels which are covered by the scope of ChannelML. This cell can be used for comparison with SimpleXML</meta:notes>
        <mml:segments>
            <mml:segment id="0" name="Soma" cable="0">
                <mml:proximal x="0.0" y="0.0" z="0.0" diameter="20.0"/>
                    <mml:distal x="0.0" y="0.0" z="0.0" diameter="20.0"/>
                </mml:segment>
        </mml:segments>
        <mml:cables>
            <mml:cable id="0" name="Soma">
                <meta:group>all</meta:group>
                <meta:group>soma_group</meta:group>
            </mml:cable>
        </mml:cables>
        <!--Adding the biophysical parameters-->
        <biophysics units="Physiological Units">
            <bio:mechanism name="borgka" type="Channel Mechanism">
                <bio:parameter name="gmax" value="12.0">
                    <bio:group>all</bio:group>
                </bio:parameter>
            </bio:mechanism>
            <bio:mechanism name="Nat" type="Channel Mechanism">
                <bio:parameter name="gmax" value="120.0">
                    <bio:group>all</bio:group>
                </bio:parameter>
            </bio:mechanism>
            <bio:mechanism name="GranLeakCond" type="Channel Mechanism">
                <bio:parameter name="gmax" value="0.04">
                    <bio:group>all</bio:group>
                </bio:parameter>
            </bio:mechanism>
            <bio:mechanism name="Ks" type="Channel Mechanism">
                <bio:parameter name="gmax" value="6.0">
                    <bio:group>all</bio:group>
                </bio:parameter>
            </bio:mechanism>
            <bio:mechanism name="nca" type="Channel Mechanism">
                <bio:parameter name="gmax" value="2.0">
                    <bio:group>all</bio:group>
                </bio:parameter>
            </bio:mechanism>
            <bio:mechanism name="Kf" type="Channel Mechanism">
                <bio:parameter name="gmax" value="16.0">
                    <bio:group>all</bio:group>
                </bio:parameter>
            </bio:mechanism>
            <bio:specificCapacitance>
                <bio:parameter value="1.0">
                    <bio:group>all</bio:group>
                </bio:parameter>
            </bio:specificCapacitance>
            <bio:specificAxialResistance>
                <bio:parameter value="0.03">
                    <bio:group>all</bio:group>
                </bio:parameter>
            </bio:specificAxialResistance>
            <bio:initialMembPotential>
                <bio:parameter value="-70.0">
                    <bio:group>all</bio:group>
                </bio:parameter>
            </bio:initialMembPotential>
        </biophysics>
    </cell>
</cells></neuroml>
