<?xml version="1.0" encoding="UTF-8"?>
<channelml xmlns="http://morphml.org/channelml/schema"
    xmlns:xsi="http://www.w3.org/2001/XMLSchema-instance"
    xmlns:meta="http://morphml.org/metadata/schema"
    xsi:schemaLocation="http://morphml.org/channelml/schema  ../../../../../NeuroMLValidator/web/NeuroMLFiles/Schemata/v1.6/Level2/ChannelML_v1.6.xsd"
    units="SI Units">

    <meta:notes>A channel from Maex, R and De Schutter, E. Synchronization of Golgi and Granule Cell Firing in a
    Detailed Network Model of the Cerebellar Granule Cell Layer</meta:notes>

    <ion name="k" default_erev="-0.09" charge="1" role="PermeatedSubstance">
        <meta:notes>The ion which actually flows through the channel</meta:notes>
    </ion>
	<ion name="ca" charge="2" role="ModulatingSubstance">
        <meta:notes>The channel's conductance of K is dependent on this ion's concentration</meta:notes>
    </ion>

    <channel_type name="Gran_KCa_98" density="yes">

        <status value="stable">
            <meta:issue>This ChannelML file is intended ONLY to replicate the original GENESIS functionality. A new Granule cell model is being developed based on
                D'Angelo et al 2001 and Berends, Maex and De Schutter 2005, and the ChannelML files will be updated</meta:issue>
            <meta:contributor>
                <meta:name>Padraig Gleeson</meta:name>
            </meta:contributor>
        </status>

        <meta:notes>Calcium dependent K channel</meta:notes>

        <meta:publication>
           <meta:fullTitle>Maex, R and De Schutter, E.
           Synchronization of Golgi and Granule Cell Firing in a Detailed Network Model of the
           cerebellar Granule Cell Layer. J Neurophysiol, Nov 1998; 80: 2521 - 2537</meta:fullTitle>
           <meta:pubmedRef>http://www.ncbi.nlm.nih.gov/entrez/query.fcgi?cmd=Retrieve&amp;db=PubMed&amp;list_uids=9819260&amp;dopt=Abstract</meta:pubmedRef>
        </meta:publication>

        <meta:neuronDBref>
            <meta:modelName>K channels</meta:modelName>
            <meta:uri>http://senselab.med.yale.edu/senselab/NeuronDB/channelGene2.htm#table3</meta:uri>
        </meta:neuronDBref>

        <current_voltage_relation>
            <ohmic ion="k">
                <conductance default_gmax="0.179811">
                    <rate_adjustments>
                        <q10_settings q10_factor="3" experimental_temp="17.350264793"/>
                        <offset value="0.010"/>
                    </rate_adjustments>
                    <gate power="1">
                        <state name="m" fraction="1"/>
                    </gate>
                </conductance>
            </ohmic>
        </current_voltage_relation>

        <hh_gate state="m">
            <transition>
                <voltage_conc_gate>
                    <conc_dependence name="Calcium" ion="ca" variable_name="ca_conc" min_conc="7.55e-7" max_conc="0.050"/>
                    <alpha>
                        <generic_equation_hh expr="2500/(1 + ( (1.5e-3 *(exp (-85*v))) / ca_conc))"/>
                    </alpha>
                    <beta>
                        <generic_equation_hh expr="1500/(1 + (ca_conc / (1.5e-4 * (exp (-77*v)))))"/>
                    </beta>
                </voltage_conc_gate>
            </transition>
        </hh_gate>

    </channel_type>
</channelml>
