<?xml version="1.0" encoding="UTF-8"?>
<neuroml xmlns="http://morphml.org/neuroml/schema" xmlns:meta="http://morphml.org/metadata/schema" xmlns:mml="http://morphml.org/morphml/schema" xmlns:bio="http://morphml.org/biophysics/schema" xmlns:cml="http://morphml.org/channelml/schema" xmlns:xsi="http://www.w3.org/2001/XMLSchema-instance" xsi:schemaLocation="http://morphml.org/neuroml/schema  NeuroML.xsd" lengthUnits="micron">
    <!--This Level 2 NeuroML file (specification version 1.3) has been automatically generated by neuroConstruct-->
    <cells>
        <cell name="Basic">
            <meta:notes>An abstract cell to investigate the mappings of morphs to neuron genesis and electrotonic aspects</meta:notes>
            <mml:segments>
                <mml:segment id="0" name="Soma" cable="0">
                    <mml:proximal x="0.0" y="0.0" z="0.0" diameter="10.0"/>
                    <mml:distal x="10.0" y="0.0" z="0.0" diameter="10.0"/>
                </mml:segment>
                <mml:segment id="1" name="mainDend" parent="0" cable="1">
                    <mml:proximal x="10.0" y="0.0" z="0.0" diameter="8.0"/>
                    <mml:distal x="20.0" y="0.0" z="0.0" diameter="2.0"/>
                </mml:segment>
                <mml:segment id="3" name="subDend2" parent="1" cable="2">
                    <mml:proximal x="20.0" y="0.0" z="0.0" diameter="2.0"/>
                    <mml:distal x="40.0" y="-10.0" z="0.0" diameter="2.0"/>
                </mml:segment>
                <mml:segment id="4" name="subDend3" parent="1" cable="3">
                    <mml:proximal x="20.0" y="0.0" z="0.0" diameter="2.0"/>
                    <mml:distal x="40.0" y="10.0" z="0.0" diameter="2.0"/>
                </mml:segment>
                <mml:segment id="5" name="Segment_4" parent="3" cable="4">
                    <mml:proximal x="40.0" y="-10.0" z="0.0" diameter="2.0"/>
                    <mml:distal x="60.0" y="-10.0" z="0.0" diameter="2.0"/>
                </mml:segment>
                <mml:segment id="6" name="Segment_5" parent="4" cable="5">
                    <mml:proximal x="40.0" y="10.0" z="0.0" diameter="2.0"/>
                    <mml:distal x="60.0" y="10.0" z="0.0" diameter="2.0"/>
                </mml:segment>
                <mml:segment id="7" name="Segment_6" parent="6" cable="5">
                    <mml:distal x="80.0" y="20.0" z="0.0" diameter="6.0"/>
                </mml:segment>
                <mml:segment id="8" name="Segment_7" parent="7" cable="5">
                    <mml:distal x="100.0" y="10.0" z="0.0" diameter="2.0"/>
                </mml:segment>
                <mml:segment id="9" name="Segment_8" parent="8" cable="6">
                    <mml:proximal x="100.0" y="10.0" z="0.0" diameter="4.0"/>
                    <mml:distal x="100.0" y="20.0" z="0.0" diameter="4.0"/>
                </mml:segment>
            </mml:segments>
            <mml:cables>
                <mml:cable id="0" name="Soma">
                    <meta:group>all</meta:group>
                    <meta:group>soma_group</meta:group>
                </mml:cable>
                <mml:cable id="1" name="mainDendSec">
                    <meta:group>all</meta:group>
                    <meta:group>dendrite_group</meta:group>
                </mml:cable>
                <mml:cable id="2" name="subDendSec2">
                    <meta:group>all</meta:group>
                    <meta:group>dendrite_group</meta:group>
                </mml:cable>
                <mml:cable id="3" name="subDendSec3">
                    <meta:group>all</meta:group>
                    <meta:group>dendrite_group</meta:group>
                </mml:cable>
                <mml:cable id="4" name="Section_4">
                    <meta:group>all</meta:group>
                    <meta:group>dendrite_group</meta:group>
                </mml:cable>
                <mml:cable id="5" name="Section_5">
                    <meta:group>all</meta:group>
                    <meta:group>dendrite_group</meta:group>
                </mml:cable>
                <mml:cable id="6" name="Section_6">
                    <meta:group>all</meta:group>
                    <meta:group>dendrite_group</meta:group>
                </mml:cable>
            </mml:cables>
            <!--Adding the biophysical parameters-->
            <biophysics units="Physiological Units">
                <bio:mechanism name="LeakConductance" type="Channel Mechanism">
                    <bio:parameter name="gmax" value="0.3">
                        <bio:group>all</bio:group>
                    </bio:parameter>
                </bio:mechanism>
                <bio:specificCapacitance>
                    <bio:parameter value="1.0">
                        <bio:group>all</bio:group>
                    </bio:parameter>
                </bio:specificCapacitance>
                <bio:specificAxialResistance>
                    <bio:parameter value="3.0">
                        <bio:group>all</bio:group>
                    </bio:parameter>
                </bio:specificAxialResistance>
                <bio:initialMembPotential>
                    <bio:parameter value="-65.0">
                        <bio:group>all</bio:group>
                    </bio:parameter>
                </bio:initialMembPotential>
            </biophysics>
        </cell>
    </cells>
</neuroml>
