<?xml version="1.0" encoding="UTF-8"?>
<channelml xmlns="http://morphml.org/channelml/schema"
    xmlns:xsi="http://www.w3.org/2001/XMLSchema-instance"
    xmlns:meta="http://morphml.org/metadata/schema"
    xsi:schemaLocation="http://morphml.org/channelml/schema   ../../Schemata/v1.6/Level2/ChannelML_v1.6.xsd"
    units="SI Units">

    <ion name="ca" charge="2" role="SignallingSubstance">
        <meta:notes>Signifies that the ion is involved in a process which alters its concentration</meta:notes>
    </ion>

    <ion_concentration name="cad">

        <status value="in_progress">
            <meta:contributor>
                <meta:name>Padraig Gleeson</meta:name>
            </meta:contributor>
        </status>

        <meta:notes>An expontially decaying pool of calcium</meta:notes>

        <ion_species>ca</ion_species>

        <decaying_pool_model>
            <resting_conc>4e-5</resting_conc>
            <decay_constant>1e-4</decay_constant>

            <fixed_pool_info>
                <phi>0.259083466</phi>  <!-- Fixed factor, rate of change of conc is Ca current *density* times this...
                                             Units: mA-1 cm2-->
            </fixed_pool_info>

        </decaying_pool_model>

    </ion_concentration>
</channelml>
