<?xml version="1.0" encoding="UTF-8"?>
<!--

   $Revision: 151 $
   $LastChangedBy: pgleeson $
   $Date: 2008-10-07 14:13:37 +0100 (Tue, 07 Oct 2008) $
   $HeadURL: https://neuroml.svn.sourceforge.net/svnroot/neuroml/tempModels/neuroConstruct/Ex7_GranuleCell/cellMechanisms/Gran_KA_98/KA_Chan.xml $

-->

<channelml xmlns="http://morphml.org/channelml/schema" xmlns:xsi="http://www.w3.org/2001/XMLSchema-instance" xmlns:meta="http://morphml.org/metadata/schema" xsi:schemaLocation="http://morphml.org/channelml/schema  ../../../../../trunk/web/NeuroMLFiles/Schemata/v1.7.3/Level2/ChannelML_v1.7.3.xsd" units="Physiological Units">

    <meta:notes>A channel from Maex, R and De Schutter, E. Synchronization of Golgi and Granule Cell Firing in a
    Detailed Network Model of the Cerebellar Granule Cell Layer</meta:notes>

    <channel_type name="Kv1_CML">

        <status value="in_progress">

        </status>

        <meta:notes>v type Kv channel</meta:notes>

        <meta:authorList>
            <meta:modelTranslator>
                <meta:name>Padraig Gleeson</meta:name>
                <meta:institution>UCL</meta:institution>
                <meta:email>p.gleeson - at - ucl.ac.uk</meta:email>
            </meta:modelTranslator>
        </meta:authorList>

        <!--

        <meta:publication>
           <meta:fullTitle>Maex, R and De Schutter, E.
           Synchronization of Golgi and Granule Cell Firing in a Detailed Network Model of the
           cerebellar Granule Cell Layer. J Neurophysiol, Nov 1998; 80: 2521 - 2537</meta:fullTitle>
           <meta:pubmedRef>http://www.ncbi.nlm.nih.gov/entrez/query.fcgi?cmd=Retrieve&amp;db=PubMed&amp;list_uids=9819260&amp;dopt=Abstract</meta:pubmedRef>
        </meta:publication>

        <meta:neuronDBref>
            <meta:modelName>K channels</meta:modelName>
            <meta:uri>http://senselab.med.yale.edu/senselab/NeuronDB/channelGene2.htm#table3</meta:uri>
        </meta:neuronDBref>

        -->

        <current_voltage_relation cond_law="ohmic" ion="k" default_gmax="1.14567" default_erev="-85">

            <q10_settings q10_factor="3" experimental_temp="23" scale_max_cond="true"/>

            <gate name="n" instances="4">

                <closed_state id="n0"/>
                <open_state id="n"/>

                <!--

                ca = 0.10 (1/ms) : 0.12889 as original
		cva = 50 (mV)
		cka = -33.90877 (mV)

		cb = 0.12889 (1/ms)
	    	cvb = 50 (mV)
		ckb = 7.42101 (mV)

		alphanfkt = ca * exp(-(v+cva)/cka)
		betanfkt = cb * exp(-(v+cvb)/ckb)

                alfa = A * exp((v-V1/2)/B)   (exponential)

                -->

                <transition name="alpha" from="n0" to="n" expr_form="exponential"
                            rate="33.90877" scale="0.10" midpoint="-100" />

                <transition name="beta" from="n" to="n0" expr_form="exponential"
                            rate="-7.42101" scale="-0.12889" midpoint="-100" />

            </gate>

        </current_voltage_relation>

    </channel_type>
</channelml>
