<?xml version="1.0" encoding="UTF-8"?>
<!--

   $Revision: 151 $
   $LastChangedBy: pgleeson $
   $Date: 2008-10-07 14:13:37 +0100 (Tue, 07 Oct 2008) $
   $HeadURL: https://neuroml.svn.sourceforge.net/svnroot/neuroml/tempModels/neuroConstruct/Ex7_GranuleCell/cellMechanisms/Gran_KA_98/KA_Chan.xml $

-->

<channelml xmlns="http://morphml.org/channelml/schema" xmlns:xsi="http://www.w3.org/2001/XMLSchema-instance" xmlns:meta="http://morphml.org/metadata/schema" xsi:schemaLocation="http://morphml.org/channelml/schema  ../../../../../trunk/web/NeuroMLFiles/Schemata/v1.7.3/Level2/ChannelML_v1.7.3.xsd" units="Physiological Units">

    <meta:notes>A channel from Maex, R and De Schutter, E. Synchronization of Golgi and Granule Cell Firing in a
    Detailed Network Model of the Cerebellar Granule Cell Layer</meta:notes>

    <channel_type name="Kv_CML">

        <status value="in_progress">

        </status>

        <meta:notes>v type Kv channel</meta:notes>

        <meta:authorList>
            <meta:modelTranslator>
                <meta:name>Padraig Gleeson</meta:name>
                <meta:institution>UCL</meta:institution>
                <meta:email>p.gleeson - at - ucl.ac.uk</meta:email>
            </meta:modelTranslator>
        </meta:authorList>

            <!--

        <meta:publication>
           <meta:fullTitle>Maex, R and De Schutter, E.
           Synchronization of Golgi and Granule Cell Firing in a Detailed Network Model of the
           cerebellar Granule Cell Layer. J Neurophysiol, Nov 1998; 80: 2521 - 2537</meta:fullTitle>
           <meta:pubmedRef>http://www.ncbi.nlm.nih.gov/entrez/query.fcgi?cmd=Retrieve&amp;db=PubMed&amp;list_uids=9819260&amp;dopt=Abstract</meta:pubmedRef>
        </meta:publication>

        <meta:neuronDBref>
            <meta:modelName>K channels</meta:modelName>
            <meta:uri>http://senselab.med.yale.edu/senselab/NeuronDB/channelGene2.htm#table3</meta:uri>
        </meta:neuronDBref>

        -->

        <current_voltage_relation cond_law="ohmic" ion="k" default_gmax="0.00114567" default_erev="-85">

            <q10_settings q10_factor="2.3" experimental_temp="23" scale_max_cond="true"/>

            <gate name="n" instances="1">

                <closed_state id="n0"/>
                <open_state id="n"/>

                    <!--

                tha  = 25	(mV)		: v 1/2 for inf
		qa   = 9	(mV)		: inf slope

		Ra   = 0.02	(/ms)		: max act rate
		Rb   = 0.002	(/ms)

		a = Ra * (v - tha) / (1 - exp(-(v - tha)/qa))
		b = -Rb * (v - tha) / (1 - exp((v - tha)/qa))

                a = (Ra*qa) * ((v - tha)/qa) / (1- exp(-(v - tha)/qa)
                b = (-Rb*-qa) * ((v - tha)/-qa) / (1- exp(-(v - tha)/-qa)

		alpha =  A * ((v-V1/2)/B)  / (1 - exp(-(v-V1/2)/B))  (exp_linear)

                -->

                <transition name="alpha" from="n0" to="n" expr_form="generic" expr="0.02 * (v - 25) / (1 - exp(-(v - 25)/9))"/>
                <!--expr_form="exp_linear" rate="0.18" scale="9" midpoint="50"/>/>-->

                <transition name="beta" from="n" to="n0" expr_form="generic" expr="-0.002 * (v - 25) / (1 - exp((v - 25)/9))"/>
                <!--expr_form="exp_linear" rate="0.018" scale="-9" midpoint="25"/>-->

            </gate>

        </current_voltage_relation>

        <impl_prefs>
			    <table_settings max_v="100" min_v="-120" table_divisions="199"/>
	</impl_prefs>

    </channel_type>
</channelml>
