<?xml version="1.0" encoding="UTF-8"?>
<channelml xmlns="http://morphml.org/channelml/schema" xmlns:xsi="http://www.w3.org/2001/XMLSchema-instance" xmlns:meta="http://morphml.org/metadata/schema" xsi:schemaLocation="http://morphml.org/channelml/schema  ../../Schemata/v1.7.1/Level2/ChannelML_v1.7.1.xsd" units="Physiological Units">

    <meta:notes>ChannelML file describing a plastic synaptic mechanism</meta:notes>

    <synapse_type name="STPSynapse">

        <status value="in_progress">
            <meta:comment>In development, structure subject to change!</meta:comment>
            <meta:contributor>
                <meta:name>Padraig Gleeson</meta:name>
            </meta:contributor>
        </status>

        <meta:notes>Example of a synaptic mechanism incorporating short term plasticity</meta:notes>

        <fac_dep_syn max_conductance="1.666667E-7" rise_time=".3" decay_time="3" reversal_potential="0">

             <plasticity init_release_prob="1.0" tau_fac="0" tau_rec="1e-08"/>

        </fac_dep_syn>

    </synapse_type>

</channelml>
