<?xml version="1.0" encoding="UTF-8"?>
<!--

   $Revision: 151 $
   $LastChangedBy: pgleeson $
   $Date: 2008-10-07 14:13:37 +0100 (Tue, 07 Oct 2008) $
   $HeadURL: https://neuroml.svn.sourceforge.net/svnroot/neuroml/tempModels/neuroConstruct/Ex7_GranuleCell/cellMechanisms/Gran_H_98/H_Chan.xml $

-->

<channelml xmlns="http://morphml.org/channelml/schema" xmlns:xsi="http://www.w3.org/2001/XMLSchema-instance" xmlns:meta="http://morphml.org/metadata/schema" xsi:schemaLocation="http://morphml.org/channelml/schema  ../../../../../trunk/web/NeuroMLFiles/Schemata/v1.7.3/Level2/ChannelML_v1.7.3.xsd" units="Physiological Units">

    <meta:notes>A channel from Maex, R and De Schutter, E. Synchronization of Golgi and Granule Cell Firing in a
    Detailed Network Model of the Cerebellar Granule Cell Layer</meta:notes>

    <channel_type name="ih_CML">

        <status value="in_progress">
            <meta:comment>Verified equivalence of NEURON and GENESIS mapping to orig GENESIS impl from www.tnb.ua.ac.be</meta:comment>
            <meta:comment>Updated to post v1.7.3 new ChannelML format</meta:comment>
            <meta:issue>A values don't match table 1 in M and DeS 98</meta:issue>
            <meta:contributor>
                <meta:name>Padraig Gleeson</meta:name>
            </meta:contributor>
        </status>

        <meta:notes>Anomalous inward rectifying H conductance</meta:notes>

	        <!--

	        <meta:publication>
	           <meta:fullTitle>Maex, R and De Schutter, E.
	           Synchronization of Golgi and Granule Cell Firing in a Detailed Network Model of the
	           cerebellar Granule Cell Layer. J Neurophysiol, Nov 1998; 80: 2521 - 2537</meta:fullTitle>
	           <meta:pubmedRef>http://www.ncbi.nlm.nih.gov/entrez/query.fcgi?cmd=Retrieve&amp;db=PubMed&amp;list_uids=9819260&amp;dopt=Abstract</meta:pubmedRef>
	        </meta:publication>

	        <meta:neuronDBref>
	            <meta:modelName>K channels</meta:modelName>
	            <meta:uri>http://senselab.med.yale.edu/senselab/NeuronDB/channelGene2.htm#table3</meta:uri>
	        </meta:neuronDBref>

        -->

        <current_voltage_relation cond_law="ohmic" ion="h" default_gmax="0.30905062" default_erev="-45">

            <!--
            alpha = 0.001*6.43*(v+154.9)/(exp((v+154.9)/11.9)-1)
            beta = 0.001*193*exp(v/33.1)

            alpha =  A * ((v-V1/2)/B)  / (1 - exp(-(v-V1/2)/B))  (exp_linear)
            beta = A * exp((v-V1/2)/B)   (exponential)
            -->

            <gate name="n" instances="1">
                <closed_state id="n0"/>
                <open_state id="n"/>

                <transition name="alpha" from="n0" to="n" expr_form="generic" expr="0.001*6.43*(v+154.9)/(exp((v+154.9)/11.9)-1)"/>
                <!--expr_form="exp_linear" rate="0.076517" scale="-11.9" midpoint="-154.9"/>-->
                <transition name="beta" from="n" to="n0" expr_form="generic" expr="0.001*193*exp(v/33.1)"/>
                <!--expr_form="exponential" rate="0.193" scale="33.1" midpoint="0"/>-->

            </gate>
        </current_voltage_relation>

    </channel_type>
</channelml>
