<?xml version="1.0" encoding="UTF-8"?>
<neuroml xmlns="http://morphml.org/neuroml/schema"
    xmlns:mml="http://morphml.org/morphml/schema"
    xmlns:meta="http://morphml.org/metadata/schema"
    xmlns:bio="http://morphml.org/biophysics/schema"
    xmlns:cml="http://morphml.org/channelml/schema"
    xmlns:xsi="http://www.w3.org/2001/XMLSchema-instance"
    xsi:schemaLocation="http://morphml.org/neuroml/schema NeuroML_Level2_v1.6.xsd"
    name = "NeuroML Level 2 file exported from NEURON"
    lengthUnits="micron">

<meta:notes>NeuroML Level 2 file generated by NEURON 6.1 ModelViewer
Authors: Michael Hines, Sushil Kambampati and Padraig Gleeson,
Yale University and UCL</meta:notes>

<cells>
  <cell name="soma">
    <meta:notes>Cell: soma exported from NEURON ModelView</meta:notes>
    <segments  xmlns="http://morphml.org/morphml/schema"> <!-- Changing namespace from neuroml to morphml-->
      <segment id="0" name = "Seg0_soma" cable = "0">
        <proximal x="-4.56673" y="-0.108046" z="0" diameter="5.58035"/>
        <distal x="-4.10841" y="1.72379" z="0" diameter="10.7661"/>
      </segment>
      <segment id="1" name = "Seg1_soma" parent="0" cable = "0">
        <distal x="-3.65008" y="3.55562" z="0" diameter="14.4629"/>
      </segment>
      <segment id="2" name = "Seg2_soma" parent="1" cable = "0">
        <distal x="-3.19176" y="5.38745" z="0" diameter="16.4616"/>
      </segment>
      <segment id="3" name = "Seg3_soma" parent="2" cable = "0">
        <distal x="-2.73344" y="7.21929" z="0" diameter="19.1307"/>
      </segment>
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    </segments>
    <cables  xmlns="http://morphml.org/morphml/schema"> <!-- Changing namespace from neuroml to morphml-->
      <cable id = "0" name = "soma" fractAlongParent = "0">
        <meta:properties>
          <meta:property>
            <meta:tag>numberInternalDivisions</meta:tag>
            <meta:value>8</meta:value>
          </meta:property>
        </meta:properties>
      </cable>
      <cable id = "45" name = "apic_0" fractAlongParent = "0.5"/>
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      <cablegroup name="all"> <!-- Replacing subset name ModelViewParmSubset_0 with all, as it contains all sections -->
        <cable id = "0"/>
        <cable id = "45"/>
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      </cablegroup>
      <cablegroup name="ModelViewParmSubset_1">
        <cable id = "0"/>
        <cable id = "45"/>
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      </cablegroup>
      <cablegroup name="ModelViewParmSubset_2">
        <cable id = "1"/>
        <cable id = "177"/>
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      </cablegroup>
      <cablegroup name="ModelViewParmSubset_3">
        <cable id = "132"/>
        <cable id = "147"/>
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      </cablegroup>
      <cablegroup name="ModelViewParmSubset_4">
        <cable id = "0"/>
        <cable id = "1"/>
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      </cablegroup>
      <cablegroup name="ModelViewParmSubset_5">
        <cable id = "45"/>
        <cable id = "44"/>
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      </cablegroup>
      <cablegroup name="ModelViewParmSubset_6">
        <cable id = "0"/>
        <cable id = "1"/>
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      </cablegroup>
      <cablegroup name="ModelViewParmSubset_7">
        <cable id = "177"/>
        <cable id = "192"/>
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      </cablegroup>
      <cablegroup name="ModelViewParmSubset_8">
        <cable id = "0"/>
        <cable id = "45"/>
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      </cablegroup>
      <cablegroup name="ModelViewParmSubset_9">
        <cable id = "1"/>
        <cable id = "132"/>
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      </cablegroup>
      <cablegroup name="ModelViewParmSubset_10">
        <cable id = "0"/>
        <cable id = "132"/>
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      </cablegroup>
      <cablegroup name="ModelViewParmSubset_11">
        <cable id = "45"/>
        <cable id = "44"/>
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      </cablegroup>
      <cablegroup name="OneSecGrp_SectionRef_1"> <!-- Creating a group containing a single section... -->
        <cable id = "0"/>
      </cablegroup>
      <cablegroup name="OneSecGrp_SectionRef_8"> <!-- Creating a group containing a single section... -->
        <cable id = "19"/>
      </cablegroup>
      <cablegroup name="OneSecGrp_SectionRef_7"> <!-- Creating a group containing a single section... -->
        <cable id = "22"/>
      </cablegroup>
      <cablegroup name="OneSecGrp_SectionRef_10"> <!-- Creating a group containing a single section... -->
        <cable id = "11"/>
      </cablegroup>
      <cablegroup name="OneSecGrp_SectionRef_9"> <!-- Creating a group containing a single section... -->
        <cable id = "16"/>
      </cablegroup>
      <cablegroup name="OneSecGrp_SectionRef_2"> <!-- Creating a group containing a single section... -->
        <cable id = "45"/>
      </cablegroup>
      <cablegroup name="OneSecGrp_SectionRef_4"> <!-- Creating a group containing a single section... -->
        <cable id = "37"/>
      </cablegroup>
      <cablegroup name="OneSecGrp_SectionRef_11"> <!-- Creating a group containing a single section... -->
        <cable id = "2"/>
      </cablegroup>
      <cablegroup name="OneSecGrp_SectionRef_13"> <!-- Creating a group containing a single section... -->
        <cable id = "49"/>
      </cablegroup>
      <cablegroup name="OneSecGrp_SectionRef_14"> <!-- Creating a group containing a single section... -->
        <cable id = "46"/>
      </cablegroup>
      <cablegroup name="OneSecGrp_SectionRef_24"> <!-- Creating a group containing a single section... -->
        <cable id = "20"/>
      </cablegroup>
      <cablegroup name="OneSecGrp_SectionRef_15"> <!-- Creating a group containing a single section... -->
        <cable id = "39"/>
      </cablegroup>
      <cablegroup name="OneSecGrp_SectionRef_32"> <!-- Creating a group containing a single section... -->
        <cable id = "53"/>
      </cablegroup>
      <cablegroup name="OneSecGrp_SectionRef_5"> <!-- Creating a group containing a single section... -->
        <cable id = "30"/>
      </cablegroup>
      <cablegroup name="OneSecGrp_SectionRef_23"> <!-- Creating a group containing a single section... -->
        <cable id = "21"/>
      </cablegroup>
      <cablegroup name="OneSecGrp_SectionRef_27"> <!-- Creating a group containing a single section... -->
        <cable id = "15"/>
      </cablegroup>
      <cablegroup name="OneSecGrp_SectionRef_35"> <!-- Creating a group containing a single section... -->
        <cable id = "47"/>
      </cablegroup>
      <cablegroup name="OneSecGrp_SectionRef_33"> <!-- Creating a group containing a single section... -->
        <cable id = "50"/>
      </cablegroup>
      <cablegroup name="OneSecGrp_SectionRef_37"> <!-- Creating a group containing a single section... -->
        <cable id = "40"/>
      </cablegroup>
      <cablegroup name="OneSecGrp_SectionRef_30"> <!-- Creating a group containing a single section... -->
        <cable id = "3"/>
      </cablegroup>
      <cablegroup name="OneSecGrp_SectionRef_29"> <!-- Creating a group containing a single section... -->
        <cable id = "8"/>
      </cablegroup>
      <cablegroup name="OneSecGrp_SectionRef_28"> <!-- Creating a group containing a single section... -->
        <cable id = "12"/>
      </cablegroup>
      <cablegroup name="OneSecGrp_SectionRef_49"> <!-- Creating a group containing a single section... -->
        <cable id = "55"/>
      </cablegroup>
      <cablegroup name="OneSecGrp_SectionRef_34"> <!-- Creating a group containing a single section... -->
        <cable id = "48"/>
      </cablegroup>
      <cablegroup name="OneSecGrp_SectionRef_21"> <!-- Creating a group containing a single section... -->
        <cable id = "24"/>
      </cablegroup>
      <cablegroup name="OneSecGrp_SectionRef_17"> <!-- Creating a group containing a single section... -->
        <cable id = "32"/>
      </cablegroup>
      <cablegroup name="OneSecGrp_SectionRef_54"> <!-- Creating a group containing a single section... -->
        <cable id = "41"/>
      </cablegroup>
      <cablegroup name="OneSecGrp_SectionRef_62"> <!-- Creating a group containing a single section... -->
        <cable id = "56"/>
      </cablegroup>
      <cablegroup name="OneSecGrp_SectionRef_26"> <!-- Creating a group containing a single section... -->
        <cable id = "17"/>
      </cablegroup>
      <cablegroup name="OneSecGrp_SectionRef_52"> <!-- Creating a group containing a single section... -->
        <cable id = "51"/>
      </cablegroup>
      <cablegroup name="OneSecGrp_SectionRef_47"> <!-- Creating a group containing a single section... -->
        <cable id = "4"/>
      </cablegroup>
      <cablegroup name="OneSecGrp_SectionRef_45"> <!-- Creating a group containing a single section... -->
        <cable id = "9"/>
      </cablegroup>
      <cablegroup name="OneSecGrp_SectionRef_61"> <!-- Creating a group containing a single section... -->
        <cable id = "63"/>
      </cablegroup>
      <cablegroup name="OneSecGrp_SectionRef_38"> <!-- Creating a group containing a single section... -->
        <cable id = "34"/>
      </cablegroup>
      <cablegroup name="OneSecGrp_SectionRef_50"> <!-- Creating a group containing a single section... -->
        <cable id = "54"/>
      </cablegroup>
      <cablegroup name="OneSecGrp_SectionRef_6"> <!-- Creating a group containing a single section... -->
        <cable id = "27"/>
      </cablegroup>
      <cablegroup name="OneSecGrp_SectionRef_3"> <!-- Creating a group containing a single section... -->
        <cable id = "44"/>
      </cablegroup>
      <cablegroup name="OneSecGrp_SectionRef_22"> <!-- Creating a group containing a single section... -->
        <cable id = "23"/>
      </cablegroup>
      <cablegroup name="OneSecGrp_SectionRef_39"> <!-- Creating a group containing a single section... -->
        <cable id = "33"/>
      </cablegroup>
      <cablegroup name="OneSecGrp_SectionRef_36"> <!-- Creating a group containing a single section... -->
        <cable id = "43"/>
      </cablegroup>
      <cablegroup name="OneSecGrp_SectionRef_18"> <!-- Creating a group containing a single section... -->
        <cable id = "31"/>
      </cablegroup>
      <cablegroup name="OneSecGrp_SectionRef_53"> <!-- Creating a group containing a single section... -->
        <cable id = "42"/>
      </cablegroup>
      <cablegroup name="OneSecGrp_SectionRef_16"> <!-- Creating a group containing a single section... -->
        <cable id = "38"/>
      </cablegroup>
      <cablegroup name="OneSecGrp_SectionRef_57"> <!-- Creating a group containing a single section... -->
        <cable id = "6"/>
      </cablegroup>
      <cablegroup name="OneSecGrp_SectionRef_44"> <!-- Creating a group containing a single section... -->
        <cable id = "10"/>
      </cablegroup>
      <cablegroup name="OneSecGrp_SectionRef_58"> <!-- Creating a group containing a single section... -->
        <cable id = "5"/>
      </cablegroup>
      <cablegroup name="OneSecGrp_SectionRef_41"> <!-- Creating a group containing a single section... -->
        <cable id = "25"/>
      </cablegroup>
      <cablegroup name="OneSecGrp_SectionRef_65"> <!-- Creating a group containing a single section... -->
        <cable id = "69"/>
      </cablegroup>
      <cablegroup name="OneSecGrp_SectionRef_67"> <!-- Creating a group containing a single section... -->
        <cable id = "58"/>
      </cablegroup>
      <cablegroup name="OneSecGrp_SectionRef_68"> <!-- Creating a group containing a single section... -->
        <cable id = "57"/>
      </cablegroup>
      <cablegroup name="OneSecGrp_SectionRef_56"> <!-- Creating a group containing a single section... -->
        <cable id = "35"/>
      </cablegroup>
      <cablegroup name="OneSecGrp_SectionRef_25"> <!-- Creating a group containing a single section... -->
        <cable id = "18"/>
      </cablegroup>
      <cablegroup name="OneSecGrp_SectionRef_66"> <!-- Creating a group containing a single section... -->
        <cable id = "64"/>
      </cablegroup>
      <cablegroup name="OneSecGrp_SectionRef_72"> <!-- Creating a group containing a single section... -->
        <cable id = "75"/>
      </cablegroup>
      <cablegroup name="OneSecGrp_SectionRef_46"> <!-- Creating a group containing a single section... -->
        <cable id = "7"/>
      </cablegroup>
      <cablegroup name="OneSecGrp_SectionRef_73"> <!-- Creating a group containing a single section... -->
        <cable id = "70"/>
      </cablegroup>
      <cablegroup name="OneSecGrp_SectionRef_43"> <!-- Creating a group containing a single section... -->
        <cable id = "13"/>
      </cablegroup>
      <cablegroup name="OneSecGrp_SectionRef_80"> <!-- Creating a group containing a single section... -->
        <cable id = "77"/>
      </cablegroup>
      <cablegroup name="OneSecGrp_SectionRef_82"> <!-- Creating a group containing a single section... -->
        <cable id = "72"/>
      </cablegroup>
      <cablegroup name="OneSecGrp_SectionRef_42"> <!-- Creating a group containing a single section... -->
        <cable id = "14"/>
      </cablegroup>
      <cablegroup name="OneSecGrp_SectionRef_76"> <!-- Creating a group containing a single section... -->
        <cable id = "60"/>
      </cablegroup>
      <cablegroup name="OneSecGrp_SectionRef_91"> <!-- Creating a group containing a single section... -->
        <cable id = "79"/>
      </cablegroup>
      <cablegroup name="OneSecGrp_SectionRef_74"> <!-- Creating a group containing a single section... -->
        <cable id = "66"/>
      </cablegroup>
      <cablegroup name="OneSecGrp_SectionRef_75"> <!-- Creating a group containing a single section... -->
        <cable id = "65"/>
      </cablegroup>
      <cablegroup name="OneSecGrp_SectionRef_55"> <!-- Creating a group containing a single section... -->
        <cable id = "36"/>
      </cablegroup>
      <cablegroup name="OneSecGrp_SectionRef_83"> <!-- Creating a group containing a single section... -->
        <cable id = "71"/>
      </cablegroup>
      <cablegroup name="OneSecGrp_SectionRef_77"> <!-- Creating a group containing a single section... -->
        <cable id = "59"/>
      </cablegroup>
      <cablegroup name="OneSecGrp_SectionRef_40"> <!-- Creating a group containing a single section... -->
        <cable id = "26"/>
      </cablegroup>
      <cablegroup name="OneSecGrp_SectionRef_20"> <!-- Creating a group containing a single section... -->
        <cable id = "28"/>
      </cablegroup>
      <cablegroup name="OneSecGrp_SectionRef_93"> <!-- Creating a group containing a single section... -->
        <cable id = "74"/>
      </cablegroup>
      <cablegroup name="OneSecGrp_SectionRef_98"> <!-- Creating a group containing a single section... -->
        <cable id = "81"/>
      </cablegroup>
      <cablegroup name="OneSecGrp_SectionRef_94"> <!-- Creating a group containing a single section... -->
        <cable id = "73"/>
      </cablegroup>
      <cablegroup name="OneSecGrp_SectionRef_51"> <!-- Creating a group containing a single section... -->
        <cable id = "52"/>
      </cablegroup>
      <cablegroup name="OneSecGrp_SectionRef_85"> <!-- Creating a group containing a single section... -->
        <cable id = "67"/>
      </cablegroup>
      <cablegroup name="OneSecGrp_SectionRef_87"> <!-- Creating a group containing a single section... -->
        <cable id = "61"/>
      </cablegroup>
      <cablegroup name="OneSecGrp_SectionRef_19"> <!-- Creating a group containing a single section... -->
        <cable id = "29"/>
      </cablegroup>
      <cablegroup name="OneSecGrp_SectionRef_84"> <!-- Creating a group containing a single section... -->
        <cable id = "68"/>
      </cablegroup>
      <cablegroup name="OneSecGrp_SectionRef_86"> <!-- Creating a group containing a single section... -->
        <cable id = "62"/>
      </cablegroup>
      <cablegroup name="OneSecGrp_SectionRef_102"> <!-- Creating a group containing a single section... -->
        <cable id = "85"/>
      </cablegroup>
      <cablegroup name="OneSecGrp_SectionRef_92"> <!-- Creating a group containing a single section... -->
        <cable id = "78"/>
      </cablegroup>
      <cablegroup name="OneSecGrp_SectionRef_106"> <!-- Creating a group containing a single section... -->
        <cable id = "87"/>
      </cablegroup>
      <cablegroup name="OneSecGrp_SectionRef_103"> <!-- Creating a group containing a single section... -->
        <cable id = "82"/>
      </cablegroup>
      <cablegroup name="OneSecGrp_SectionRef_81"> <!-- Creating a group containing a single section... -->
        <cable id = "76"/>
      </cablegroup>
      <cablegroup name="OneSecGrp_SectionRef_99"> <!-- Creating a group containing a single section... -->
        <cable id = "80"/>
      </cablegroup>
      <cablegroup name="OneSecGrp_SectionRef_107"> <!-- Creating a group containing a single section... -->
        <cable id = "86"/>
      </cablegroup>
      <cablegroup name="OneSecGrp_SectionRef_114"> <!-- Creating a group containing a single section... -->
        <cable id = "88"/>
      </cablegroup>
      <cablegroup name="OneSecGrp_SectionRef_108"> <!-- Creating a group containing a single section... -->
        <cable id = "84"/>
      </cablegroup>
      <cablegroup name="OneSecGrp_SectionRef_109"> <!-- Creating a group containing a single section... -->
        <cable id = "83"/>
      </cablegroup>
      <cablegroup name="OneSecGrp_SectionRef_113"> <!-- Creating a group containing a single section... -->
        <cable id = "89"/>
      </cablegroup>
      <cablegroup name="OneSecGrp_SectionRef_119"> <!-- Creating a group containing a single section... -->
        <cable id = "90"/>
      </cablegroup>
      <cablegroup name="OneSecGrp_SectionRef_118"> <!-- Creating a group containing a single section... -->
        <cable id = "113"/>
      </cablegroup>
      <cablegroup name="OneSecGrp_SectionRef_127"> <!-- Creating a group containing a single section... -->
        <cable id = "91"/>
      </cablegroup>
      <cablegroup name="OneSecGrp_SectionRef_126"> <!-- Creating a group containing a single section... -->
        <cable id = "108"/>
      </cablegroup>
      <cablegroup name="OneSecGrp_SectionRef_125"> <!-- Creating a group containing a single section... -->
        <cable id = "114"/>
      </cablegroup>
      <cablegroup name="OneSecGrp_SectionRef_124"> <!-- Creating a group containing a single section... -->
        <cable id = "121"/>
      </cablegroup>
      <cablegroup name="OneSecGrp_SectionRef_139"> <!-- Creating a group containing a single section... -->
        <cable id = "92"/>
      </cablegroup>
      <cablegroup name="OneSecGrp_SectionRef_138"> <!-- Creating a group containing a single section... -->
        <cable id = "103"/>
      </cablegroup>
      <cablegroup name="OneSecGrp_SectionRef_134"> <!-- Creating a group containing a single section... -->
        <cable id = "116"/>
      </cablegroup>
      <cablegroup name="OneSecGrp_SectionRef_136"> <!-- Creating a group containing a single section... -->
        <cable id = "110"/>
      </cablegroup>
      <cablegroup name="OneSecGrp_SectionRef_133"> <!-- Creating a group containing a single section... -->
        <cable id = "122"/>
      </cablegroup>
      <cablegroup name="OneSecGrp_SectionRef_144"> <!-- Creating a group containing a single section... -->
        <cable id = "126"/>
      </cablegroup>
      <cablegroup name="OneSecGrp_SectionRef_135"> <!-- Creating a group containing a single section... -->
        <cable id = "115"/>
      </cablegroup>
      <cablegroup name="OneSecGrp_SectionRef_146"> <!-- Creating a group containing a single section... -->
        <cable id = "120"/>
      </cablegroup>
      <cablegroup name="OneSecGrp_SectionRef_153"> <!-- Creating a group containing a single section... -->
        <cable id = "93"/>
      </cablegroup>
      <cablegroup name="OneSecGrp_SectionRef_147"> <!-- Creating a group containing a single section... -->
        <cable id = "117"/>
      </cablegroup>
      <cablegroup name="OneSecGrp_SectionRef_156"> <!-- Creating a group containing a single section... -->
        <cable id = "128"/>
      </cablegroup>
      <cablegroup name="OneSecGrp_SectionRef_145"> <!-- Creating a group containing a single section... -->
        <cable id = "123"/>
      </cablegroup>
      <cablegroup name="OneSecGrp_SectionRef_157"> <!-- Creating a group containing a single section... -->
        <cable id = "127"/>
      </cablegroup>
      <cablegroup name="OneSecGrp_SectionRef_152"> <!-- Creating a group containing a single section... -->
        <cable id = "98"/>
      </cablegroup>
      <cablegroup name="OneSecGrp_SectionRef_132"> <!-- Creating a group containing a single section... -->
        <cable id = "129"/>
      </cablegroup>
      <cablegroup name="OneSecGrp_SectionRef_161"> <!-- Creating a group containing a single section... -->
        <cable id = "118"/>
      </cablegroup>
      <cablegroup name="OneSecGrp_SectionRef_137"> <!-- Creating a group containing a single section... -->
        <cable id = "109"/>
      </cablegroup>
      <cablegroup name="OneSecGrp_SectionRef_149"> <!-- Creating a group containing a single section... -->
        <cable id = "111"/>
      </cablegroup>
      <cablegroup name="OneSecGrp_SectionRef_150"> <!-- Creating a group containing a single section... -->
        <cable id = "105"/>
      </cablegroup>
      <cablegroup name="OneSecGrp_SectionRef_160"> <!-- Creating a group containing a single section... -->
        <cable id = "119"/>
      </cablegroup>
      <cablegroup name="OneSecGrp_SectionRef_148"> <!-- Creating a group containing a single section... -->
        <cable id = "112"/>
      </cablegroup>
      <cablegroup name="OneSecGrp_SectionRef_166"> <!-- Creating a group containing a single section... -->
        <cable id = "95"/>
      </cablegroup>
      <cablegroup name="OneSecGrp_SectionRef_158"> <!-- Creating a group containing a single section... -->
        <cable id = "125"/>
      </cablegroup>
      <cablegroup name="OneSecGrp_SectionRef_159"> <!-- Creating a group containing a single section... -->
        <cable id = "124"/>
      </cablegroup>
      <cablegroup name="OneSecGrp_SectionRef_151"> <!-- Creating a group containing a single section... -->
        <cable id = "104"/>
      </cablegroup>
      <cablegroup name="OneSecGrp_SectionRef_164"> <!-- Creating a group containing a single section... -->
        <cable id = "100"/>
      </cablegroup>
      <cablegroup name="OneSecGrp_SectionRef_167"> <!-- Creating a group containing a single section... -->
        <cable id = "94"/>
      </cablegroup>
      <cablegroup name="OneSecGrp_SectionRef_163"> <!-- Creating a group containing a single section... -->
        <cable id = "106"/>
      </cablegroup>
      <cablegroup name="OneSecGrp_SectionRef_165"> <!-- Creating a group containing a single section... -->
        <cable id = "99"/>
      </cablegroup>
      <cablegroup name="OneSecGrp_SectionRef_162"> <!-- Creating a group containing a single section... -->
        <cable id = "107"/>
      </cablegroup>
      <cablegroup name="OneSecGrp_SectionRef_170"> <!-- Creating a group containing a single section... -->
        <cable id = "102"/>
      </cablegroup>
      <cablegroup name="OneSecGrp_SectionRef_171"> <!-- Creating a group containing a single section... -->
        <cable id = "101"/>
      </cablegroup>
      <cablegroup name="OneSecGrp_SectionRef_143"> <!-- Creating a group containing a single section... -->
        <cable id = "130"/>
      </cablegroup>
      <cablegroup name="OneSecGrp_SectionRef_142"> <!-- Creating a group containing a single section... -->
        <cable id = "131"/>
      </cablegroup>
      <cablegroup name="OneSecGrp_SectionRef_173"> <!-- Creating a group containing a single section... -->
        <cable id = "96"/>
      </cablegroup>
      <cablegroup name="OneSecGrp_SectionRef_172"> <!-- Creating a group containing a single section... -->
        <cable id = "97"/>
      </cablegroup>
      <cablegroup name="OneSecGrp_SectionRef_1"> <!-- Creating a group containing a single section... -->
        <cable id = "0"/>
      </cablegroup>
      <cablegroup name="OneSecGrp_SectionRef_1"> <!-- Creating a group containing a single section... -->
        <cable id = "0"/>
      </cablegroup>
    </cables>
    <biophysics  units = "Physiological Units"> <!-- Note: values of cond dens are different in NEURON and phy units-->
      <bio:mechanism name="pas" type="Channel Mechanism" passiveConductance="true">
        <bio:parameter name="gmax" value="0.0666667">
          <bio:group>ModelViewParmSubset_6</bio:group>
        </bio:parameter>
        <bio:parameter name="gmax" value="0.133333">
          <bio:group>ModelViewParmSubset_5</bio:group>
        </bio:parameter>
        <bio:parameter name="gmax" value="26.6667">
          <bio:group>ModelViewParmSubset_7</bio:group>
        </bio:parameter>
        <bio:parameter name="e" value="-88">
          <bio:group>ModelViewParmSubset_8</bio:group>
        </bio:parameter>
        <bio:parameter name="e" value="-75">
          <bio:group>ModelViewParmSubset_9</bio:group>
        </bio:parameter>
      </bio:mechanism>
      <bio:mechanism name="ih" type="Channel Mechanism">
        <bio:parameter name="ghdbar" value="0">
          <bio:group>ModelViewParmSubset_9</bio:group>
        </bio:parameter>
        <bio:parameter name="ghdbar" value="7.5e-05">
          <bio:group>OneSecGrp_SectionRef_1</bio:group>
        </bio:parameter>
        <bio:parameter name="ghdbar" value="0.000514535">
          <bio:group>OneSecGrp_SectionRef_8</bio:group>
        </bio:parameter>
        <bio:parameter name="ghdbar" value="0.000519119">
          <bio:group>OneSecGrp_SectionRef_7</bio:group>
        </bio:parameter>
        <bio:parameter name="ghdbar" value="0.000520469">
          <bio:group>OneSecGrp_SectionRef_10</bio:group>
        </bio:parameter>
        <bio:parameter name="ghdbar" value="0.000521784">
          <bio:group>OneSecGrp_SectionRef_9</bio:group>
        </bio:parameter>
        <bio:parameter name="ghdbar" value="0.000525755">
          <bio:group>OneSecGrp_SectionRef_2</bio:group>
        </bio:parameter>
        <bio:parameter name="ghdbar" value="0.000538064">
          <bio:group>OneSecGrp_SectionRef_4</bio:group>
        </bio:parameter>
        <bio:parameter name="ghdbar" value="0.000540867">
          <bio:group>OneSecGrp_SectionRef_11</bio:group>
        </bio:parameter>
        <bio:parameter name="ghdbar" value="0.000543451">
          <bio:group>OneSecGrp_SectionRef_13</bio:group>
        </bio:parameter>
        <bio:parameter name="ghdbar" value="0.000566852">
          <bio:group>OneSecGrp_SectionRef_14</bio:group>
        </bio:parameter>
        <bio:parameter name="ghdbar" value="0.000576617">
          <bio:group>OneSecGrp_SectionRef_24</bio:group>
        </bio:parameter>
        <bio:parameter name="ghdbar" value="0.000584646">
          <bio:group>OneSecGrp_SectionRef_15</bio:group>
        </bio:parameter>
        <bio:parameter name="ghdbar" value="0.000597756">
          <bio:group>OneSecGrp_SectionRef_32</bio:group>
        </bio:parameter>
        <bio:parameter name="ghdbar" value="0.0006199">
          <bio:group>OneSecGrp_SectionRef_5</bio:group>
        </bio:parameter>
        <bio:parameter name="ghdbar" value="0.00062176">
          <bio:group>OneSecGrp_SectionRef_23</bio:group>
        </bio:parameter>
        <bio:parameter name="ghdbar" value="0.000637009">
          <bio:group>OneSecGrp_SectionRef_27</bio:group>
        </bio:parameter>
        <bio:parameter name="ghdbar" value="0.00065571">
          <bio:group>OneSecGrp_SectionRef_35</bio:group>
        </bio:parameter>
        <bio:parameter name="ghdbar" value="0.000670052">
          <bio:group>OneSecGrp_SectionRef_33</bio:group>
        </bio:parameter>
        <bio:parameter name="ghdbar" value="0.000672233">
          <bio:group>OneSecGrp_SectionRef_37</bio:group>
        </bio:parameter>
        <bio:parameter name="ghdbar" value="0.000690516">
          <bio:group>OneSecGrp_SectionRef_30</bio:group>
        </bio:parameter>
        <bio:parameter name="ghdbar" value="0.000699461">
          <bio:group>OneSecGrp_SectionRef_29</bio:group>
        </bio:parameter>
        <bio:parameter name="ghdbar" value="0.000703036">
          <bio:group>OneSecGrp_SectionRef_28</bio:group>
        </bio:parameter>
        <bio:parameter name="ghdbar" value="0.000725809">
          <bio:group>OneSecGrp_SectionRef_49</bio:group>
        </bio:parameter>
        <bio:parameter name="ghdbar" value="0.000733165">
          <bio:group>OneSecGrp_SectionRef_34</bio:group>
        </bio:parameter>
        <bio:parameter name="ghdbar" value="0.000773596">
          <bio:group>OneSecGrp_SectionRef_21</bio:group>
        </bio:parameter>
        <bio:parameter name="ghdbar" value="0.000801393">
          <bio:group>OneSecGrp_SectionRef_17</bio:group>
        </bio:parameter>
        <bio:parameter name="ghdbar" value="0.000864621">
          <bio:group>OneSecGrp_SectionRef_54</bio:group>
        </bio:parameter>
        <bio:parameter name="ghdbar" value="0.000882907">
          <bio:group>OneSecGrp_SectionRef_62</bio:group>
        </bio:parameter>
        <bio:parameter name="ghdbar" value="0.000886414">
          <bio:group>OneSecGrp_SectionRef_26</bio:group>
        </bio:parameter>
        <bio:parameter name="ghdbar" value="0.000890791">
          <bio:group>OneSecGrp_SectionRef_52</bio:group>
        </bio:parameter>
        <bio:parameter name="ghdbar" value="0.000925941">
          <bio:group>OneSecGrp_SectionRef_47</bio:group>
        </bio:parameter>
        <bio:parameter name="ghdbar" value="0.000932524">
          <bio:group>OneSecGrp_SectionRef_45</bio:group>
        </bio:parameter>
        <bio:parameter name="ghdbar" value="0.000957527">
          <bio:group>OneSecGrp_SectionRef_61</bio:group>
        </bio:parameter>
        <bio:parameter name="ghdbar" value="0.000961194">
          <bio:group>OneSecGrp_SectionRef_38</bio:group>
        </bio:parameter>
        <bio:parameter name="ghdbar" value="0.000968633">
          <bio:group>OneSecGrp_SectionRef_50</bio:group>
        </bio:parameter>
        <bio:parameter name="ghdbar" value="0.000975872">
          <bio:group>OneSecGrp_SectionRef_6</bio:group>
        </bio:parameter>
        <bio:parameter name="ghdbar" value="0.000983767">
          <bio:group>OneSecGrp_SectionRef_3</bio:group>
        </bio:parameter>
        <bio:parameter name="ghdbar" value="0.000999822">
          <bio:group>OneSecGrp_SectionRef_22</bio:group>
        </bio:parameter>
        <bio:parameter name="ghdbar" value="0.00102311">
          <bio:group>OneSecGrp_SectionRef_39</bio:group>
        </bio:parameter>
        <bio:parameter name="ghdbar" value="0.00102589">
          <bio:group>OneSecGrp_SectionRef_36</bio:group>
        </bio:parameter>
        <bio:parameter name="ghdbar" value="0.00106788">
          <bio:group>OneSecGrp_SectionRef_18</bio:group>
        </bio:parameter>
        <bio:parameter name="ghdbar" value="0.00107429">
          <bio:group>OneSecGrp_SectionRef_53</bio:group>
        </bio:parameter>
        <bio:parameter name="ghdbar" value="0.00108371">
          <bio:group>OneSecGrp_SectionRef_16</bio:group>
        </bio:parameter>
        <bio:parameter name="ghdbar" value="0.00111834">
          <bio:group>OneSecGrp_SectionRef_57</bio:group>
        </bio:parameter>
        <bio:parameter name="ghdbar" value="0.00117285">
          <bio:group>OneSecGrp_SectionRef_44</bio:group>
        </bio:parameter>
        <bio:parameter name="ghdbar" value="0.00117286">
          <bio:group>OneSecGrp_SectionRef_58</bio:group>
        </bio:parameter>
        <bio:parameter name="ghdbar" value="0.00118406">
          <bio:group>OneSecGrp_SectionRef_41</bio:group>
        </bio:parameter>
        <bio:parameter name="ghdbar" value="0.00118489">
          <bio:group>OneSecGrp_SectionRef_65</bio:group>
        </bio:parameter>
        <bio:parameter name="ghdbar" value="0.00118615">
          <bio:group>OneSecGrp_SectionRef_67</bio:group>
        </bio:parameter>
        <bio:parameter name="ghdbar" value="0.00122089">
          <bio:group>OneSecGrp_SectionRef_68</bio:group>
        </bio:parameter>
        <bio:parameter name="ghdbar" value="0.00122158">
          <bio:group>OneSecGrp_SectionRef_56</bio:group>
        </bio:parameter>
        <bio:parameter name="ghdbar" value="0.00125703">
          <bio:group>OneSecGrp_SectionRef_25</bio:group>
        </bio:parameter>
        <bio:parameter name="ghdbar" value="0.00129601">
          <bio:group>OneSecGrp_SectionRef_66</bio:group>
        </bio:parameter>
        <bio:parameter name="ghdbar" value="0.00130028">
          <bio:group>OneSecGrp_SectionRef_72</bio:group>
        </bio:parameter>
        <bio:parameter name="ghdbar" value="0.00131058">
          <bio:group>OneSecGrp_SectionRef_46</bio:group>
        </bio:parameter>
        <bio:parameter name="ghdbar" value="0.00133224">
          <bio:group>OneSecGrp_SectionRef_73</bio:group>
        </bio:parameter>
        <bio:parameter name="ghdbar" value="0.00136807">
          <bio:group>OneSecGrp_SectionRef_43</bio:group>
        </bio:parameter>
        <bio:parameter name="ghdbar" value="0.00141575">
          <bio:group>OneSecGrp_SectionRef_80</bio:group>
        </bio:parameter>
        <bio:parameter name="ghdbar" value="0.00145774">
          <bio:group>OneSecGrp_SectionRef_82</bio:group>
        </bio:parameter>
        <bio:parameter name="ghdbar" value="0.00153176">
          <bio:group>OneSecGrp_SectionRef_42</bio:group>
        </bio:parameter>
        <bio:parameter name="ghdbar" value="0.00153649">
          <bio:group>OneSecGrp_SectionRef_76</bio:group>
        </bio:parameter>
        <bio:parameter name="ghdbar" value="0.00155599">
          <bio:group>OneSecGrp_SectionRef_91</bio:group>
        </bio:parameter>
        <bio:parameter name="ghdbar" value="0.00155913">
          <bio:group>OneSecGrp_SectionRef_74</bio:group>
        </bio:parameter>
        <bio:parameter name="ghdbar" value="0.00156065">
          <bio:group>OneSecGrp_SectionRef_75</bio:group>
        </bio:parameter>
        <bio:parameter name="ghdbar" value="0.00156281">
          <bio:group>OneSecGrp_SectionRef_55</bio:group>
        </bio:parameter>
        <bio:parameter name="ghdbar" value="0.00157061">
          <bio:group>OneSecGrp_SectionRef_83</bio:group>
        </bio:parameter>
        <bio:parameter name="ghdbar" value="0.0016609">
          <bio:group>OneSecGrp_SectionRef_77</bio:group>
        </bio:parameter>
        <bio:parameter name="ghdbar" value="0.00170044">
          <bio:group>OneSecGrp_SectionRef_40</bio:group>
        </bio:parameter>
        <bio:parameter name="ghdbar" value="0.00170829">
          <bio:group>OneSecGrp_SectionRef_20</bio:group>
        </bio:parameter>
        <bio:parameter name="ghdbar" value="0.00171468">
          <bio:group>OneSecGrp_SectionRef_93</bio:group>
        </bio:parameter>
        <bio:parameter name="ghdbar" value="0.00175107">
          <bio:group>OneSecGrp_SectionRef_98</bio:group>
        </bio:parameter>
        <bio:parameter name="ghdbar" value="0.00175373">
          <bio:group>OneSecGrp_SectionRef_94</bio:group>
        </bio:parameter>
        <bio:parameter name="ghdbar" value="0.00179805">
          <bio:group>OneSecGrp_SectionRef_51</bio:group>
        </bio:parameter>
        <bio:parameter name="ghdbar" value="0.001812">
          <bio:group>OneSecGrp_SectionRef_85</bio:group>
        </bio:parameter>
        <bio:parameter name="ghdbar" value="0.00182446">
          <bio:group>OneSecGrp_SectionRef_87</bio:group>
        </bio:parameter>
        <bio:parameter name="ghdbar" value="0.00182652">
          <bio:group>OneSecGrp_SectionRef_19</bio:group>
        </bio:parameter>
        <bio:parameter name="ghdbar" value="0.00188892">
          <bio:group>OneSecGrp_SectionRef_84</bio:group>
        </bio:parameter>
        <bio:parameter name="ghdbar" value="0.00190371">
          <bio:group>OneSecGrp_SectionRef_86</bio:group>
        </bio:parameter>
        <bio:parameter name="ghdbar" value="0.00195178">
          <bio:group>OneSecGrp_SectionRef_102</bio:group>
        </bio:parameter>
        <bio:parameter name="ghdbar" value="0.00204052">
          <bio:group>OneSecGrp_SectionRef_92</bio:group>
        </bio:parameter>
        <bio:parameter name="ghdbar" value="0.00213999">
          <bio:group>OneSecGrp_SectionRef_106</bio:group>
        </bio:parameter>
        <bio:parameter name="ghdbar" value="0.00214116">
          <bio:group>OneSecGrp_SectionRef_103</bio:group>
        </bio:parameter>
        <bio:parameter name="ghdbar" value="0.00214463">
          <bio:group>OneSecGrp_SectionRef_81</bio:group>
        </bio:parameter>
        <bio:parameter name="ghdbar" value="0.00224145">
          <bio:group>OneSecGrp_SectionRef_99</bio:group>
        </bio:parameter>
        <bio:parameter name="ghdbar" value="0.00265658">
          <bio:group>OneSecGrp_SectionRef_107</bio:group>
        </bio:parameter>
        <bio:parameter name="ghdbar" value="0.00284677">
          <bio:group>OneSecGrp_SectionRef_114</bio:group>
        </bio:parameter>
        <bio:parameter name="ghdbar" value="0.00287989">
          <bio:group>OneSecGrp_SectionRef_108</bio:group>
        </bio:parameter>
        <bio:parameter name="ghdbar" value="0.00343407">
          <bio:group>OneSecGrp_SectionRef_109</bio:group>
        </bio:parameter>
        <bio:parameter name="ghdbar" value="0.00353338">
          <bio:group>OneSecGrp_SectionRef_113</bio:group>
        </bio:parameter>
        <bio:parameter name="ghdbar" value="0.00598013">
          <bio:group>OneSecGrp_SectionRef_119</bio:group>
        </bio:parameter>
        <bio:parameter name="ghdbar" value="0.00747098">
          <bio:group>OneSecGrp_SectionRef_118</bio:group>
        </bio:parameter>
        <bio:parameter name="ghdbar" value="0.00923152">
          <bio:group>OneSecGrp_SectionRef_127</bio:group>
        </bio:parameter>
        <bio:parameter name="ghdbar" value="0.0138193">
          <bio:group>OneSecGrp_SectionRef_126</bio:group>
        </bio:parameter>
        <bio:parameter name="ghdbar" value="0.0144002">
          <bio:group>OneSecGrp_SectionRef_125</bio:group>
        </bio:parameter>
        <bio:parameter name="ghdbar" value="0.0176341">
          <bio:group>OneSecGrp_SectionRef_124</bio:group>
        </bio:parameter>
        <bio:parameter name="ghdbar" value="0.0220529">
          <bio:group>OneSecGrp_SectionRef_139</bio:group>
        </bio:parameter>
        <bio:parameter name="ghdbar" value="0.0238595">
          <bio:group>OneSecGrp_SectionRef_138</bio:group>
        </bio:parameter>
        <bio:parameter name="ghdbar" value="0.0267117">
          <bio:group>OneSecGrp_SectionRef_134</bio:group>
        </bio:parameter>
        <bio:parameter name="ghdbar" value="0.0314725">
          <bio:group>OneSecGrp_SectionRef_136</bio:group>
        </bio:parameter>
        <bio:parameter name="ghdbar" value="0.0317097">
          <bio:group>OneSecGrp_SectionRef_133</bio:group>
        </bio:parameter>
        <bio:parameter name="ghdbar" value="0.0340281">
          <bio:group>OneSecGrp_SectionRef_144</bio:group>
        </bio:parameter>
        <bio:parameter name="ghdbar" value="0.0375021">
          <bio:group>OneSecGrp_SectionRef_135</bio:group>
        </bio:parameter>
        <bio:parameter name="ghdbar" value="0.0385193">
          <bio:group>OneSecGrp_SectionRef_146</bio:group>
        </bio:parameter>
        <bio:parameter name="ghdbar" value="0.0393541">
          <bio:group>OneSecGrp_SectionRef_153</bio:group>
        </bio:parameter>
        <bio:parameter name="ghdbar" value="0.0398131">
          <bio:group>OneSecGrp_SectionRef_147</bio:group>
        </bio:parameter>
        <bio:parameter name="ghdbar" value="0.0408345">
          <bio:group>OneSecGrp_SectionRef_156</bio:group>
        </bio:parameter>
        <bio:parameter name="ghdbar" value="0.0417002">
          <bio:group>OneSecGrp_SectionRef_145</bio:group>
        </bio:parameter>
        <bio:parameter name="ghdbar" value="0.0453193">
          <bio:group>OneSecGrp_SectionRef_157</bio:group>
        </bio:parameter>
        <bio:parameter name="ghdbar" value="0.0456319">
          <bio:group>OneSecGrp_SectionRef_152</bio:group>
        </bio:parameter>
        <bio:parameter name="ghdbar" value="0.0457313">
          <bio:group>OneSecGrp_SectionRef_132</bio:group>
        </bio:parameter>
        <bio:parameter name="ghdbar" value="0.0464265">
          <bio:group>OneSecGrp_SectionRef_161</bio:group>
        </bio:parameter>
        <bio:parameter name="ghdbar" value="0.0477975">
          <bio:group>OneSecGrp_SectionRef_137</bio:group>
        </bio:parameter>
        <bio:parameter name="ghdbar" value="0.0490753">
          <bio:group>OneSecGrp_SectionRef_149</bio:group>
        </bio:parameter>
        <bio:parameter name="ghdbar" value="0.0502256">
          <bio:group>OneSecGrp_SectionRef_150</bio:group>
        </bio:parameter>
        <bio:parameter name="ghdbar" value="0.0512045">
          <bio:group>OneSecGrp_SectionRef_160</bio:group>
        </bio:parameter>
        <bio:parameter name="ghdbar" value="0.0525916">
          <bio:group>OneSecGrp_SectionRef_148</bio:group>
        </bio:parameter>
        <bio:parameter name="ghdbar" value="0.053966">
          <bio:group>OneSecGrp_SectionRef_166</bio:group>
        </bio:parameter>
        <bio:parameter name="ghdbar" value="0.0560793">
          <bio:group>OneSecGrp_SectionRef_158</bio:group>
        </bio:parameter>
        <bio:parameter name="ghdbar" value="0.0565078">
          <bio:group>OneSecGrp_SectionRef_159</bio:group>
        </bio:parameter>
        <bio:parameter name="ghdbar" value="0.060178">
          <bio:group>OneSecGrp_SectionRef_151</bio:group>
        </bio:parameter>
        <bio:parameter name="ghdbar" value="0.060528">
          <bio:group>OneSecGrp_SectionRef_164</bio:group>
        </bio:parameter>
        <bio:parameter name="ghdbar" value="0.0605911">
          <bio:group>OneSecGrp_SectionRef_167</bio:group>
        </bio:parameter>
        <bio:parameter name="ghdbar" value="0.0612562">
          <bio:group>OneSecGrp_SectionRef_163</bio:group>
        </bio:parameter>
        <bio:parameter name="ghdbar" value="0.0642655">
          <bio:group>OneSecGrp_SectionRef_165</bio:group>
        </bio:parameter>
        <bio:parameter name="ghdbar" value="0.0663252">
          <bio:group>OneSecGrp_SectionRef_162</bio:group>
        </bio:parameter>
        <bio:parameter name="ghdbar" value="0.0683142">
          <bio:group>OneSecGrp_SectionRef_170</bio:group>
        </bio:parameter>
        <bio:parameter name="ghdbar" value="0.0685179">
          <bio:group>OneSecGrp_SectionRef_171</bio:group>
        </bio:parameter>
        <bio:parameter name="ghdbar" value="0.069789">
          <bio:group>OneSecGrp_SectionRef_143</bio:group>
        </bio:parameter>
        <bio:parameter name="ghdbar" value="0.0703681">
          <bio:group>OneSecGrp_SectionRef_142</bio:group>
        </bio:parameter>
        <bio:parameter name="ghdbar" value="0.0790239">
          <bio:group>OneSecGrp_SectionRef_173</bio:group>
        </bio:parameter>
        <bio:parameter name="ghdbar" value="0.0864665">
          <bio:group>OneSecGrp_SectionRef_172</bio:group>
        </bio:parameter>
      </bio:mechanism>
      <bio:mechanism name="Km" type="Channel Mechanism">

        <bio:parameter name="gmax" value="5000">
          <bio:group>ModelViewParmSubset_10</bio:group>
        </bio:parameter>
        <bio:parameter name="gmax" value="10000">
          <bio:group>ModelViewParmSubset_5</bio:group>
        </bio:parameter>
        <bio:parameter name="gmax" value="50000">
          <bio:group>ModelViewParmSubset_7</bio:group>
        </bio:parameter>
      </bio:mechanism>
      <bio:mechanism name="Kv1" type="Channel Mechanism">

        <bio:parameter name="gmax" value="10">
          <bio:group>OneSecGrp_SectionRef_1</bio:group>
        </bio:parameter>
        <bio:parameter name="gmax" value="20">
          <bio:group>ModelViewParmSubset_11</bio:group>
        </bio:parameter>
        <bio:parameter name="gmax" value="200">
          <bio:group>ModelViewParmSubset_7</bio:group>
        </bio:parameter>
      </bio:mechanism>
      <bio:mechanism name="Kv" type="Channel Mechanism">

        <bio:parameter name="gmax" value="20000">
          <bio:group>ModelViewParmSubset_10</bio:group>
        </bio:parameter>
        <bio:parameter name="gmax" value="40000">
          <bio:group>ModelViewParmSubset_5</bio:group>
        </bio:parameter>
        <bio:parameter name="gmax" value="2e+06">
          <bio:group>ModelViewParmSubset_7</bio:group>
        </bio:parameter>
      </bio:mechanism>
      <bio:mechanism name="na" type="Channel Mechanism">
        <bio:parameter name="gmax" value="60000">
          <bio:group>OneSecGrp_SectionRef_1</bio:group>
        </bio:parameter>
        <bio:parameter name="gmax" value="80000">
          <bio:group>ModelViewParmSubset_3</bio:group>
        </bio:parameter>
        <bio:parameter name="gmax" value="120000">
          <bio:group>ModelViewParmSubset_5</bio:group>
        </bio:parameter>
      </bio:mechanism>
      <bio:mechanism name="nax" type="Channel Mechanism">

        <bio:parameter name="gmax" value="2.5e+06">
          <bio:group>ModelViewParmSubset_7</bio:group>
        </bio:parameter>
      </bio:mechanism>
      <bio:specificCapacitance>
        <bio:parameter value="0.02">
          <bio:group>ModelViewParmSubset_3</bio:group>
        </bio:parameter>
        <bio:parameter value="0.9">
          <bio:group>ModelViewParmSubset_4</bio:group>
        </bio:parameter>
        <bio:parameter value="1.8">
          <bio:group>ModelViewParmSubset_5</bio:group>
        </bio:parameter>
      </bio:specificCapacitance>
      <bio:specificAxialResistance>
        <bio:parameter value="0.1">
          <bio:group>all</bio:group>
        </bio:parameter>
      </bio:specificAxialResistance>
    </biophysics>
  </cell>
</cells>
</neuroml>
