<?xml version="1.0" encoding="UTF-8"?>
<neuroml xmlns="http://www.neuroml.org/schema/neuroml2"
         xmlns:xsi="http://www.w3.org/2001/XMLSchema-instance"
         xsi:schemaLocation="http://www.neuroml.org/schema/neuroml2 ../../../../NeuroML2/Schemas/NeuroML2/NeuroML_v2alpha.xsd"
         id="CaClamp">

    <notes>NeuroML 2 file containing a single Concentration Model</notes>

    <concentrationModel id="CaClamp" type="concentrationModelCaClamp" restingConc="2e-4 mM" tempConc="0.02 mM" delay="400ms" duration="100ms" ion="ca"/>

    <ComponentType name="concentrationModelCaClamp" extends="concentrationModel" description="Model whcih clamps Ca concentration at a fixed value. Very useful for testing Ca dependent K channels!">

        <Parameter name="restingConc" dimension="concentration"/>
        <Parameter name="tempConc" dimension="concentration"/>
        <Parameter name="delay" dimension="time"/>
        <Parameter name="duration" dimension="time"/>

        <Requirement name="iCa" dimension="current"/>

        <Text name="species"/>

        <Behavior>

            <StateVariable name="concentration" exposure="concentration" dimension="concentration"/>
            <StateVariable name="extConcentration" exposure="extConcentration" dimension="concentration"/>

            <OnCondition test="t .lt. delay">
                <StateAssignment variable="concentration" value="restingConc"/>
            </OnCondition>

            <OnCondition test="t .geq. delay .and. t .lt. duration + delay">
                <StateAssignment variable="concentration" value="tempConc"/>
            </OnCondition>

            <OnCondition test="t .geq. duration + delay">
                <StateAssignment variable="concentration" value="restingConc"/>
            </OnCondition>

            <OnStart>
                <StateAssignment variable="concentration" value="restingConc"/>
            </OnStart>

        </Behavior>

    </ComponentType>

</neuroml>
