<?xml version="1.0" encoding="UTF-8"?>
<channelml xmlns="http://morphml.org/channelml/schema" xmlns:xsi="http://www.w3.org/2001/XMLSchema-instance" xmlns:meta="http://morphml.org/metadata/schema" xsi:schemaLocation="http://morphml.org/channelml/schema   ../../Schemata/v1.1/Level2/ChannelML_v1.1.xsd" units="SI Units">

  <meta:notes>Internal calcium concentration due to calcium currents and pump</meta:notes>

    <ion name="ca" charge="2" role="SignallingSubstance">
        <meta:notes>Signifies that the ion is involved in a process which alters its concentration</meta:notes>
    </ion>

    <ion_concentration name="CaPool">

        <status value="in_progress">
                <meta:comment></meta:comment>
                <meta:contributor>
                <meta:name>Matteo Farinella</meta:name>
            </meta:contributor>
        </status>

        <meta:notes>Simple model of ATPase pump with 3 kinetic constants
   Cai + P &lt; - &gt; CaP -&gt; Cao + P  (k1,k2,k3)
   A Michaelis-Menten approximation is assumed, which reduces the complexity of the system to 2 parameters:
   kt  =&lt; tot enzyme concentration &gt; * k3  -&gt; TIME CONSTANT OF THE PUMP
   kd = k2/k1 (dissociation constant)    -&gt; EQUILIBRIUM CALCIUM VALUE
   The values of these parameters are chosen assuming a high affinity of  the pump to calcium and a low transport capacity (cfr. Blaustein, TINS, 11: 438, 1988, and references therein).
   </meta:notes>

        <meta:authorList>
             <meta:modelAuthor>
                <meta:name>Alain Destexhe</meta:name>
                <meta:institution>Salk Institute</meta:institution>
                <meta:comment>Cited implementer according to the original .mod file</meta:comment>
            </meta:modelAuthor>

            <meta:modelTranslator>
                <meta:name>Matteo Farinella</meta:name>
                <meta:institution>UCL</meta:institution>
                <meta:email>m.farinella - at - ucl.ac.uk</meta:email>
            </meta:modelTranslator>
        </meta:authorList>

         <meta:publication>
            <meta:fullTitle>Destexhe, A. Babloyantz, A. and Sejnowski, TJ. (1993) Ionic mechanisms for intrinsic slow oscillations in thalamic relay neurons. Biophys. J. 65: 1538-1552</meta:fullTitle>
            <meta:pubmedRef>http://www.ncbi.nlm.nih.gov/pubmed/8274647</meta:pubmedRef>
        </meta:publication>

        <meta:publication>
            <meta:fullTitle>Larkum ME, Nevian T, Sandler M, Polsky A, Schiller J (2009) Synaptic integration in tuft dendrites of layer 5 pyramidal neurons: a new unifying principle.  Science. 2009 Aug 7;325(5941):756-60</meta:fullTitle>
            <meta:pubmedRef>http://www.ncbi.nlm.nih.gov/pubmed/19661433</meta:pubmedRef>
        </meta:publication>

        <meta:modelDBref>
            <meta:modelName>Synaptic integration in tuft dendrites of layer 5 pyramidal neurons (Larkum et al. 2009)</meta:modelName>
            <meta:uri>http://senselab.med.yale.edu/ModelDB/ShowModel.asp?model=124043</meta:uri>
        </meta:modelDBref>

        <ion_species>ca</ion_species>

        <decaying_pool_model>
            <resting_conc>100e-6</resting_conc>
            <decay_constant>0.08</decay_constant>

            <pool_volume_info>
                <shell_thickness>0.1e-6</shell_thickness>
            </pool_volume_info>

        </decaying_pool_model>

    </ion_concentration>
</channelml>
