<?xml version="1.0" encoding="UTF-8"?>

<channelml xmlns="http://morphml.org/channelml/schema"
    xmlns:xsi="http://www.w3.org/2001/XMLSchema-instance"
    xmlns:meta="http://morphml.org/metadata/schema"
    xsi:schemaLocation="http://morphml.org/channelml/schema    http://www.neuroml.org/NeuroMLValidator/NeuroMLFiles/Schemata/v1.8.1/Level2/ChannelML_v1.8.1.xsd"
    units="Physiological Units">

    <meta:notes>Channel model from Larkum et al. 2009</meta:notes>

    <channel_type name="hh3Na_CML">

        <status value="stable">
			<meta:contributor>
                <meta:name>Padraig Gleeson</meta:name>
            </meta:contributor>
        </status>

        <meta:notes>Mel-modified Hodgkin-Huxley conductances accounting only for the Na component</meta:notes>

        <meta:authorList>
             <meta:modelAuthor>
                <meta:name>Alon Polsky</meta:name>
                <meta:comment>Cited implementer according to ModelDB</meta:comment>
            </meta:modelAuthor>
            <meta:modelTranslator>
                <meta:name>Matteo Farinella</meta:name>
                <meta:institution>UCL</meta:institution>
                <meta:email>m.farinella - at - ucl.ac.uk</meta:email>
            </meta:modelTranslator>
        </meta:authorList>

         <meta:publication>
            <meta:fullTitle>Larkum ME, Nevian T, Sandler M, Polsky A, Schiller J (2009) Synaptic integration in tuft dendrites of layer 5 pyramidal neurons: a new unifying principle.  Science. 2009 Aug 7;325(5941):756-60</meta:fullTitle>
            <meta:pubmedRef>http://www.ncbi.nlm.nih.gov/pubmed/19661433</meta:pubmedRef>
        </meta:publication>

        <meta:neuronDBref>
            <meta:modelName>Na channels</meta:modelName>
            <meta:uri>http://senselab.med.yale.edu/neurondb/channelGene2.htm#table2</meta:uri>
        </meta:neuronDBref>

        <meta:modelDBref>
            <meta:modelName>Synaptic integration in tuft dendrites of layer 5 pyramidal neurons (Larkum et al. 2009)</meta:modelName>
            <meta:uri>http://senselab.med.yale.edu/ModelDB/ShowModel.asp?model=124043</meta:uri>
        </meta:modelDBref>

        <parameters>
            <parameter name="vshift" value="0"/>
        </parameters>

        <current_voltage_relation cond_law="ohmic" ion="na" default_gmax="2" default_erev="50">

            <gate name="m" instances="3">

                <closed_state id="m0"/>
                <open_state id="m"/>

                <!-- An *incorrect* initialisation value for this, in order to compare to original mod file. Normally should be ignored!! -->
                <initialisation value="0"/>

                <time_course name="tau" from="m0" to="m" expr_form="generic" expr="0.05"/>

                <steady_state name="inf" from="m0" to="m" expr_form="generic" expr="1 / (1 + exp((v + 40+vshift)/(-3)))"/>

            </gate>

            <gate name="h" instances="1">

                <closed_state id="h0"/>
                <open_state id="h"/>

                <!-- An *incorrect* initialisation value for this, in order to compare to original mod file. Normally should be ignored!! -->
                <initialisation value="0"/>

                <time_course name="tau" from="h0" to="h" expr_form="generic" expr="0.6"/>

                <steady_state name="inf" from="h0" to="h" expr_form="generic" expr="1 / (1 + exp((v + 45+vshift)/3))"/>

            </gate>

            <gate name="s" instances="0">

				<closed_state id="s0"/>
				<open_state id="s"/>

                <!-- An *incorrect* initialisation value for this, in order to compare to original mod file. Normally should be ignored!! -->
                <initialisation value="0"/>

				<time_course name="tau" from="s0" to="s" expr_form="generic" expr="50/(1+exp((v+30+vshift)))+0.5"/>

				<steady_state name="inf" from="s0" to="s" expr_form="generic" expr="1 / (1 + exp((v + 44+vshift)/3))"/>

            </gate>

        </current_voltage_relation>

    </channel_type>
</channelml>
