<?xml version="1.0" encoding="UTF-8"?>
<!--

   $Revision: 151 $
   $LastChangedBy: pgleeson $
   $Date: 2008-10-07 14:13:37 +0100 (Tue, 07 Oct 2008) $
   $HeadURL: https://neuroml.svn.sourceforge.net/svnroot/neuroml/tempModels/neuroConstruct/Ex7_GranuleCell/cellMechanisms/Gran_KA_98/KA_Chan.xml $

-->

<channelml xmlns="http://morphml.org/channelml/schema" xmlns:xsi="http://www.w3.org/2001/XMLSchema-instance" xmlns:meta="http://morphml.org/metadata/schema" xsi:schemaLocation="http://morphml.org/channelml/schema  ../../../../../trunk/web/NeuroMLFiles/Schemata/v1.7.3/Level2/ChannelML_v1.7.3.xsd" units="Physiological Units">

    <meta:notes>WARINING: in the orginial mod file the conductance was multiplied by e-4, remember to scale your Gmax</meta:notes>

    <channel_type name="kca_CML">

        <status value="stable">

        </status>

        <meta:notes>Calcium-dependent potassium channel,
                                  Based on Pennefather (1990) -- sympathetic ganglion cells,
                                  taken from Reuveni et al (1993) -- neocortical cells</meta:notes>

       <meta:authorList>
             <meta:modelAuthor>
                <meta:name>Zach Mainen</meta:name>
                <meta:institution>Salk Institute</meta:institution>
                <meta:comment>Cited implementer according to the original .mod file</meta:comment>
            </meta:modelAuthor>

            <meta:modelTranslator>
                <meta:name>Matteo Farinella</meta:name>
                <meta:institution>UCL</meta:institution>
                <meta:email>m.farinella - at - ucl.ac.uk</meta:email>
            </meta:modelTranslator>
        </meta:authorList>

         <meta:publication>
            <meta:fullTitle>Larkum ME, Nevian T, Sandler M, Polsky A, Schiller J (2009) Synaptic integration in tuft dendrites of layer 5 pyramidal neurons: a new unifying principle.  Science. 2009 Aug 7;325(5941):756-60</meta:fullTitle>
            <meta:pubmedRef>http://www.ncbi.nlm.nih.gov/pubmed/19661433</meta:pubmedRef>
        </meta:publication>

        <meta:neuronDBref>
            <meta:modelName>K channels</meta:modelName>
            <meta:uri>http://senselab.med.yale.edu/senselab/NeuronDB/channelGene2.htm#table3</meta:uri>
        </meta:neuronDBref>

        <meta:modelDBref>
            <meta:modelName>Synaptic integration in tuft dendrites of layer 5 pyramidal neurons (Larkum et al. 2009)</meta:modelName>
            <meta:uri>http://senselab.med.yale.edu/ModelDB/ShowModel.asp?model=124043</meta:uri>
        </meta:modelDBref>

        <current_voltage_relation cond_law="ohmic" ion="k" default_gmax="0.1" default_erev="-77">

            <conc_dependence name="Calcium" ion="ca" charge="2" variable_name="ca_conc" min_conc="7.55e-7" max_conc="0.050"/>

            <q10_settings q10_factor="2.3" experimental_temp="23"/>

            <gate name="n" instances="1">

                <closed_state id="n0"/>
                <open_state id="n"/>

                <transition name="alpha" from="n0" to="n" expr_form="generic" expr="0.05* ca_conc^4"/>

                <transition name="beta" from="n" to="n0" expr_form="generic" expr="0.1 "/>

                <steady_state name = "inf" from = "n0" to = "n" expr_form = "generic" expr = " temp_adj_n*alpha/(alpha+beta)"/>

            </gate>

        </current_voltage_relation>

        <impl_prefs>
			<table_settings max_v="100" min_v="-120" table_divisions="199"/>
	</impl_prefs>

    </channel_type>
</channelml>
