<?xml version="1.0" encoding="UTF-8"?>
<channelml xmlns="http://morphml.org/channelml/schema"
           xmlns:xsi="http://www.w3.org/2001/XMLSchema-instance"
           xmlns:meta="http://morphml.org/metadata/schema"
           xsi:schemaLocation="http://morphml.org/channelml/schema  ../../Schemata/v1.6/Level2/ChannelML_v1.6.xsd"
           units="Physiological Units">

    <meta:notes>ChannelML file based on Traub et al. 2003</meta:notes>

    <ion name="ar" charge="1" default_erev="-35"/>

    <channel_type name="ar" density="yes">

        <status value="in_progress">
          <meta:comment>Verified equivalence of NEURON and GENESIS mapping to orig NEURON mod impl at 0.02ms dt with current pulse</meta:comment>
          <meta:issue>In original mod, m is initialised to 0, as opposed to minf at t=0. ChannelML impl corrects this</meta:issue>
            <meta:issue>Parameter m0 should be used for the initialisation</meta:issue>
            <meta:contributor>
                <meta:name>Padraig Gleeson</meta:name>
            </meta:contributor>
            <meta:contributor>
                <meta:name>Yoana Dimitrova</meta:name>
            </meta:contributor>
        </status>

        <meta:notes>Anomalous rectifier current. Based on NEURON port of model from Traub et al 2003</meta:notes>

        <meta:authorList>
            <meta:modelAuthor>
                <meta:name>Maciej Lazarewicz</meta:name>
                <meta:comment>Conversion of FORTRAN model to NEURON. See Traub et al 2003 for detailed origin of channels</meta:comment>
            </meta:modelAuthor>
            <meta:modelAuthor>
                <meta:name>Roger D Traub</meta:name>
                <meta:comment>Conversion of FORTRAN model to NEURON. See Traub et al 2003 for detailed origin of channels</meta:comment>
            </meta:modelAuthor>
            <meta:modelTranslator>
                <meta:name>Padraig Gleeson</meta:name>
                <meta:institution>UCL</meta:institution>
                <meta:email>p.gleeson - at - ucl.ac.uk</meta:email>
            </meta:modelTranslator>
            <meta:modelTranslator>
                <meta:name>Yoana Dimitrova</meta:name>
                <meta:institution>UCL</meta:institution>
                <meta:email>y.dimitrova - at - ucl.ac.uk</meta:email>
            </meta:modelTranslator>
        </meta:authorList>

        <meta:publication>
            <meta:fullTitle>Roger D. Traub, Eberhard H. Buhl, Tengis Gloveli, and Miles A. Whittington
Fast Rhythmic Bursting Can Be Induced in Layer 2/3 Cortical Neurons by Enhancing Persistent Na+ Conductance or by Blocking BK Channels
J Neurophysiol 89: 909-921, 2003</meta:fullTitle>
            <meta:pubmedRef>http://www.ncbi.nlm.nih.gov/entrez/query.fcgi?cmd=Retrieve&amp;db=pubmed&amp;dopt=Abstract&amp;list_uids=12574468</meta:pubmedRef>
        </meta:publication>

        <meta:modelDBref>
            <meta:modelName>Mechanisms of fast rhythmic bursting in a layer 2/3 cortical neuron (Traub et al 2003)</meta:modelName>
            <meta:uri>http://senselab.med.yale.edu/ModelDB/ShowModel.asp?model=20756</meta:uri>
        </meta:modelDBref>

        <parameters>
            <parameter name="m0" value ="0"/>
        </parameters>

        <current_voltage_relation>
            <ohmic ion="ar">
                <conductance default_gmax="0.25">       <!-- phys units: mS/cm2 -->
                    <gate power="1">
                        <state name="m" fraction="1"/>
                    </gate>
                </conductance>
            </ohmic>
        </current_voltage_relation>

        <hh_gate state="m">
            <transition>
                <voltage_gate>

                    <initialisation value="m0"/> <!-- An incorrect initialisation value for this state variable, in order to match orig mod!!-->

                    <tau>
                          <!-- Note, extra brackets required to allow use of equation on GENESIS...-->
                        <generic_equation_hh expr="1 /((exp (-14.6 - (0.086 * v) )) + (exp (-1.87 + (0.07 * v))))"/>
                    </tau>
                    <inf>
                        <parameterised_hh type="sigmoid">  <!-- Form of equation: A / (1 + exp(k*(v-d))) -->
                            <parameter name="A" value="1"/>
                            <parameter name="k" value="0.1818"/>
                            <parameter name="d" value="-75"/>
                        </parameterised_hh>
                    </inf>
                </voltage_gate>
            </transition>
        </hh_gate>

        <impl_prefs>
            <comment>Using the NEURON mod file impl settings to get a closer match</comment>
            <table_settings max_v="40" min_v="-120" table_divisions="641"/>
        </impl_prefs>

    </channel_type>
</channelml>
