<?xml version="1.0" encoding="UTF-8"?>
<channelml xmlns="http://morphml.org/channelml/schema"
    xmlns:xsi="http://www.w3.org/2001/XMLSchema-instance"
    xmlns:meta="http://morphml.org/metadata/schema"
    xsi:schemaLocation="http://morphml.org/channelml/schema  http://www.morphml.org:8080/NeuroMLValidator/NeuroMLFiles/Schemata/v1.6/Level2/ChannelML_v1.6.xsd"
    units="Physiological Units">

    <meta:notes>ChannelML file based on Traub et al. 2003</meta:notes>

    <ion name="cat" charge="1" default_erev="125">
        <meta:notes>Since the original mod file stipulates that the inflow *doesn't alter the internal calcium*, giving the ion a different name here, to avoid interaction with other Ca based channel mechanisms</meta:notes>
    </ion>

    <channel_type name="cat" density="yes">

        <status value="stable">
            <meta:comment>Verified equivalence of NEURON and GENESIS mapping to orig NEURON mod impl at 0.02ms dt with current pulse (but 0.002 is better)</meta:comment>
            <meta:issue>In original mod, m is initialised to 0, as opposed to minf at t=0. ChannelML impl corrects this</meta:issue>
            <meta:contributor>
                <meta:name>Yoana Dimitrova</meta:name>
            </meta:contributor>
        </status>

        <meta:notes>Low threshold, inactivating Calcium T-type ("transient") conductance. Based on NEURON port of model from Traub et al 2003</meta:notes>

        <meta:authorList>
            <meta:modelAuthor>
                <meta:name>Maciej Lazarewicz</meta:name>
                <meta:comment>Conversion of FORTRAN model to NEURON. See Traub et al 2003 for detailed origin of channels</meta:comment>
            </meta:modelAuthor>
            <meta:modelAuthor>
                <meta:name>Roger D Traub</meta:name>
                <meta:comment>Conversion of FORTRAN model to NEURON. See Traub et al 2003 for detailed origin of channels</meta:comment>
            </meta:modelAuthor>

            <meta:modelTranslator>
                <meta:name>Yoana Dimitrova</meta:name>
                <meta:institution>UCL</meta:institution>
                <meta:email>y.dimitrova - at - ucl.ac.uk</meta:email>
            </meta:modelTranslator>
            <meta:modelTranslator>
                <meta:name>Padraig Gleeson</meta:name>
                <meta:institution>UCL</meta:institution>
                <meta:email>p.gleeson - at - ucl.ac.uk</meta:email>
            </meta:modelTranslator>

        </meta:authorList>

        <meta:publication>
            <meta:fullTitle>Roger D. Traub, Eberhard H. Buhl, Tengis Gloveli, and Miles A. Whittington
Fast Rhythmic Bursting Can Be Induced in Layer 2/3 Cortical Neurons by Enhancing Persistent Na+ Conductance or by Blocking BK Channels
J Neurophysiol 89: 909-921, 2003</meta:fullTitle>
            <meta:pubmedRef>http://www.ncbi.nlm.nih.gov/entrez/query.fcgi?cmd=Retrieve&amp;db=pubmed&amp;dopt=Abstract&amp;list_uids=12574468</meta:pubmedRef>
        </meta:publication>

        <meta:neuronDBref>
            <meta:modelName>Calcium channels</meta:modelName>
            <meta:uri>http://senselab.med.yale.edu/senselab/NeuronDB/channelGene2.htm#table1</meta:uri>
        </meta:neuronDBref>

        <meta:modelDBref>
            <meta:modelName>Mechanisms of fast rhythmic bursting in a layer 2/3 cortical neuron (Traub et al 2003)</meta:modelName>
            <meta:uri>http://senselab.med.yale.edu/ModelDB/ShowModel.asp?model=20756</meta:uri>
        </meta:modelDBref>

        <current_voltage_relation>
            <ohmic ion="cat">
                <conductance default_gmax="0.1">        <!-- phys units: mS/cm2 -->

                    <gate power="2">
                        <state name="m" fraction="1"/>
                    </gate>

                    <gate power="1">
		                <state name="h" fraction="1"/>
                    </gate>

                </conductance>
            </ohmic>
        </current_voltage_relation>

        <hh_gate state="m">
            <transition>
                <voltage_gate>

                    <initialisation value="0"/> <!-- An incorrect initialisation value for this state variable, in order to match orig mod!!-->

                    <tau>
                        <generic_equation_hh expr="0.204 + 0.333 / ( (exp ((15.8 + v) / 18.2 )) + (exp ((- v - 131) / 16.7)) )"/>
                    </tau>
                    <inf>
                        <parameterised_hh type="sigmoid">  <!-- Form of equation: A / (1 + exp(k*(v-d))) -->
                            <parameter name="A" value="1"/>
                            <parameter name="k" value="-0.1613"/>
                            <parameter name="d" value="-56.0"/>
                        </parameterised_hh>
                    </inf>
                </voltage_gate>
            </transition>
        </hh_gate>

	   <hh_gate state="h">
            <transition>
                <voltage_gate>
                    <tau>
	                   <generic_equation_hh expr="v &lt; -81.0 ? 0.333 * (exp (( v + 466 ) / 66.6)) : 9.32 + 0.333 * (exp (( - v - 21 ) / 10.5))"/>
                    </tau>
                    <inf>
                        <parameterised_hh type="sigmoid">  <!-- Form of equation: A / (1 + exp(k*(v-d))) -->
                            <parameter name="A" value="1"/>
                            <parameter name="k" value="0.25"/>
                            <parameter name="d" value="-80"/>
                        </parameterised_hh>
                    </inf>
                </voltage_gate>
            </transition>
        </hh_gate>

        <impl_prefs>
            <comment>Using the NEURON mod file impl settings to get a closer match</comment>
            <table_settings max_v="40" min_v="-120" table_divisions="641"/>
        </impl_prefs>

    </channel_type>
</channelml>
