<?xml version="1.0" encoding="UTF-8"?>
<channelml xmlns="http://morphml.org/channelml/schema"
xmlns:xsi="http://www.w3.org/2001/XMLSchema-instance"
xmlns:meta="http://morphml.org/metadata/schema"
xsi:schemaLocation="http://morphml.org/channelml/schema  http://localhost:8084/NeuroMLValidator/NeuroMLFiles/Schemata/v1.6/Level2/ChannelML_v1.6.xsd" units="Physiological Units">

    <meta:notes>ChannelML file based on Traub et al. 2003</meta:notes>

    <ion name="k" charge="1" default_erev="-95"/>

    <channel_type name="k2" density="yes">

        <status value="stable">
            <meta:comment>Verified equivalence of NEURON and GENESIS mapping to orig NEURON mod impl at 0.02ms dt with current pulse</meta:comment>
            <meta:issue>In original mod, m is initialised to 0, as opposed to minf at t=0. ChannelML impl corrects this</meta:issue>
            <meta:contributor>
                <meta:name>Yoana Dimitrova</meta:name>
            </meta:contributor>
        </status>

        <meta:notes>Potasium K2-type current (slowly activating and inactivating). Based on NEURON port of model from Traub et al 2003</meta:notes>

        <meta:authorList>
            <meta:modelAuthor>
                <meta:name>Maciej Lazarewicz</meta:name>
                <meta:comment>Conversion of FORTRAN model to NEURON. See Traub et al 2003 for detailed origin of channels</meta:comment>
            </meta:modelAuthor>
            <meta:modelAuthor>
                <meta:name>Roger D Traub</meta:name>
                <meta:comment>Conversion of FORTRAN model to NEURON. See Traub et al 2003 for detailed origin of channels</meta:comment>
            </meta:modelAuthor>

            <meta:modelTranslator>
                <meta:name>Yoana Dimitrova</meta:name>
                <meta:institution>UCL</meta:institution>
                <meta:email>y.dimitrova - at - ucl.ac.uk</meta:email>
            </meta:modelTranslator>
            <meta:modelTranslator>
                <meta:name>Padraig Gleeson</meta:name>
                <meta:institution>UCL</meta:institution>
                <meta:email>p.gleeson - at - ucl.ac.uk</meta:email>
            </meta:modelTranslator>

        </meta:authorList>

        <meta:publication>
            <meta:fullTitle>Roger D. Traub, Eberhard H. Buhl, Tengis Gloveli, and Miles A. Whittington
Fast Rhythmic Bursting Can Be Induced in Layer 2/3 Cortical Neurons by Enhancing Persistent Na+ Conductance or by Blocking BK Channels
J Neurophysiol 89: 909-921, 2003</meta:fullTitle>
            <meta:pubmedRef>http://www.ncbi.nlm.nih.gov/entrez/query.fcgi?cmd=Retrieve&amp;db=pubmed&amp;dopt=Abstract&amp;list_uids=12574468</meta:pubmedRef>
        </meta:publication>

        <meta:neuronDBref>
            <meta:modelName>K channels</meta:modelName>
            <meta:uri>http://senselab.med.yale.edu/senselab/NeuronDB/channelGene2.htm#table3</meta:uri>
        </meta:neuronDBref>

        <meta:modelDBref>
            <meta:modelName>Mechanisms of fast rhythmic bursting in a layer 2/3 cortical neuron (Traub et al 2003)</meta:modelName>
            <meta:uri>http://senselab.med.yale.edu/ModelDB/ShowModel.asp?model=20756</meta:uri>
        </meta:modelDBref>

        <current_voltage_relation>
            <ohmic ion="k">
                <conductance default_gmax="0.1">              <!-- phys units: mS/cm2 -->

		            <gate power="1">
                        <state name="m" fraction="1"/>
                    </gate>

                    <gate power="1">
                        <state name="h" fraction="1"/>
                    </gate>

                </conductance>
            </ohmic>
        </current_voltage_relation>

        <hh_gate state="m">
            <transition>
                <voltage_gate>

                    <initialisation value="0"/> <!-- An incorrect initialisation value for this state variable, in order to match orig mod!!-->

                    <tau>
                        <!--  Note, extra brackets required to allow use of equation on GENESIS... -->
                        <generic_equation_hh expr="4.95 + 0.5 / ( (exp ( (v - 81) / 25.6)) + (exp ( (- v - 132) / 18 )))"/>
                    </tau>
                    <inf>
                        <parameterised_hh type="sigmoid">  <!-- Form of equation: A / (1 + exp(k*(v-d))) -->
                            <parameter name="A" value="1"/>
                            <parameter name="k" value="-0.05882353"/>
                            <parameter name="d" value="-10.0"/>
                        </parameterised_hh>
                    </inf>
                </voltage_gate>
            </transition>
        </hh_gate>

        <hh_gate state="h">
            <transition>
                <voltage_gate>
                    <tau>
                            <!--  Note, extra brackets required to allow use of equation on GENESIS... -->
                        <generic_equation_hh expr="60 + 0.5 / ((exp (( v - 1.33 )/200)) + (exp ((- v - 130)/ 7.1)))"/>
                    </tau>
                    <inf>
                        <parameterised_hh type="sigmoid">  <!-- Form of equation: A / (1 + exp(k*(v-d))) -->
                            <parameter name="A" value="1"/>
                            <parameter name="k" value="0.09433962"/>
                            <parameter name="d" value="-58.0"/>
                        </parameterised_hh>
                    </inf>
                </voltage_gate>
            </transition>
        </hh_gate>

        <impl_prefs>
            <comment>Using the NEURON mod file impl settings to get a closer match</comment>
            <table_settings max_v="40" min_v="-120" table_divisions="641"/>
        </impl_prefs>

    </channel_type>
</channelml>
