<?xml version="1.0" encoding="UTF-8"?>
<channelml xmlns="http://morphml.org/channelml/schema"
           xmlns:xsi="http://www.w3.org/2001/XMLSchema-instance"
           xmlns:meta="http://morphml.org/metadata/schema"
           xsi:schemaLocation="http://morphml.org/channelml/schema  http://localhost:8084/NeuroMLValidator/NeuroMLFiles/Schemata/v1.7.1/Level2/ChannelML_v1.7.1.xsd"
           units="Physiological Units">

    <meta:notes>ChannelML file based on Traub et al. 2003</meta:notes>

     <ion name="k" charge="1" default_erev="-95" role="PermeatedSubstance">
        <meta:notes>The ion which actually flows through the channel</meta:notes>
    </ion>
    <ion name="ca" charge="2" role="ModulatingSubstance">
        <meta:notes>The channel's conductance of K is dependent on this ion's concentration</meta:notes>
    </ion>

    <channel_type name="kc_fast" density="yes">

        <status value="in_progress">
            <meta:comment>No match on genesis</meta:comment>
            <meta:comment>...</meta:comment>
            <meta:issue>In original mod, m is initialised to 0, as opposed to minf at t=0. ChannelML impl corrects this</meta:issue>
            <meta:contributor>
                <meta:name>Padraig Gleeson</meta:name>
            </meta:contributor>
            <meta:contributor>
                <meta:name>Yoana Dimitrova</meta:name>
            </meta:contributor>
        </status>

        <meta:notes>Fast voltage and [Ca2+] dependent K conductance (BK channel). Based on NEURON port of model from Traub et al 2003</meta:notes>

        <meta:authorList>
            <meta:modelAuthor>
                <meta:name>Roger D Traub</meta:name>
                <meta:comment>Conversion of FORTRAN model to NEURON. See Traub et al 2003 for detailed origin of channels</meta:comment>
            </meta:modelAuthor>
            <meta:modelAuthor>
                <meta:name>Maciej Lazarewicz</meta:name>
                <meta:comment>Conversion of FORTRAN model to NEURON. See Traub et al 2003 for detailed origin of channels</meta:comment>
            </meta:modelAuthor>

            <meta:modelTranslator>
                <meta:name>Padraig Gleeson</meta:name>
                <meta:institution>UCL</meta:institution>
                <meta:email>p.gleeson - at - ucl.ac.uk</meta:email>
            </meta:modelTranslator>
            <meta:modelTranslator>
                <meta:name>Yoana Dimitrova</meta:name>
                <meta:institution>UCL</meta:institution>
                <meta:email>y.dimitrova - at - ucl.ac.uk</meta:email>
            </meta:modelTranslator>

        </meta:authorList>

        <meta:publication>
            <meta:fullTitle>Roger D. Traub, Eberhard H. Buhl, Tengis Gloveli, and Miles A. Whittington
Fast Rhythmic Bursting Can Be Induced in Layer 2/3 Cortical Neurons by Enhancing Persistent Na+ Conductance or by Blocking BK Channels
J Neurophysiol 89: 909-921, 2003</meta:fullTitle>
            <meta:pubmedRef>http://www.ncbi.nlm.nih.gov/entrez/query.fcgi?cmd=Retrieve&amp;db=pubmed&amp;dopt=Abstract&amp;list_uids=12574468</meta:pubmedRef>
        </meta:publication>

        <meta:modelDBref>
            <meta:modelName>Mechanisms of fast rhythmic bursting in a layer 2/3 cortical neuron (Traub et al 2003)</meta:modelName>
            <meta:uri>http://senselab.med.yale.edu/ModelDB/ShowModel.asp?model=20756</meta:uri>
        </meta:modelDBref>

        <meta:neuronDBref>
            <meta:modelName>K channels</meta:modelName>
            <meta:uri>http://senselab.med.yale.edu/senselab/NeuronDB/channelGene2.htm#table3</meta:uri>
        </meta:neuronDBref>

        <parameters>
            <parameter name="speedup_factor" value ="2"/>
        </parameters>

        <current_voltage_relation>
            <ohmic ion="k">
                <conductance default_gmax="12">                             <!-- phys units: mS/cm2 -->

                    <!-- New element in v1.7.1 -->
                    <conc_factor  ion="ca" variable_name="ca_conc" expr="ca_conc &lt; 0.00025 ? (ca_conc / 0.00025) : 1" min_conc="0" max_conc="0.001"/>

		            <gate power="1">
                        <state name="m" fraction="1"/>
                    </gate>

                </conductance>
            </ohmic>
        </current_voltage_relation>

        <hh_gate state="m">
            <transition>
                <voltage_gate>

                    <initialisation value="0"/> <!-- An incorrect initialisation value for this state variable, in order to match orig mod!!-->

                    <alpha>
                        <generic_equation_hh expr="v &lt; -10.0 ? speedup_factor * (2 / 37.95) * ( exp ( ((v + 50 ) / 11) - (( v + 53.5) / 27) ) ) : speedup_factor * 2 * (exp ( ( (-1 *  v) - 53.5 ) / 27 ))"/>
                    </alpha>
                    <beta>
                         <generic_equation_hh expr="v &lt; -10.0 ? speedup_factor * 2 * (exp ( ( (-1 * v) - 53.5 ) / 27 )) - alpha : speedup_factor * 0.0"/>
                    </beta>

                </voltage_gate>
            </transition>
        </hh_gate>

        <impl_prefs>
            <comment>Using the NEURON mod file impl settings to get a closer match</comment>
            <table_settings max_v="140" min_v="-120" table_divisions="1041"/>
        </impl_prefs>

    </channel_type>
</channelml>
