<?xml version="1.0" encoding="UTF-8"?>
<channelml xmlns="http://morphml.org/channelml/schema"
           xmlns:xsi="http://www.w3.org/2001/XMLSchema-instance"
           xmlns:meta="http://morphml.org/metadata/schema"
           xsi:schemaLocation="http://morphml.org/channelml/schema  ../../Schemata/v1.6/Level2/ChannelML_v1.6.xsd"
           units="Physiological Units">

    <meta:notes>ChannelML file based on Traub et al. 2003</meta:notes>

    <ion name="na" charge="1" default_erev="50"/>

    <channel_type name="naf" density="yes">

        <status value="in_progress">
            <meta:comment>Params a,b,c,d,fastNa_shift not yet used in GENESIS...</meta:comment>

            <meta:contributor>
                <meta:name>Padraig Gleeson</meta:name>
            </meta:contributor>
        </status>

        <meta:notes>Fast Sodium transient (inactivating) current. Based on NEURON port of model from Traub et al 2003</meta:notes>

        <meta:authorList>
            <meta:modelAuthor>
                <meta:name>Maciej Lazarewicz</meta:name>
                <meta:comment>Conversion of FORTRAN model to NEURON. See Traub et al 2003 for detailed origin of channels</meta:comment>
            </meta:modelAuthor>
            <meta:modelAuthor>
                <meta:name>Roger D Traub</meta:name>
                <meta:comment>Conversion of FORTRAN model to NEURON. See Traub et al 2003 for detailed origin of channels</meta:comment>
            </meta:modelAuthor>

            <meta:modelTranslator>
                <meta:name>Yoana Dimitrova</meta:name>
                <meta:institution>UCL</meta:institution>
                <meta:email>y.dimitrova - at - ucl.ac.uk</meta:email>
            </meta:modelTranslator>
            <meta:modelTranslator>
                <meta:name>Padraig Gleeson</meta:name>
                <meta:institution>UCL</meta:institution>
                <meta:email>p.gleeson - at - ucl.ac.uk</meta:email>
            </meta:modelTranslator>

        </meta:authorList>

        <meta:publication>
            <meta:fullTitle>Roger D. Traub, Eberhard H. Buhl, Tengis Gloveli, and Miles A. Whittington
Fast Rhythmic Bursting Can Be Induced in Layer 2/3 Cortical Neurons by Enhancing Persistent Na+ Conductance or by Blocking BK Channels
J Neurophysiol 89: 909-921, 2003</meta:fullTitle>
            <meta:pubmedRef>http://www.ncbi.nlm.nih.gov/entrez/query.fcgi?cmd=Retrieve&amp;db=pubmed&amp;dopt=Abstract&amp;list_uids=12574468</meta:pubmedRef>
        </meta:publication>

        <meta:neuronDBref>
            <meta:modelName>Na channels</meta:modelName>
            <meta:uri>http://senselab.med.yale.edu/senselab/NeuronDB/channelGene2.htm#table2</meta:uri>
        </meta:neuronDBref>

        <meta:modelDBref>
            <meta:modelName>Mechanisms of fast rhythmic bursting in a layer 2/3 cortical neuron (Traub et al 2003)</meta:modelName>
            <meta:uri>http://senselab.med.yale.edu/ModelDB/ShowModel.asp?model=20756</meta:uri>
        </meta:modelDBref>

        <parameters>
            <parameter name="fastNa_shift" value ="0"/>
            <parameter name="a" value ="0"/>
            <parameter name="b" value ="0"/>
            <parameter name="c" value ="0"/>
            <parameter name="d" value ="0"/>  <!-- local param d already used in rates -->
        </parameters>

        <current_voltage_relation>
            <ohmic ion="na">
                <conductance default_gmax="187.5">           <!-- phys units: mS/cm2 -->

		            <gate power="3">
                        <state name="m" fraction="1"/>
                    </gate>

                    <gate power="1">
                        <state name="h" fraction="1"/>
                    </gate>

	            </conductance>
            </ohmic>
        </current_voltage_relation>

        <hh_gate state="m">
        <transition>
                <voltage_gate>

                    <initialisation value="0"/> <!-- An incorrect initialisation value for this state variable, in order to match orig mod!!-->

                    <tau>
                        <!--         orig:  if( ( v1 + fastNa_shift ) < -30.0 ) {
                                        mtau = 0.025 + 0.14 * exp( ( ( v1 + fastNa_shift ) + 30 ) / 10 )
                                    } else{
                                        mtau = 0.02 + a + (0.145+ b) * exp( ( - ( v1 + fastNa_shift +d ) - 30 ) / (10+c) )
                                    }  -->

                        <generic_equation_hh expr="( v + fastNa_shift ) &lt; -30.0  ?  0.025 + 0.14 * ( exp ( ((v + fastNa_shift) + 30) / 10.0) ) : 0.02 + a + (0.145+b) * ( exp ( -1 * ((v + fastNa_shift + d) + 30) / (10.0 +c)) )"/>
                    </tau>
                    <inf>
                        <!--          orig: minf  = 1 / ( 1 + exp( ( - ( v1 + fastNa_shift ) - 38 ) / 10 ) ) -->

                        <generic_equation_hh expr=" 1 / ( 1 + (exp ( ( -1 * (v  + fastNa_shift) - 38) / 10.0)) ) "/>
                    </inf>
                </voltage_gate>
            </transition>
        </hh_gate>

        <hh_gate state="h">
            <transition>
                <voltage_gate>
                    <tau>
                        <!--    orig:       htau = 0.15 + 1.15 / ( 1 + exp( ( ( v1 + fastNa_shift * 0 ) + 37 ) / 15 ) ) -->

                        <generic_equation_hh expr="0.15 + 1.15 / ( 1 + ( exp (( ( v + fastNa_shift * 0 ) + 37 ) / 15) ) )"/>
                    </tau>
                    <inf>
                        <!--    orig: hinf       = 1 / ( 1 + exp( ( ( v1 + fastNa_shift * 0 ) + 62.9 ) / 10.7 ) ) -->

                        <generic_equation_hh expr="1 / ( 1 + (exp (( ( v + fastNa_shift * 0 ) + 62.9 ) / 10.7)) )"/>
                    </inf>
                </voltage_gate>
            </transition>
          </hh_gate>

        <impl_prefs>
            <comment>Note: increased max v past Na rev potential</comment>
            <table_settings max_v="140" min_v="-120" table_divisions="1041"/>
        </impl_prefs>

    </channel_type>
</channelml>
