<?xml version="1.0" encoding="UTF-8"?>
<channelml xmlns="http://morphml.org/channelml/schema"
           xmlns:xsi="http://www.w3.org/2001/XMLSchema-instance"
           xmlns:meta="http://morphml.org/metadata/schema"
           xsi:schemaLocation="http://morphml.org/channelml/schema  http://www.neuroml.org/NeuroMLValidator/NeuroMLFiles/Schemata/v1.8.1/Level2/ChannelML_v1.8.1.xsd"
           units="Physiological Units">

    <meta:notes>A channel from Bhalla, U.S.and Bower, J.M. Exploring parameter space in detailed single neuron models:
    simulations of the mitral and granule cells of the olfactory bulb</meta:notes>

    <channel_type name="KCa3_ChannelML_new" density="yes">

        <status value="in_progress">
            <meta:issue>This ChannelML file is intended to replicate the GENESIS functionality of a tabchannel version of Kca_mit_usb </meta:issue>
            <meta:contributor>
                <meta:name>Simon O'Connor</meta:name>
            </meta:contributor>
        </status>

        <meta:notes>Calcium dependent K channel</meta:notes>

        <meta:authorList>
            <meta:modelAuthor>
                <meta:name>Upinder S. Bhalla</meta:name>
                <meta:comment>Cited implementer in original GENESIS implementation</meta:comment>
            </meta:modelAuthor>
            <meta:modelAuthor>
                <meta:name>James M. Bower</meta:name>
                <meta:comment>Cited implementer in original GENESIS implementation</meta:comment>
            </meta:modelAuthor>
            <meta:modelTranslator>
                <meta:name>Simon O'Connor</meta:name>
                <meta:institution>University of Cardiff</meta:institution>
                <meta:email>simon.oconnor@btinternet.com</meta:email>
            </meta:modelTranslator>
            <meta:modelTranslator>
                <meta:name>Padraig Gleeson</meta:name>
                <meta:institution>UCL</meta:institution>
                <meta:email>p.gleeson - at - ucl.ac.uk</meta:email>
            </meta:modelTranslator>
        </meta:authorList>

        <meta:publication>
		<meta:fullTitle>Bhalla, U.S.and Bower, J.M. Exploring parameter space in detailed single neuron models:
    simulations of the mitral and granule cells of the olfactory bulb. J Neurophysiol, Nov 1993; 69: 1948 - 1965</meta:fullTitle>
           <meta:pubmedRef>http://www.ncbi.nlm.nih.gov/entrez/query.fcgi?cmd=Retrieve&amp;db=PubMed&amp;list_uids=7688798&amp;dopt=Abstract</meta:pubmedRef>
        </meta:publication>

        <meta:neuronDBref>
            <meta:modelName>K channels</meta:modelName>
            <meta:uri>http://senselab.med.yale.edu/senselab/NeuronDB/channelGene2.htm#table3</meta:uri>
        </meta:neuronDBref>

        <!-- Using post v1.7.3 preferred ChannelML version-->

        <current_voltage_relation cond_law="ohmic" ion="k" default_gmax="3.6" default_erev="-80">

          <conc_dependence name="Calcium" ion="ca" charge="2" variable_name="ca_conc" min_conc="0" max_conc="1e-8"/>
          <!--<conc_factor  ion="ca" charge="2" variable_name="ca_conc" expr="(500.0*(0.015 - (ca_conc*1e6)))/( (exp ((0.015 - (ca_conc*1e6))/0.0013)) -1)" min_conc="0" max_conc="1e-8"/>-->

          <gate name="m" instances="1">
            <closed_state id="m0"/>
            <open_state id="m" fraction="1"/>

            <transition name="alpha" from="m0" to="m" expr_form="generic" expr="(exp ((v-65)/27))" />
            <transition name="beta" from="m" to="m0" expr_form="generic" expr="0.05" />

          </gate>
          <gate name="z" instances="1">
            <closed_state id="z0"/>
            <open_state id="z" fraction="1"/>

            <transition name="alpha" from="z0" to="z" expr_form="generic" expr="(500.0*(0.015 - (ca_conc*1e6)))/( (exp ((0.015 - (ca_conc*1e6))/0.0013)) -1)" />
            <transition name="beta" from="z" to="z0" expr_form="generic" expr="0.01" />

          </gate>

        </current_voltage_relation>

	<impl_prefs>
		<table_settings max_v="50" min_v="-100" table_divisions="500"/> <!--Smaller table settings as this is a 2D table-->
	</impl_prefs>

    </channel_type>
</channelml>
