<?xml version="1.0" encoding="UTF-8"?>
<channelml xmlns="http://morphml.org/channelml/schema"
    xmlns:xsi="http://www.w3.org/2001/XMLSchema-instance"
    xmlns:meta="http://morphml.org/metadata/schema"
    xsi:schemaLocation="http://morphml.org/channelml/schema http://www.neuroml.org/NeuroMLValidator/NeuroMLFiles/Schemata/v1.8.1/Level2/ChannelML_v1.8.1.xsd"
    units="Physiological Units">

    <meta:notes>ChannelML file containing a single Channel description</meta:notes>

    <channel_type name="kdrmt">

        <status value="stable">
            <meta:comment>...</meta:comment>
            <meta:contributor>
                <meta:name>Padraig Gleeson</meta:name>
            </meta:contributor>
        </status>

        <meta:notes>Delayed rectifier K conductance from Mitral cell model. Comment from original mod file implementation:
        K-DR current for Mitral Cells from Wang et al (1996)
        M.Migliore Jan. 2002</meta:notes>

        <meta:authorList>
            <meta:modelAuthor>
                <meta:name>Michele Migliore</meta:name>
                <meta:comment>Cited implementer according to ModelDB</meta:comment>
            </meta:modelAuthor>
            <meta:modelTranslator>
                <meta:name>Padraig Gleeson</meta:name>
                <meta:institution>UCL</meta:institution>
                <meta:email>p.gleeson - at - ucl.ac.uk</meta:email>
            </meta:modelTranslator>
            <meta:modelTranslator>
                <meta:name>Simon O'Connor</meta:name>
                <meta:institution>University of Cardiff</meta:institution>
                <meta:email>simon.oconnor@btinternet.com</meta:email>
            </meta:modelTranslator>
        </meta:authorList>

        <meta:publication>
            <meta:fullTitle>Migliore M, Shepherd GM (2008) Dendritic action potentials connect distributed dendrodendritic microcircuits J Comp Neurosci 24(2):207-221</meta:fullTitle>
            <meta:pubmedRef>http://www.ncbi.nlm.nih.gov/pubmed/17674173</meta:pubmedRef>
            <meta:comment>Note: this channel has been used in a number of olfactory bulb cell models by Michele Migliore and colleagues</meta:comment>
        </meta:publication>

        <meta:publication>
            <meta:fullTitle>Migliore, M., Hines, M.L., Shepherd, G.M. The Role of Distal Dendritic Gap Junctions in Synchronization of Mitral Cell Axonal Output J.Comput. Neurosci. 18, 151-161, 2005</meta:fullTitle>
	    <meta:pubmedRef>http://www.ncbi.nlm.nih.gov/pubmed/15714267</meta:pubmedRef>
        </meta:publication>

        <meta:neuronDBref>
            <meta:modelName>K channels</meta:modelName>
            <meta:uri>http://senselab.med.yale.edu/senselab/NeuronDB/channelGene2.htm#table3</meta:uri>
        </meta:neuronDBref>

        <meta:modelDBref>
            <meta:modelName>Olfactory bulb mitral and granule cell: dendrodendritic microcircuits (Migliore and Shepherd 2008)</meta:modelName>
            <meta:uri>http://senselab.med.yale.edu/ModelDB/ShowModel.asp?model=97263</meta:uri>
        </meta:modelDBref>

        <parameters>
            <parameter name="zetam" value ="0.055"/>
            <parameter name="vhalfm" value ="-50"/>
            <parameter name="gmm" value ="0.5"/>
            <parameter name="a0m" value ="0.0035"/>
        </parameters>

        <current_voltage_relation cond_law="ohmic" ion="k" default_gmax="36" default_erev="-77.0">

            <q10_settings q10_factor="3" experimental_temp="24"/>

            <gate name="m" instances="1">
                <closed_state id="m0"/>
                <open_state id="m"/>

                <transition name="alpha" from="m0" to="m" expr_form="generic" expr="(exp ( zetam * (v - vhalfm)) )"/>
                <transition name="beta" from="m" to="m0"  expr_form="generic" expr="(exp ( zetam * gmm * (v - vhalfm)) )"/>

                <time_course name="tau" from="m0" to="m" expr_form="generic" expr="beta / ( a0m * (1 + alpha))" />

                <steady_state name="inf" from="m0" to="m" expr_form="generic" expr="1/(1 + (exp ( (v - 21) /(-10) )))" />

            </gate>
        </current_voltage_relation>

    </channel_type>
</channelml>
