<?xml version="1.0" encoding="UTF-8"?>
<channelml xmlns="http://morphml.org/channelml/schema"
    xmlns:xsi="http://www.w3.org/2001/XMLSchema-instance"
    xmlns:meta="http://morphml.org/metadata/schema"
    xsi:schemaLocation="http://morphml.org/channelml/schema  http://www.neuroml.org/NeuroMLValidator/NeuroMLFiles/Schemata/v1.8.0/Level2/ChannelML_v1.8.0.xsd"
    units="Physiological Units">

    <meta:notes>ChannelML file containing a single Channel description</meta:notes>

    <channel_type name="nax" density="yes">

        <status value="stable">
            <meta:comment>...</meta:comment>
            <meta:contributor>
                <meta:name>Padraig Gleeson</meta:name>
            </meta:contributor>
        </status>

        <meta:notes>Na channel for axon. Comment from original mod file: Na current for axon. No slow inact. M.Migliore Jul. 1997,
        added sh to account for higher threshold M.Migliore, Apr.2002</meta:notes>

        <meta:authorList>
            <meta:modelAuthor>
                <meta:name>Michele Migliore</meta:name>
                <meta:comment>Cited implementer according to ModelDB</meta:comment>
            </meta:modelAuthor>
            <meta:modelTranslator>
                <meta:name>Padraig Gleeson</meta:name>
                <meta:institution>UCL</meta:institution>
                <meta:email>p.gleeson - at - ucl.ac.uk</meta:email>
            </meta:modelTranslator>
            <meta:modelTranslator>
                <meta:name>Simon O'Connor</meta:name>
                <meta:institution>University of Cardiff</meta:institution>
                <meta:email>simon.oconnor@btinternet.com</meta:email>
            </meta:modelTranslator>
        </meta:authorList>

        <meta:publication>
            <meta:fullTitle>Migliore M, Shepherd GM (2008) Dendritic action potentials connect distributed dendrodendritic microcircuits J Comp Neurosci 24(2):207-221</meta:fullTitle>
            <meta:pubmedRef>http://www.ncbi.nlm.nih.gov/pubmed/17674173</meta:pubmedRef>
            <meta:comment>Note: this channel has been used in a number of olfactory bulb cell models by Michele Migliore and colleagues</meta:comment>
        </meta:publication>

        <meta:publication>
            <meta:fullTitle>Migliore, M., Hines, M.L., Shepherd, G.M. The Role of Distal Dendritic Gap Junctions in Synchronization of Mitral Cell Axonal Output J.Comput. Neurosci. 18, 151-161, 2005</meta:fullTitle>
	    <meta:pubmedRef>http://www.ncbi.nlm.nih.gov/pubmed/15714267</meta:pubmedRef>
        </meta:publication>

        <meta:publication>
            <meta:fullTitle>Migliore M, Ferrante M, Ascoli GA (2005) Signal propagation in oblique dendrites of CA1 pyramidal cells. J Neurophysiol 94:4145-4155</meta:fullTitle>
            <meta:pubmedRef>http://www.ncbi.nlm.nih.gov/pubmed/16293591</meta:pubmedRef>
            <meta:comment>A very similar Na channel is used in this paper, with a different voltage dependence shift</meta:comment>
        </meta:publication>

        <meta:neuronDBref>
            <meta:modelName>Na channels</meta:modelName>
            <meta:uri>http://senselab.med.yale.edu/senselab/NeuronDB/channelGene2.htm#table2</meta:uri>
        </meta:neuronDBref>

        <meta:modelDBref>
            <meta:modelName>Olfactory bulb mitral and granule cell: dendrodendritic microcircuits (Migliore and Shepherd 2008)</meta:modelName>
            <meta:uri>http://senselab.med.yale.edu/ModelDB/ShowModel.asp?model=97263</meta:uri>
        </meta:modelDBref>

        <parameters>
            <parameter name="sh" value ="5"/>
        </parameters>

        <current_voltage_relation cond_law="ohmic" ion="na" default_gmax="125" default_erev="50">

            <q10_settings q10_factor="2" experimental_temp="24"/>

            <gate name="m" instances="3">
                <closed_state id="m0"/>
                <open_state id="m" fraction="1"/>

                <transition name="alpha" from="m0" to="m" expr_form="exp_linear" rate="2.88" scale="7.2" midpoint="-30+sh" />
                <transition name="beta" from="m" to="m0" expr_form="exp_linear" rate="0.8928" scale="-7.2" midpoint="-30+sh" />

                <time_course name="tau" from="m0" to="m" expr_form="generic" expr="1/( (alpha + beta) * temp_adj_m ) &lt; 0.02 ? (0.02 * temp_adj_m) : 1/(alpha + beta) " />

            </gate>

            <gate name="h" instances="1">
                <closed_state id="h0"/>
                <open_state id="h" fraction="1"/>

                <transition name="alpha" from="h0" to="h" expr_form="exp_linear" rate="0.045" scale="1.5" midpoint="-45+sh" />
                <transition name="beta" from="h" to="h0" expr_form="exp_linear" rate="0.015" scale="-1.5" midpoint="-45+sh" />

                <time_course name="tau" from="h0" to="h" expr_form="generic" expr="1/( (alpha + beta) * temp_adj_h ) &lt; 0.5 ? (0.5 * temp_adj_h) : 1/(alpha + beta) " />
                <steady_state name="inf" from="h0" to="h" expr_form="generic" expr="1/(1 + (exp (((v-(-50))-sh)/4 )) )" />

            </gate>
        </current_voltage_relation>

        <impl_prefs>
            <comment>Suggesting using a large table of precomputed rate equation values since original mod didn't use any table, i.e. used continuous values</comment>
            <table_settings max_v="100" min_v="-100" table_divisions="2000"/>
        </impl_prefs>

    </channel_type>
</channelml>
