<?xml version="1.0" encoding="UTF-8"?>
<neuroml xmlns="http://morphml.org/neuroml/schema"
    xmlns:mml="http://morphml.org/morphml/schema"
    xmlns:meta="http://morphml.org/metadata/schema"
    xmlns:bio="http://morphml.org/biophysics/schema"
    xmlns:cml="http://morphml.org/channelml/schema"
    xmlns:xsi="http://www.w3.org/2001/XMLSchema-instance"
    xsi:schemaLocation="http://morphml.org/neuroml/schema NeuroML_Level2_v1.6.xsd"
    name = "NeuroML Level 2 file exported from NEURON"
    lengthUnits="micron">

<meta:notes>NeuroML Level 2 file generated by NEURON 6.1 ModelViewer
Authors: Michael Hines, Sushil Kambampati and Padraig Gleeson,
Yale University and UCL</meta:notes>

<cells>
  <cell name="Granule_0">
    <meta:notes>Cell: Granule_0 exported from NEURON ModelView</meta:notes>
    <segments  xmlns="http://morphml.org/morphml/schema"> <!-- Changing namespace from neuroml to morphml-->
      <segment id="0" name = "Seg0_soma" cable = "0">
        <proximal x="0" y="0" z="0" diameter="8"/>
        <distal x="0" y="8" z="0" diameter="8"/>
      </segment>
      <segment id="3" name = "Seg0_priden" parent="0" cable = "3">  <!-- Parent section: Granule[0].soma -->
        <proximal x="0" y="8" z="0" diameter="0.5"/>
        <distal x="0" y="158" z="0" diameter="0.5"/>
      </segment>
      <segment id="4" name = "Seg0_priden2_0" parent="3" cable = "4">  <!-- Connected at 0.8 on parent section: Granule[0].priden  -->
        <proximal x="0" y="128" z="0" diameter="0.4"/>
        <distal x="0" y="228" z="0" diameter="0.4"/>
      </segment>
      <segment id="2" name = "Seg0_dend_1" parent="4" cable = "2">  <!-- Connected at 0.5 on parent section: Granule[0].priden2[0]  -->
        <proximal x="0" y="178" z="0" diameter="0.2"/>
        <distal x="1.41421" y="179.414" z="0" diameter="0.2"/>
      </segment>
      <segment id="1" name = "Seg0_dend_0" parent="2" cable = "1">  <!-- Parent section: Granule[0].dend[1] -->
        <proximal x="1.41421" y="179.414" z="0" diameter="1"/>
        <distal x="2.12132" y="180.121" z="0" diameter="1"/>
      </segment>
    </segments>
    <cables  xmlns="http://morphml.org/morphml/schema"> <!-- Changing namespace from neuroml to morphml-->
      <cable id = "0" name = "soma" fractAlongParent = "0"/>
      <cable id = "3" name = "priden">
        <meta:properties>
          <meta:property>
            <meta:tag>numberInternalDivisions</meta:tag>
            <meta:value>10</meta:value>
          </meta:property>
        </meta:properties>
      </cable>
      <cable id = "4" name = "priden2_0" fractAlongParent = "0.8">
        <meta:properties>
          <meta:property>
            <meta:tag>numberInternalDivisions</meta:tag>
            <meta:value>10</meta:value>
          </meta:property>
        </meta:properties>
      </cable>
      <cable id = "2" name = "dend_1" fractAlongParent = "0.5"/>
      <cable id = "1" name = "dend_0"/>
      <cablegroup name="all"> <!-- Replacing subset name ModelViewParmSubset_0 with all, as it contains all sections -->
        <cable id = "0"/>
        <cable id = "3"/>
        <cable id = "4"/>
        <cable id = "2"/>
        <cable id = "1"/>
      </cablegroup>
      <cablegroup name="ModelViewParmSubset_1">
        <cable id = "0"/>
      </cablegroup>
      <cablegroup name="ModelViewParmSubset_2">
        <cable id = "2"/>
        <cable id = "1"/>
      </cablegroup>
      <cablegroup name="ModelViewParmSubset_3">
        <cable id = "0"/>
        <cable id = "3"/>
        <cable id = "4"/>
      </cablegroup>
      <cablegroup name="ModelViewParmSubset_4">
        <cable id = "3"/>
        <cable id = "4"/>
        <cable id = "2"/>
        <cable id = "1"/>
      </cablegroup>
      <cablegroup name="OneSecGrp_SectionRef_1"> <!-- Creating a group containing a single section... -->
        <cable id = "0"/>
      </cablegroup>
      <cablegroup name="OneSecGrp_SectionRef_1"> <!-- Creating a group containing a single section... -->
        <cable id = "0"/>
      </cablegroup>
      <cablegroup name="OneSecGrp_SectionRef_1"> <!-- Creating a group containing a single section... -->
        <cable id = "0"/>
      </cablegroup>
    </cables>
    <biophysics  units = "Physiological Units"> <!-- Note: values of cond dens are different in NEURON and phy units-->
      <bio:mechanism name="pas" type="Channel Mechanism" passiveConductance="true">
        <bio:parameter name="gmax" value="0.0333333">
          <bio:group>ModelViewParmSubset_2</bio:group>
        </bio:parameter>
        <bio:parameter name="gmax" value="0.133333">
          <bio:group>ModelViewParmSubset_3</bio:group>
        </bio:parameter>
        <bio:parameter name="e" value="-65">
          <bio:group>all</bio:group>
        </bio:parameter>
      </bio:mechanism>
      <bio:mechanism name="kamt" type="Channel Mechanism">
        <bio:parameter name="gmax" value="4">
          <bio:group>OneSecGrp_SectionRef_1</bio:group>
        </bio:parameter>
        <bio:parameter name="gmax" value="8">
          <bio:group>ModelViewParmSubset_4</bio:group>
        </bio:parameter>
      </bio:mechanism>
      <bio:mechanism name="kdrmt" type="Channel Mechanism">
        <bio:parameter name="gmax" value="6">
          <bio:group>OneSecGrp_SectionRef_1</bio:group>
        </bio:parameter>
      </bio:mechanism>
      <bio:mechanism name="nax" type="Channel Mechanism">
        <bio:parameter name="sh" value="15">
          <bio:group>all</bio:group>
        </bio:parameter>
        <bio:parameter name="gmax" value="20">
          <bio:group>ModelViewParmSubset_4</bio:group>
        </bio:parameter>
        <bio:parameter name="gmax" value="40">
          <bio:group>OneSecGrp_SectionRef_1</bio:group>
        </bio:parameter>
      </bio:mechanism>
      <bio:specificCapacitance>
        <bio:parameter value="1">
          <bio:group>ModelViewParmSubset_2</bio:group>
        </bio:parameter>
        <bio:parameter value="4">
          <bio:group>ModelViewParmSubset_3</bio:group>
        </bio:parameter>
      </bio:specificCapacitance>
      <bio:specificAxialResistance>
        <bio:parameter value="0.08">
          <bio:group>all</bio:group>
        </bio:parameter>
      </bio:specificAxialResistance>
    </biophysics>
  </cell>
</cells>
</neuroml>
