<?xml version="1.0" encoding="UTF-8"?>
<channelml xmlns="http://morphml.org/channelml/schema" xmlns:xsi="http://www.w3.org/2001/XMLSchema-instance" xmlns:meta="http://morphml.org/metadata/schema" xsi:schemaLocation="http://morphml.org/channelml/schema  ../../Schemata/v1.1/Level2/ChannelML_v1.1.xsd" units="Physiological Units">

    <meta:notes>ChannelML file containing a single Channel description</meta:notes>

    <ion name="k" default_erev="-77.0" charge="1"/>

    <channel_type name="KConductance" density="yes">

        <meta:notes>Simple example of K conductance in squid giant axon. Based on:
        A. L. Hodgkin and A. F. Huxley, A quantitative description of membrane current and its application
        to conduction and excitation in nerve, J. Physiol., vol. 117, pp. 500-544, 1952.</meta:notes>

        <current_voltage_relation>
            <ohmic ion="k">
                <conductance default_gmax="36">
                    <gate power="4">
                        <state name="n" fraction="1">
                            <transition>
                                <voltage_gate>
                                    <alpha>
                                        <parameterised_hh type="linoid" expr="A*(k*v-d)/(1 - exp(-(k*v-d)))">
                                            <parameter name="A" value="0.1"/>
                                            <parameter name="k" value="0.1"/>
                                            <parameter name="d" value="-55"/>
                                        </parameterised_hh>
                                    </alpha>
                                    <beta>
                                        <parameterised_hh type="exponential" expr="A*exp(k*(v-d))">
                                            <parameter name="A" value="0.125"/>
                                            <parameter name="k" value="-0.0125"/>
                                            <parameter name="d" value="-65"/>
                                        </parameterised_hh>
                                    </beta>
                                </voltage_gate>
                            </transition>
                        </state>
                    </gate>
                </conductance>
            </ohmic>
        </current_voltage_relation>
    </channel_type>
</channelml>
