<?xml version="1.0" encoding="UTF-8"?>
<networkml xmlns="http://morphml.org/networkml/schema" xmlns:meta="http://morphml.org/metadata/schema" xmlns:xsi="http://www.w3.org/2001/XMLSchema-instance" xsi:schemaLocation="http://morphml.org/networkml/schema  http://www.morphml.org:8080/NeuroMLValidator/NeuroMLFiles/Schemata/v1.4/Level3/NetworkML_v1.4.xsd" lengthUnits="micron">

<meta:notes>

Network structure for project: RealGCLayer saved with neuroConstruct v1.0.1 on: 18:07:18, 25-Apr-07

Cell Group: GoC_3D contains 32 cells
Cell Group: MF_3D contains 96 cells
Cell Group: GrC_3D contains 600 cells

Network connection: NetConnMFGrC contains 2460 individual synaptic connections
Network connection: NetConnGoCGrC contains 600 individual synaptic connections
Network connection: NetConnGrCGoC contains 2400 individual synaptic connections

</meta:notes>

<meta:properties>
    <meta:property>
        <meta:tag>neuroConstruct_random_seed</meta:tag>
        <meta:value>-411576284</meta:value>
    </meta:property>
    <meta:property>
        <meta:tag>neuroConstruct_sim_config</meta:tag>
        <meta:value>Default Simulation Configuration</meta:value>
    </meta:property>
</meta:properties>

<populations>
    <population name="GoC_3D">
        <cell_type>Golgi_98_3D</cell_type>
        <instances>
            <instance id="0">
                <location x="124.70801" y="31.693232" z="402.62213"/>
            </instance>
            <instance id="1">
                <location x="174.61963" y="26.253092" z="-279.08832"/>
            </instance>
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        </instances>
    </population>
    <population name="MF_3D">
        <cell_type>MossyFiber</cell_type>
        <instances>
            <instance id="0">
                <location x="176.60333" y="10.316971" z="203.70221"/>
            </instance>
            <instance id="1">
                <location x="-218.74828" y="10.132512" z="362.21722"/>
            </instance>
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        </instances>
    </population>
    <population name="GrC_3D">
        <cell_type>Granule_98_3D</cell_type>
        <instances>
            <instance id="0">
                <location x="16.161346" y="37.072857" z="258.9037"/>
            </instance>
            <instance id="1">
                <location x="32.72644" y="19.575258" z="286.31616"/>
            </instance>
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        </instances>
    </population>
</populations>

<projections units="Physiological Units">
    <projection name="NetConnMFGrC">
        <source>MF_3D</source>
        <target>GrC_3D</target>
        <synapse_props>
            <synapse_type>MF_AMPA</synapse_type>
            <default_values internal_delay="0.0" weight="6.0" threshold="-20.0"/>
        </synapse_props>
        <synapse_props>
            <synapse_type>NMDA</synapse_type>
            <default_values internal_delay="0.0" weight="4.0" threshold="-20.0"/>
        </synapse_props>
        <connections>
            <connection id="0">
                <pre cell_id="28" segment_id="0" fraction_along="0.0"/>
                <post cell_id="0" segment_id="0"/>
                <properties prop_delay="0.0" synapse_type="MF_AMPA" internal_delay="0.0" weight="5.6371746"/>
                <properties prop_delay="0.0" synapse_type="NMDA" internal_delay="0.0" weight="4.477705"/>
            </connection>
            <connection id="1">
                <pre cell_id="71" segment_id="0" fraction_along="0.0"/>
                <post cell_id="0" segment_id="0"/>
                <properties prop_delay="0.0" synapse_type="MF_AMPA" internal_delay="0.0" weight="5.201861"/>
                <properties prop_delay="0.0" synapse_type="NMDA" internal_delay="0.0" weight="4.271119"/>
            </connection>
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        </connections>
    </projection>
    <projection name="NetConnGoCGrC">
        <source>GoC_3D</source>
        <target>GrC_3D</target>
        <synapse_props>
            <synapse_type>GABAA</synapse_type>
            <default_values internal_delay="0.0" weight="45.0" threshold="-20.0"/>
        </synapse_props>
        <connections>
            <connection id="0">
                <pre cell_id="2" segment_id="0" fraction_along="0.5"/>
                <post cell_id="0" segment_id="0"/>
                <properties prop_delay="0.0" internal_delay="0.0" weight="41.716873"/>
            </connection>
            <connection id="1">
                <pre cell_id="2" segment_id="0" fraction_along="0.5"/>
                <post cell_id="1" segment_id="0"/>
                <properties prop_delay="0.0" internal_delay="0.0" weight="48.857197"/>
            </connection>
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        </connections>
    </projection>
    <projection name="NetConnGrCGoC">
        <source>GrC_3D</source>
        <target>GoC_3D</target>
        <synapse_props>
            <synapse_type>AMPA_GranGol</synapse_type>
            <default_values internal_delay="0.0" weight="0.6" threshold="-20.0"/>
        </synapse_props>
        <connections>
            <connection id="0">
                <pre cell_id="0" segment_id="2" fraction_along="0.6333864"/>
                <post cell_id="5" segment_id="3" fraction_along="0.7764442"/>
                <properties prop_delay="0.0" internal_delay="0.0" weight="0.5172062"/>
            </connection>
            <connection id="1">
                <pre cell_id="0" segment_id="2" fraction_along="0.7025955"/>
                <post cell_id="4" segment_id="3" fraction_along="0.06409401"/>
                <properties prop_delay="0.0" internal_delay="0.0" weight="0.53156716"/>
            </connection>
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        </connections>
    </projection>
</projections>
</networkml>
