// SBML level 2 version 1

model Izhikevich()
  // Izhikevich2003_SpikingNeuron
  // ##Model modified slightly by P. Gleeson from Biomodels#### The model is according to the paper Simple Model of Spiking Neurons In this paper, a simple spiking model is presented that is as biologically plausible as the Hodgkin-Huxley model, yet as computationally efficient as the integrate-and-fire model. Known types of neurons correspond to different values of the parameters a,b,c,d in the model. Figure2RS,IB,CH,FS,LTS have been simulated by MathSBML.
  // RS: a=0.02, b=0.2, c=-65, d=8.
  // IB: a=0.02,b=0.2,c=-55,d=4
  // CH: a=0.02,b=0.2,c=-50,d=2
  // FS:a=0.1b=0.2c=-65,d=2
  // LTS:a=0.02,b=0.25,c=-65,d=2
  // This model originates from BioModels Database: A Database of Annotated Published Models. It is copyright (c) 2005-2010 The BioModels Team.
  // For more information see the terms of use.
  // To cite BioModels Database, please use Le Novère N., Bornstein B., Broicher A., Courtot M., Donizelli M., Dharuri H., Li L., Sauro H., Schilstra M., Shapiro B., Snoep J.L., Hucka M. (2006) BioModels Database: A Free, Centralized Database of Curated, Published, Quantitative Kinetic Models of Biochemical and Cellular Systems Nucleic Acids Res., 34: D689-D691.
  // biomodels.db:BIOMD0000000127
  // biomodels.db:MODEL4880479792
  // isDescribedBy pubmed:18244602
  // isVersionOf GO:0001508 GO:0042391 GO:0019228
  // taxonomy:40674
  // isDescribedBy doi:10.1109%2FTNN.2003.820440

  // Compartments:
  compartment cell = 1;  // isVersionOf GO:0005623

  // Parameters:
  a = 0.02;
  b = 0.2;
  c = -65;
  d = 8;
  Vthresh = 30;
  i_amp = 10;
  i_del = 10;
  i = 0;
  vv = -70;
  U = -14;

  // Rate rules:
  vv' = 0.04*vv^2 + 5*vv + 140 - U + i;
  U' = a*(b*vv - U);

  // Events:
  event_0000001: at (vv > Vthresh): vv = c, U = U + d;  // isVersionOf GO:0030322 GO:0060075
  Stimulus: at (time > i_del): i = i_amp;  // isVersionOf GO:0050981

  // Unit definitions:
  unit time = 1e-3 second; time is "ms";
  unit mV = 1e-3 volt;
end
