// SBML level 2 version 2

model KChan_SBML()
  // Simple test SBML script replicating HH K Channel. Based on K chan in BIOMD0000000020 - Hodgkin-Huxley1952 squid-axon

  // Compartments:
  compartment cell = 1;

  // Parameters:
  erev = -77;
  v = -70;
  n = 0;
  gmax = 0.036;
  4AP_tgt = 0;

  // Assignment rules:
  i := gmax*n^4*(v - erev);
  // beta_n = 0.125 * exp[v - [-65] / 80.0]
  beta_n := 0.125*exp((v - (-65))/(-80));
  // alpha_n = 0.01 * (v - [-55])/(1 - exp[(v - [-55]) / -10])
  alpha_n := 0.01*(v - (-55))/(1 - exp((v - (-55))/(-10)));

  // Rate rules:
  // dn/dt = alpha_n * (1.0 - n) - beta_n * n
  n' = alpha_n*(1 - n) - beta_n*n;
end
