// SBML level 2 version 1

model Marhl_Calcium_Oscillations()
  // Marhl2000_CaOscillations
  // In order to reproduce the model, the volume of all compartment is set to 1, and the stoichiometry of CaER and CaM has been set to 0.25, corresponding to betaER/rhoER and betaM/rhoM described in the paper.
  // This model originates from BioModels Database: A Database of Annotated Published Models. It is copyright (c) 2005-2009 The BioModels Team.
  // For more information see the terms of use.
  // To cite BioModels Database, please use Le Novère N., Bornstein B., Broicher A., Courtot M., Donizelli M., Dharuri H., Li L., Sauro H., Schilstra M., Shapiro B., Snoep J.L., Hucka M. (2006) BioModels Database: A Free, Centralized Database of Curated, Published, Quantitative Kinetic Models of Biochemical and Cellular Systems Nucleic Acids Res., 34: D689-D691.
  // Note from P Gleeson: on import to neuroConstruct, id of model shortened as NEURON didn't like long name
  // biomodels.db:BIOMD0000000039
  // isDescribedBy pubmed:11004387
  // taxonomy:8355 kegg.pathway:hsa04020 GO:0019722 GO:0048016

  // Compartments:
  compartment Cytosol = 1;  // GO:0005829
  compartment Endoplasmic_Reticulum in Cytosol = 1;  // GO:0005790
  compartment Mitochondria in Cytosol = 1;  // GO:0005739

  // Species:
  species Ca_cyt in Cytosol = 0.35;  // CHEBI:29108
  species CaER in Endoplasmic_Reticulum = 0.76;  // CHEBI:29108
  species CaM in Mitochondria = 0.29;  // CHEBI:29108
  species CaPr in Cytosol = 85.45;  // hasPart CHEBI:29108 kegg.compound:C00017
  species Pr in Cytosol = 34.55;  // isVersionOf kegg.compound:C00017

  // Reactions:
  Jch: 0.25 CaER => Ca_cyt; Cytosol*(Kch*Ca_cyt^2*(CaER - Ca_cyt)/(K1^2 + Ca_cyt^2));  // isVersionOf GO:0006816 GO:0051482
    Kch = 4100; K1 = 5;
  Jleak: 0.25 CaER => Ca_cyt; Cytosol*Kleak*(CaER - Ca_cyt);  // isVersionOf GO:0007204 GO:0006816
    Kleak = 0.05;
  Jpump: Ca_cyt => 0.25 CaER; Endoplasmic_Reticulum*Kpump*Ca_cyt;  // isVersionOf GO:0006816 GO:0051481
    Kpump = 20;
  Jout: 0.25 CaM => Ca_cyt; Cytosol*CaM*(Kout*Ca_cyt^2/(K3^2 + Ca_cyt^2) + Km);  // GO:0007204 GO:0006816
    Kout = 125; K3 = 5; Km = 0.00625;
  Jin: Ca_cyt => 0.25 CaM; Mitochondria*(Kin*Ca_cyt^8/(K2^8 + Ca_cyt^8));  // isVersionOf GO:0051481 GO:0006816
    Kin = 300; K2 = 0.8;
  dissociation_of_CaPr: CaPr => Pr + Ca_cyt; Cytosol*Kminus*CaPr;  // isVersionOf GO:0007204
    Kminus = 0.01;
  binding_of_Ca_on_Pr: Pr + Ca_cyt => CaPr; Cytosol*Kplus*Ca_cyt*Pr;  // isVersionOf GO:0005509 GO:0051481
    Kplus = 0.1;

  // Unit definitions:
  unit substance = 1e-6 mole; substance is "micromole (default)";
end
