<?xml version="1.0" encoding="UTF-8"?>
<channelml xmlns="http://morphml.org/channelml/schema" xmlns:xsi="http://www.w3.org/2001/XMLSchema-instance" xmlns:meta="http://morphml.org/metadata/schema" xsi:schemaLocation="http://morphml.org/channelml/schema    http://localhost:8084/NeuroMLValidator/NeuroMLFiles/Schemata/v1.8.1/Level2/ChannelML_v1.8.1.xsd" units="Physiological Units">

    <meta:notes>ChannelML file describing a plastic synaptic mechanism</meta:notes>

    <synapse_type name="STDPSynapse2">

        <status value="in_progress">
            <meta:comment>In development, structure subject to change!</meta:comment>
            <meta:contributor>
                <meta:name>Padraig Gleeson</meta:name>
            </meta:contributor>
        </status>

        <meta:notes>Example of a synaptic mechanism incorporating spike timing dependent plasticity</meta:notes>

        <stdp_syn max_conductance="2E-7" rise_time="0" decay_time="5" reversal_potential="0">

             <spike_time_dep tau_ltp="20" del_weight_ltp="0.01" tau_ltd="20" del_weight_ltd="0.0105" max_syn_weight="2" post_spike_thresh="-50"/>

        </stdp_syn>

    </synapse_type>

</channelml>
