<?xml version="1.0" encoding="UTF-8"?>

<channelml xmlns="http://morphml.org/channelml/schema"
    xmlns:xsi="http://www.w3.org/2001/XMLSchema-instance"
    xmlns:meta="http://morphml.org/metadata/schema"
    xsi:schemaLocation="http://morphml.org/channelml/schema  http://www.neuroml.org/NeuroMLValidator/NeuroMLFiles/Schemata/v1.8.1/Level2/ChannelML_v1.8.1.xsd"
    units="Physiological Units">

  <meta:notes>Internal calcium concentration due to calcium currents and pump from Solinas et al 2007</meta:notes>

    <ion name="ca" charge="2" role="SignallingSubstance">
        <meta:notes>Signifies that the ion is involved in a process which alters its concentration</meta:notes>
    </ion>

    <ion_concentration name="Golgi_CALC_CML">

        <status value="in_progress">
                <meta:comment>Different method used for calculating submembrane shell volume</meta:comment>
                <meta:contributor>
                <meta:name>Matteo Farinella</meta:name>
            </meta:contributor>
        </status>

        <meta:notes>Calcium first order kinetics
   </meta:notes>

        <meta:authorList>
             <meta:modelAuthor>
                <meta:name>A.Fontana</meta:name>
                <meta:institution/>
                <meta:comment/>
            </meta:modelAuthor>

            <meta:modelTranslator>
                <meta:name>Matteo Farinella</meta:name>
                <meta:institution>UCL</meta:institution>
                <meta:email>m.farinella - at - ucl.ac.uk</meta:email>
            </meta:modelTranslator>
        </meta:authorList>

        <ion_species name="ca"/>

        <decaying_pool_model resting_conc ="5e-11" decay_constant="0.769231">

            <pool_volume_info shell_thickness = "2.0748e-5"/>

        </decaying_pool_model>

    </ion_concentration>
</channelml>
