<?xml version="1.0" encoding="UTF-8"?>
<channelml xmlns="http://morphml.org/channelml/schema" xmlns:xsi="http://www.w3.org/2001/XMLSchema-instance" xmlns:meta="http://morphml.org/metadata/schema" xsi:schemaLocation="http://morphml.org/channelml/schema  ../../Schemata/v1.7.3/Level2/ChannelML_v1.7.3.xsd" units="Physiological Units">

    <meta:notes>ChannelML file containing a single Channel description</meta:notes>

    <channel_type name="NaR_CML" density="yes">

        <status value="in_progress">

	        </status>

	        <meta:notes>Na channel</meta:notes>

	        <meta:authorList>
	            <meta:modelTranslator>
	                <meta:name>Padraig Gleeson</meta:name>
	                <meta:institution>UCL</meta:institution>
	                <meta:email>p.gleeson - at - ucl.ac.uk</meta:email>
	            </meta:modelTranslator>
	        </meta:authorList>

	            <!--

	        <meta:publication>
	           <meta:fullTitle>Maex, R and De Schutter, E.
	           Synchronization of Golgi and Granule Cell Firing in a Detailed Network Model of the
	           cerebellar Granule Cell Layer. J Neurophysiol, Nov 1998; 80: 2521 - 2537</meta:fullTitle>
	           <meta:pubmedRef>http://www.ncbi.nlm.nih.gov/entrez/query.fcgi?cmd=Retrieve&amp;db=PubMed&amp;list_uids=9819260&amp;dopt=Abstract</meta:pubmedRef>
	        </meta:publication>

	        <meta:neuronDBref>
	            <meta:modelName>K channels</meta:modelName>
	            <meta:uri>http://senselab.med.yale.edu/senselab/NeuronDB/channelGene2.htm#table3</meta:uri>
	        </meta:neuronDBref>

	        -->

	        <current_voltage_relation cond_law="ohmic" ion="na" default_gmax="0.17" default_erev="-85">

	            <q10_settings q10_factor="3" experimental_temp="20"/>

	                <!--
	                : s-ALFA
			Aalpha_s = -0.00493 (/ms)
			V0alpha_s = -4.48754 (mV)
			Kalpha_s = -6.81881 (mV)
			Shiftalpha_s = 0.00008 (/ms)

			alp_s = tcorr*(Shiftalpha_s+Aalpha_s*((v+V0alpha_s)/1 )/(exp((v+V0alpha_s)/Kalpha_s)-1))

			alp_s = -Aalpha_s*(-Kalpha_s) *((v+(-V0alpha_s))/ -Kalpha_s)/(1 - exp((v+(-V0alpha_s))/-Kalpha_s))

			: s-BETA
			Abeta_s = 0.01558 (/ms)
			V0beta_s = 43.97494 (mV)
			Kbeta_s =  0.10818 (mV)
			Shiftbeta_s = 0.04752 (/ms)

			bet_s =tcorr*(Shiftbeta_s+Abeta_s*((v+V0beta_s)/1  )/(exp((v+V0beta_s)/Kbeta_s)-1))

			: f-ALFA
			Aalpha_f = 0.31836 (/ms)
			V0alpha_f = -80 (mV)
			Kalpha_f = -62.52621 (mV)

			alp_f =	tcorr * Aalpha_f * exp( ( v - V0alpha_f ) / Kalpha_f)

			alp_f = Aalpha_f * exp( ( v - V0alpha_f ) / Kalpha_f)

			: f-BETA
			Abeta_f = 0.01014 (/ms)
			V0beta_f = -83.3332 (mV)
			Kbeta_f = 16.05379 (mV)

			bet_f =	tcorr * Abeta_f * exp( ( v - V0beta_f ) / Kbeta_f )

			CML expressions:

			beta = A * exp((v-V1/2)/B)   (exponential)

			alpha =  A * ((v-V1/2)/B)  / (1 - exp(-(v-V1/2)/B))  (exp_linear)

	                -->

            <gate name="s" instances="1">
                <closed_state id="s0"/>
                <open_state id="s"/>

		<!--
                <transition name="alpha" from="s0" to="s" expr_form="exp_linear" rate="0.0336167333" scale="6.81881" midpoint="4.48754"/>
                <transition name="beta" from="s" to="s0" expr_form="exp_linear" rate="0.0016854444" scale="-0.10818" midpoint="-43.97494"/>
                -->

                <transition name="alpha" from="s0" to="s" expr_form="generic" expr=" 0.00008 + 0.0336167333 * ((v-4.48754)/6.81881)  / (1 - exp(-(v-4.48754)/6.81881))"/>
                <transition name="beta" from="s" to="s0" expr_form="generic" expr=" 0.04752 + 0.0016854444 * ((v+43.97494)/-0.10818)  / (1 - exp(-(v+43.97494)/-0.10818))"/>

            </gate>

	    <gate name="f" instances="1">
		<closed_state id="f0"/>
		<open_state   id="f"/>

		<transition name="alpha" from="f0" to="f" expr_form="exponential" rate="0.31836" scale="-62.52621" midpoint="-80"/>
		<transition name="beta"  from="f" to="f0" expr_form="exponential" rate="0.01014" scale="16.05379" midpoint="-83.3332"/>
            </gate>

        </current_voltage_relation>

        <impl_prefs>
			    <table_settings max_v="30" min_v="-100" table_divisions="13000"/>
	</impl_prefs>

    </channel_type>
</channelml>
