<?xml version="1.0" encoding="UTF-8"?>
<channelml xmlns="http://morphml.org/channelml/schema" xmlns:xsi="http://www.w3.org/2001/XMLSchema-instance" xmlns:meta="http://morphml.org/metadata/schema" xsi:schemaLocation="http://morphml.org/channelml/schema  ../../Schemata/v1.7.2/Level2/ChannelML_v1.7.2.xsd" units="Physiological Units">

    <meta:notes>Example of 5 state kinetic scheme K conductance specified in ChannelML.
    Based on Michael Hines's initial proposal.</meta:notes>

    <ion name="k" default_erev="-77.0" charge="1"/>      <!-- phys units: mV -->

    <channel_type name="KChannelKS" density="yes">

        <meta:notes>K conductance with 5 kinetic states. NOTE: this only maps successfully on to the NEURON Channel Builder format!</meta:notes>

        <current_voltage_relation>
            <ohmic ion="k">
                <conductance default_gmax="36">      <!-- phys units: mS/cm2-->

                    <gate power="1">
                        <state name="n" fraction="1"/>
                    </gate>
                </conductance>
            </ohmic>
        </current_voltage_relation>

        <ks_gate>
            <state name="n0"/>
            <state name="n1"/>
            <state name="n2"/>
            <state name="n3"/>
            <state name="n"/>
            <transition source="n0" target="n1">
                <voltage_gate>
                    <alpha>
                        <parameterised_hh type="linoid">     <!-- Form of equation: A*(k*(v-d)) / (1 - exp(-(k*(v-d)))) -->

                            <parameter name="A" value="0.4"/>
                            <parameter name="k" value="0.1"/>
                            <parameter name="d" value="-55"/>
                        </parameterised_hh>
                    </alpha>
                    <beta>
                        <parameterised_hh type="exponential">      <!-- Form of equation: A*exp(k*(v-d)) -->

                            <parameter name="A" value="0.125"/>
                            <parameter name="k" value="-0.0125"/>
                            <parameter name="d" value="-65"/>
                        </parameterised_hh>
                    </beta>
                </voltage_gate>
            </transition>
            <transition source="n1" target="n2">
                <voltage_gate>
                    <alpha>
                        <parameterised_hh type="linoid">     <!-- Form of equation: A*(k*(v-d)) / (1 - exp(-(k*(v-d)))) -->

                            <parameter name="A" value="0.3"/>
                            <parameter name="k" value="0.1"/>
                            <parameter name="d" value="-55"/>
                        </parameterised_hh>
                    </alpha>
                    <beta>
                        <parameterised_hh type="exponential">      <!-- Form of equation: A*exp(k*(v-d)) -->

                            <parameter name="A" value="0.25"/>
                            <parameter name="k" value="-0.0125"/>
                            <parameter name="d" value="-65"/>
                        </parameterised_hh>
                    </beta>
                </voltage_gate>
            </transition>
            <transition source="n2" target="n3">
                <voltage_gate>
                    <alpha>
                        <parameterised_hh type="linoid">     <!-- Form of equation: A*(k*(v-d)) / (1 - exp(-(k*(v-d)))) -->

                            <parameter name="A" value="0.2"/>
                            <parameter name="k" value="0.1"/>
                            <parameter name="d" value="-55"/>
                        </parameterised_hh>
                    </alpha>
                    <beta>
                        <parameterised_hh type="exponential">      <!-- Form of equation: A*exp(k*(v-d)) -->

                            <parameter name="A" value="0.375"/>
                            <parameter name="k" value="-0.0125"/>
                            <parameter name="d" value="-65"/>
                        </parameterised_hh>
                    </beta>
                </voltage_gate>
            </transition>
            <transition source="n3" target="n">
                <voltage_gate>
                    <alpha>
                        <parameterised_hh type="linoid">     <!-- Form of equation: A*(k*(v-d)) / (1 - exp(-(k*(v-d)))) -->

                            <parameter name="A" value="0.1"/>
                            <parameter name="k" value="0.1"/>
                            <parameter name="d" value="-55"/>
                        </parameterised_hh>
                    </alpha>
                    <beta>
                        <parameterised_hh type="exponential">      <!-- Form of equation: A*exp(k*(v-d)) -->

                            <parameter name="A" value="0.5"/>
                            <parameter name="k" value="-0.0125"/>
                            <parameter name="d" value="-65"/>
                        </parameterised_hh>
                    </beta>
                </voltage_gate>
            </transition>
        </ks_gate>

    </channel_type>

</channelml>
