<?xml version="1.0" encoding="UTF-8"?>
<channelml xmlns="http://morphml.org/channelml/schema" xmlns:xsi="http://www.w3.org/2001/XMLSchema-instance" xmlns:meta="http://morphml.org/metadata/schema" xsi:schemaLocation="http://morphml.org/channelml/schema ../../Schemata/v1.8.2/Level2/ChannelML_v1.8.2.xsd" units="Physiological Units">

    <channel_type name="Ktab_voltageOnly">

        <status value="stable">
        </status>
        <current_voltage_relation cond_law="ohmic" ion="k" default_gmax="332e-9" default_erev="-75">

                <!-- NOTE: Ca dependence removed temporarily! -->

                <!--<conc_factor  ion="ca" charge="2" variable_name="ca_conc" expr="ca_conc &lt; 0.00025 ? (ca_conc / 0.00025) : 1" min_conc="0" max_conc="0.001"/>-->

            <gate name="n" instances="1">
                <closed_state id="n0"/>
                <open_state id="n"/>

                <transition name="alpha" from="n0" to="n" expr_form="tabulated">
		   <table xmin="-0.1" xmax="0.05">
			<entry value="3.13116"/>
			<entry value="3.69253"/>
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		   </table>
		</transition>
                <transition name="beta" from="n" to="n0" expr_form="tabulated">
                    <table xmin="-0.1" xmax="0.05">
			<entry value="11190.7"/>
			<entry value="9990.33"/>
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		    </table>
		</transition>
            </gate>
	         <!--
	    <gate name="m" instances="1" x_variable="concentration">
                <closed_state id="m0"/>
                <open_state id="m"/>

                <transition name="alpha" from="m0" to="m" expr_form="tabulated" >
		   <table xmin = "0.0" xmax = "1000">
			<entry value="0"/>
			<entry value="0.08"/>
			<entry value="0.16"/>
			<entry value="0.24"/>
			<entry value="0.32"/>
			<entry value="0.4"/>
			<entry value="0.48"/>
			<entry value="0.56"/>
			<entry value="0.64"/>
			<entry value="0.72"/>
			<entry value="0.8"/>
			<entry value="0.88"/>
			<entry value="0.96"/>
			<entry value="1"/>
			<entry value="1"/>
			<entry value="1"/>
			<entry value="1"/>
			<entry value="1"/>
			<entry value="1"/>
			<entry value="1"/>
			<entry value="1"/>
			<entry value="1"/>
			<entry value="1"/>
			<entry value="1"/>
			<entry value="1"/>
			<entry value="1"/>
			<entry value="1"/>
			<entry value="1"/>
			<entry value="1"/>
			<entry value="1"/>
			<entry value="1"/>
			<entry value="1"/>
			<entry value="1"/>
			<entry value="1"/>
			<entry value="1"/>
			<entry value="1"/>
			<entry value="1"/>
			<entry value="1"/>
			<entry value="1"/>
			<entry value="1"/>
			<entry value="1"/>
			<entry value="1"/>
			<entry value="1"/>
			<entry value="1"/>
			<entry value="1"/>
			<entry value="1"/>
			<entry value="1"/>
			<entry value="1"/>
			<entry value="1"/>
			<entry value="1"/>
			<entry value="1"/>

		   </table>
		</transition>
                <transition name="beta" from="m" to="m0" expr_form="tabulated" >
                    <table xmin = "0.0" xmax = "1000">
			<entry value="1"/>
			<entry value="0.92"/>
			<entry value="0.84"/>
			<entry value="0.76"/>
			<entry value="0.68"/>
			<entry value="0.6"/>
			<entry value="0.52"/>
			<entry value="0.44"/>
			<entry value="0.36"/>
			<entry value="0.28"/>
			<entry value="0.2"/>
			<entry value="0.12"/>
			<entry value="0.04"/>
			<entry value="0"/>
			<entry value="0"/>
			<entry value="0"/>
			<entry value="0"/>
			<entry value="0"/>
			<entry value="0"/>
			<entry value="0"/>
			<entry value="0"/>
			<entry value="0"/>
			<entry value="0"/>
			<entry value="0"/>
			<entry value="0"/>
			<entry value="0"/>
			<entry value="0"/>
			<entry value="0"/>
			<entry value="0"/>
			<entry value="0"/>
			<entry value="0"/>
			<entry value="0"/>
			<entry value="0"/>
			<entry value="0"/>
			<entry value="0"/>
			<entry value="0"/>
			<entry value="0"/>
			<entry value="0"/>
			<entry value="0"/>
			<entry value="0"/>
			<entry value="0"/>
			<entry value="0"/>
			<entry value="0"/>
			<entry value="0"/>
			<entry value="0"/>
			<entry value="0"/>
			<entry value="0"/>
			<entry value="0"/>
			<entry value="0"/>
			<entry value="0"/>
			<entry value="0"/>
		    </table>
		</transition>
            </gate>-->

        </current_voltage_relation>

    </channel_type>
</channelml>
