<?xml version="1.0" encoding="UTF-8"?>
<channelml xmlns="http://morphml.org/channelml/schema"
           xmlns:xsi="http://www.w3.org/2001/XMLSchema-instance"
           xmlns:meta="http://morphml.org/metadata/schema"
           xsi:schemaLocation="http://morphml.org/channelml/schema   http://www.neuroml.org/NeuroMLValidator/NeuroMLFiles/Schemata/v1.8.1/Level2/ChannelML_v1.8.1.xsd"
           units="Physiological Units">

    <meta:notes>A channel originally from Maex, R and De Schutter, E. 1998, used in Berends et al 2005</meta:notes>

	<ion name="k" charge="1" default_erev="-84.7">
		<meta:notes>Using rev pot from D'Angelo et al 2001</meta:notes>
    </ion>

    <channel_type name="KA" density="yes">

      <status value="stable">
            <meta:issue>Missing temp varying Q10 info which had been in MDeS 98</meta:issue>
            <meta:issue>minf and hinf are multiplied by the q10 factor in orig mods! (Reflected here with 5* inc in A values)</meta:issue>
            <meta:issue>tau expressions multiplied by Q10 factor (5) instead of divided by it. Factor of 25 introduced in taus to fix this</meta:issue>
            <meta:issue>See note on tau expression for h gate regarding shift</meta:issue>
            <meta:contributor>
                <meta:name>Padraig Gleeson</meta:name>
            </meta:contributor>
        </status>

        <meta:notes>A type K+ channel, with rate equations expressed in tau and inf form.</meta:notes>

        <meta:authorList>
          <meta:modelTranslator>
            <meta:name>Padraig Gleeson</meta:name>
            <meta:institution>UCL</meta:institution>
            <meta:email>p.gleeson - at - ucl.ac.uk</meta:email>
          </meta:modelTranslator>
        </meta:authorList>

        <meta:publication>
           <meta:fullTitle>Maex, R and De Schutter, E.
           Synchronization of Golgi and Granule Cell Firing in a Detailed Network Model of the
           cerebellar Granule Cell Layer. J Neurophysiol, Nov 1998; 80: 2521 - 2537</meta:fullTitle>
           <meta:pubmedRef>http://www.ncbi.nlm.nih.gov/entrez/query.fcgi?cmd=Retrieve&amp;db=PubMed&amp;list_uids=9819260&amp;dopt=Abstract</meta:pubmedRef>
        </meta:publication>

        <meta:publication>
            <meta:fullTitle>Berends, Michiel, Maex, Reinoud, De Schutter, Erik.
            The Effect of NMDA Receptors on Gain Modulation.
            Neural Comp. 2005 17: 2531-2547</meta:fullTitle>
          <meta:pubmedRef>http://www.ncbi.nlm.nih.gov/entrez/query.fcgi?cmd=Retrieve&amp;db=PubMed&amp;list_uids=16212761&amp;dopt=Abstract</meta:pubmedRef>
        </meta:publication>

        <meta:neuronDBref>
            <meta:modelName>K channels</meta:modelName>
            <meta:uri>http://senselab.med.yale.edu/senselab/NeuronDB/channelGene2.htm#table3</meta:uri>
        </meta:neuronDBref>

        <current_voltage_relation>
            <ohmic ion="k">
                <conductance default_gmax="4">
                    <rate_adjustments>
                        <q10_settings fixed_q10="5" experimental_temp="37"/> <!-- Note channel should only be used at 37 deg C!-->
                        <offset value="10"/>
                    </rate_adjustments>
                    <gate power="3">
                        <state name="m" fraction="1"/>
                    </gate>
                    <gate power="1">
                        <state name="h" fraction="1"/>
                    </gate>
                </conductance>
            </ohmic>
        </current_voltage_relation>

        <hh_gate state="m">
            <transition>
                <voltage_gate>
                    <tau>
                      <generic_equation_hh expr="25*(0.082 * ((exp (( ((v) + 43.5) / (-42.8))))) + 0.0334)"/>
                    </tau>
                    <inf>
                        <parameterised_hh type="sigmoid">
                          <parameter name="A" value="1"/>
                            <parameter name="k" value="-0.050505051"/>
                            <parameter name="d" value="-46.7"/>
                        </parameterised_hh>
                    </inf>
                </voltage_gate>
            </transition>
        </hh_gate>

        <hh_gate state="h">
            <transition>
                <voltage_gate>
                    <tau>
                      <meta:notes>Original line in mod: tau_h = TC*(2.16+0.006*v+(0.2/(57.9*exp(0.127*v)+0.000134*exp(-0.059*v))))
                      Note: this doesn't explicitly include the 'shift', so adding it on again here.
                      This should be cleared up before using the channel on any other cell!</meta:notes>
                      <generic_equation_hh expr="25*(2.16 + (0.006 * (v+10))  + (0.2 / (57.9 * (exp ((v+10) *0.127)) + (134e-6 * (exp ((v+10) * -0.059))))))"/>
                    </tau>
                    <inf>
                        <parameterised_hh type="sigmoid">
                          <parameter name="A" value="1"/>
                            <parameter name="k" value="0.119047619"/>
                            <parameter name="d" value="-78.8"/>
                        </parameterised_hh>
                    </inf>
                </voltage_gate>
            </transition>
        </hh_gate>

        <impl_prefs>
            <table_settings max_v="100" min_v="-100" table_divisions="200"/>
        </impl_prefs>

    </channel_type>
</channelml>
