<?xml version="1.0" encoding="UTF-8"?>
<channelml xmlns="http://morphml.org/channelml/schema"
    xmlns:xsi="http://www.w3.org/2001/XMLSchema-instance"
    xmlns:meta="http://morphml.org/metadata/schema"
    xsi:schemaLocation="http://morphml.org/channelml/schema  http://www.neuroml.org/NeuroMLValidator/NeuroMLFiles/Schemata/v1.8.1/Level2/ChannelML_v1.8.1.xsd"
    units="Physiological Units">

    <meta:notes>A channel from a granule cell model developed by Volker Steuber and Chiara Saviane, originally from Maex, R and De Schutter, E. 1998</meta:notes>

    <channel_type name="KCa">

        <status value="stable">
            <meta:comment>From original mod: Based on MS(98)</meta:comment>
            <meta:issue>From original mod: The special Borg-Graham minimum time constants have to be implemented
: Parameters should be made accessible from hoc
: Use of cac instead of ca to prevent any misunderstanding</meta:issue>
            <meta:contributor>
                <meta:name>Padraig Gleeson</meta:name>
            </meta:contributor>
        </status>

        <meta:notes>Calcium dependent K channel</meta:notes>

        <meta:authorList>
            <meta:modelAuthor>
                <meta:name>Volker Steuber</meta:name>
            </meta:modelAuthor>
            <meta:modelAuthor>
                <meta:name>Chiara Saviane</meta:name>
            </meta:modelAuthor>
          <meta:modelTranslator>
            <meta:name>Padraig Gleeson</meta:name>
            <meta:institution>UCL</meta:institution>
            <meta:email>p.gleeson - at - ucl.ac.uk</meta:email>
          </meta:modelTranslator>
        </meta:authorList>

        <meta:publication>
           <meta:fullTitle>Maex, R and De Schutter, E.
           Synchronization of Golgi and Granule Cell Firing in a Detailed Network Model of the
           cerebellar Granule Cell Layer. J Neurophysiol, Nov 1998; 80: 2521 - 2537</meta:fullTitle>
           <meta:pubmedRef>http://www.ncbi.nlm.nih.gov/entrez/query.fcgi?cmd=Retrieve&amp;db=PubMed&amp;list_uids=9819260&amp;dopt=Abstract</meta:pubmedRef>
        </meta:publication>

        <meta:neuronDBref>
            <meta:modelName>K channels</meta:modelName>
            <meta:uri>http://senselab.med.yale.edu/senselab/NeuronDB/channelGene2.htm#table3</meta:uri>
        </meta:neuronDBref>

        <parameters>
            <parameter name="shift" value ="-10"/> <!-- Will be overwritten when placed on cell-->
        </parameters>

        <current_voltage_relation cond_law="ohmic" ion="k" default_gmax="1.79811" default_erev="-90">

            <conc_dependence name="Calcium" ion="ca" charge="2" variable_name="ca_conc" min_conc="7.5e-13" max_conc="0.050e-6"/>

            <q10_settings fixed_q10="5" experimental_temp="37"/> <!-- Note channel should only be used at 37 deg C!-->

            <gate name="m" instances="1">
                <closed_state id="m0"/>
                <open_state id="m"/>

                <transition name="alpha" from="m0" to="m" expr_form="generic" expr="2.5/(1 + ( (1e-6 * 1.5e-3 *(exp (-0.085* (v+shift)))) / ca_conc ))" />
                <transition name="beta" from="m" to="m0" expr_form="generic" expr="1.5/(1 + (ca_conc / (1e-6 * (1.5e-4 * (exp (-0.077*(v+shift)))))))" />

            </gate>
        </current_voltage_relation>

    </channel_type>
</channelml>
