<?xml version="1.0" encoding="UTF-8"?>
<channelml xmlns="http://morphml.org/channelml/schema"
           xmlns:xsi="http://www.w3.org/2001/XMLSchema-instance"
           xmlns:meta="http://morphml.org/metadata/schema"
           xsi:schemaLocation="http://morphml.org/channelml/schema   ../../../../templates/xmlTemplates/Schemata/v1.6/Level2/ChannelML_v1.6.xsd"
           units="Physiological Units">

    <meta:notes>A channel from D'Angelo et al 2001</meta:notes>

    <ion name="k" charge="1" default_erev="-84.7">
      <meta:notes>Using rev pot from D'Angelo et al 2001</meta:notes>
    </ion>

    <channel_type name="Ksl" density="yes">

        <status value="in_progress">
            <meta:comment>Verified equivalence of NEURON and GENESIS mapping to orig NEURON mod impl at 0.02ms dt with current pulse</meta:comment>
            <meta:issue>Comment in original mod: Special infinity values have still to be implemented</meta:issue>
            <meta:contributor>
                <meta:name>Padraig Gleeson</meta:name>
            </meta:contributor>
        </status>

        <meta:notes>Slow K+ current, taken from D'Angelo et al 2001</meta:notes>

        <meta:authorList>
            <meta:modelTranslator>
                <meta:name>Padraig Gleeson</meta:name>
                <meta:institution>UCL</meta:institution>
                <meta:email>p.gleeson - at - ucl.ac.uk</meta:email>
            </meta:modelTranslator>
        </meta:authorList>

        <meta:publication>
          <meta:fullTitle>Paola Rossi, Giovanna De Filippi, Simona Armano, Vanni Taglietti, and Egidio D'Angelo.
            The weaver Mutation Causes a Loss of Inward Rectifier Current Regulation in Premigratory Granule Cells of the Mouse Cerebellum
            J. Neurosci. 18: 3537-3547, 2001</meta:fullTitle>
          <meta:pubmedRef>http://www.ncbi.nlm.nih.gov/sites/entrez?cmd=retrieve&amp;db=pubmed&amp;list_uids=9570785&amp;dopt=Abstract</meta:pubmedRef>
        </meta:publication>

        <meta:publication>
          <meta:fullTitle>D'Angelo E, Nieus T, Maffei A, Armano S, Rossi P, Taglietti V, Fontana A, Naldi G.
            Theta-frequency bursting and resonance in cerebellar granule cells: experimental evidence and modeling of a slow k+-dependent mechanism.
            J Neurosci. 2001 Feb 1;21(3):759-70.</meta:fullTitle>
          <meta:pubmedRef>http://www.ncbi.nlm.nih.gov/sites/entrez?cmd=retrieve&amp;db=pubmed&amp;list_uids=11157062&amp;dopt=Abstract</meta:pubmedRef>
        </meta:publication>

        <meta:neuronDBref>
            <meta:modelName>K channels</meta:modelName>
            <meta:uri>http://senselab.med.yale.edu/senselab/NeuronDB/channelGene2.htm#table3</meta:uri>
        </meta:neuronDBref>

        <current_voltage_relation>
            <ohmic ion="k">
                <conductance default_gmax="0.35">
                    <gate power="1">
                        <state name="m" fraction="1"/>
                    </gate>
                </conductance>
            </ohmic>
        </current_voltage_relation>

        <hh_gate state="m">
          <transition>
            <voltage_gate>
              <alpha>
                <parameterised_hh type="exponential">
                  <parameter name="A" value="0.008"/>
                  <parameter name="k" value="0.025"/>
                  <parameter name="d" value="-30"/>
                </parameterised_hh>
              </alpha>
              <beta>
                <parameterised_hh type="exponential">
                  <parameter name="A" value="0.008"/>
                  <parameter name="k" value="-0.05"/>
                  <parameter name="d" value="-30"/>
                </parameterised_hh>
              </beta>
              <inf>
                <parameterised_hh type="sigmoid">
                  <parameter name="A" value="1"/>
                  <parameter name="k" value="-0.16666667"/>
                  <parameter name="d" value="-30"/>
                </parameterised_hh>
              </inf>
            </voltage_gate>
            </transition>
          </hh_gate>

          <impl_prefs>
            <comment>Note, Using same table_divisions to get a closer match</comment>
            <table_settings max_v="100" min_v="-100" table_divisions="200"/>
          </impl_prefs>

    </channel_type>
</channelml>
