<?xml version="1.0" encoding="UTF-8"?>
<channelml xmlns="http://morphml.org/channelml/schema"
           xmlns:xsi="http://www.w3.org/2001/XMLSchema-instance"
           xmlns:meta="http://morphml.org/metadata/schema"
           xsi:schemaLocation="http://morphml.org/channelml/schema   ../../../../templates/xmlTemplates/Schemata/v1.6/Level2/ChannelML_v1.6.xsd"
           units="Physiological Units">

    <meta:notes>A channel originally from Berends et al 2005</meta:notes>

    <ion name="na" charge="1" default_erev="87.4"/>

    <channel_type name="NaP" density="yes">

      <status value="in_progress">
            <meta:comment>GENESIS issues??????????? Verified equivalence of NEURON and GENESIS mapping to orig NEURON mod impl at 0.02ms dt with current pulse</meta:comment>
            <meta:issue>Comment in orig mod file: Special infinity values still to be implemented</meta:issue>
            <meta:contributor>
                <meta:name>Padraig Gleeson</meta:name>
            </meta:contributor>
        </status>

        <meta:notes>Persistent Na current, described in D'Angelo 2001, implemented in Berends et al 2005</meta:notes>

        <meta:authorList>
          <meta:modelTranslator>
            <meta:name>Padraig Gleeson</meta:name>
            <meta:institution>UCL</meta:institution>
            <meta:email>p.gleeson - at - ucl.ac.uk</meta:email>
          </meta:modelTranslator>
        </meta:authorList>

        <meta:publication>
            <meta:fullTitle>Berends, Michiel, Maex, Reinoud, De Schutter, Erik.
            The Effect of NMDA Receptors on Gain Modulation.
            Neural Comp. 2005 17: 2531-2547</meta:fullTitle>
          <meta:pubmedRef>http://www.ncbi.nlm.nih.gov/entrez/query.fcgi?cmd=Retrieve&amp;db=PubMed&amp;list_uids=16212761&amp;dopt=Abstract</meta:pubmedRef>
        </meta:publication>

        <meta:publication>
          <meta:fullTitle>D'Angelo E, Nieus T, Maffei A, Armano S, Rossi P, Taglietti V, Fontana A, Naldi G.
            Theta-frequency bursting and resonance in cerebellar granule cells: experimental evidence and modeling of a slow k+-dependent mechanism.
            J Neurosci. 2001 Feb 1;21(3):759-70.</meta:fullTitle>
          <meta:pubmedRef>http://www.ncbi.nlm.nih.gov/sites/entrez?cmd=retrieve&amp;db=pubmed&amp;list_uids=11157062&amp;dopt=Abstract</meta:pubmedRef>
        </meta:publication>

        <meta:neuronDBref>
            <meta:modelName>Na channels</meta:modelName>
            <meta:uri>http://senselab.med.yale.edu/senselab/NeuronDB/channelGene2.htm#table2</meta:uri>
        </meta:neuronDBref>

        <current_voltage_relation>
            <ohmic ion="na">
                <conductance default_gmax="0.02">
                    <rate_adjustments>

                        <q10_settings fixed_q10="1" experimental_temp="37"/> <!-- Note channel should only be used at 37 deg C!-->

                    </rate_adjustments>
                    <gate power="1">
                        <state name="m" fraction="1"/>
                    </gate>
                </conductance>
            </ohmic>
        </current_voltage_relation>

        <hh_gate state="m">
            <transition>
                <voltage_gate>

                    <alpha>
                        <parameterised_hh type="linoid">
                        <parameter name="A" value="0.455"/>
                        <parameter name="k" value="0.2"/>
                        <parameter name="d" value="-42"/>
                        </parameterised_hh>
                    </alpha>

                    <beta>
                        <parameterised_hh type="linoid">
                        <parameter name="A" value="0.31"/>
                        <parameter name="k" value="-0.2"/>
                        <parameter name="d" value="-42"/>
                        </parameterised_hh>
                    </beta>

                    <tau>
                        <generic_equation_hh expr="5/(alpha + beta)"/>
                    </tau>

                    <inf>
                        <parameterised_hh type="sigmoid">
                        <parameter name="A" value="1"/>
                        <parameter name="k" value="-0.2"/>
                        <parameter name="d" value="-42"/>
                        </parameterised_hh>
                    </inf>

                </voltage_gate>
            </transition>
        </hh_gate>

    </channel_type>
</channelml>
