<?xml version="1.0" encoding="UTF-8"?>
<channelml xmlns="http://morphml.org/channelml/schema"
    xmlns:xsi="http://www.w3.org/2001/XMLSchema-instance"
    xmlns:meta="http://morphml.org/metadata/schema"
    xsi:schemaLocation="http://morphml.org/channelml/schema  ../../../../templates/xmlTemplates/Schemata/v1.6/Level2/ChannelML_v1.6.xsd"
    units="Physiological Units">

    <meta:notes>ChannelML file containing a single Channel description, based on the model described in: Mainen et al. 1995</meta:notes>

    <ion name="na" charge="1" default_erev="60"/>

    <channel_type name="Na_ChannelML" density="yes">

        <status value="stable">
            <meta:contributor>
                <meta:name>Padraig Gleeson</meta:name>
            </meta:contributor>
        </status>

		<meta:notes>Fast Na channel as used in Mainen ZF, Joerges J, Huguenard JR, Sejnowski TJ (1995)</meta:notes>

		<meta:publication>
			<meta:fullTitle>Mainen ZF, Joerges J, Huguenard JR, Sejnowski TJ (1995) A model of spike initiation in
				neocortical pyramidal neurons. Neuron 15:1427-39</meta:fullTitle>
			<meta:pubmedRef>http://www.ncbi.nlm.nih.gov/entrez/query.fcgi?db=pubmed&amp;cmd=Retrieve&amp;dopt=AbstractPlus&amp;list_uids=8845165</meta:pubmedRef>
        </meta:publication>

        <current_voltage_relation>
            <ohmic ion="na">
                <conductance default_gmax="3">
                    <rate_adjustments>
                        <q10_settings q10_factor="2.3" experimental_temp="23"/>
                    </rate_adjustments>
                    <gate power="3">
                        <state name="m" fraction="1"/>
                    </gate>
                    <gate power="1">
                        <state name="h" fraction="1"/>
                    </gate>
                </conductance>
            </ohmic>
        </current_voltage_relation>

        <hh_gate state="m">
           <transition>
                <voltage_gate>
                    <alpha>
                        <parameterised_hh type="linoid" expr="A*(k*v-d)/(1 - exp(-(k*v-d)))">
                            <parameter name="A" value="1.638"/>
                            <parameter name="k" value="0.1111111"/>
                            <parameter name="d" value="-35"/>
                        </parameterised_hh>
                    </alpha>
                    <beta>
                        <parameterised_hh type="linoid" expr="A*(k*v-d)/(1 - exp(-(k*v-d)))">
                            <parameter name="A" value="1.116"/>
                            <parameter name="k" value="-0.1111111111"/>
                            <parameter name="d" value="-35"/>
                        </parameterised_hh>
                    </beta>
                </voltage_gate>
            </transition>
            </hh_gate>

        <hh_gate state="h">
            <transition>
                <voltage_gate>
                   <alpha>
                        <parameterised_hh type="linoid" expr="A*(k*v-d)/(1 - exp(-(k*v-d)))">
                            <parameter name="A" value="0.12"/>
                            <parameter name="k" value="0.2"/>
                            <parameter name="d" value="-50"/>
                        </parameterised_hh>
                    </alpha>
                    <beta>
                        <parameterised_hh type="linoid" expr="A*(k*v-d)/(1 - exp(-(k*v-d)))">
                            <parameter name="A" value="0.0455"/>
                            <parameter name="k" value="-0.2"/>
                            <parameter name="d" value="-75"/>
                        </parameterised_hh>
                    </beta>
                    <inf>
                        <parameterised_hh type="sigmoid" expr="A/(1 + exp(-k*(d-v)))">
                            <parameter name="A" value="1"/>
                            <parameter name="k" value="0.161290323"/>
                            <parameter name="d" value="-65"/>
                        </parameterised_hh>
                    </inf>
                </voltage_gate>
        </transition>
            </hh_gate>

    </channel_type>
</channelml>
