<?xml version="1.0" encoding="UTF-8"?>
<neuroml xmlns="http://morphml.org/neuroml/schema" xmlns:meta="http://morphml.org/metadata/schema" xmlns:mml="http://morphml.org/morphml/schema" xmlns:bio="http://morphml.org/biophysics/schema" xmlns:cml="http://morphml.org/channelml/schema" xmlns:xsi="http://www.w3.org/2001/XMLSchema-instance" xsi:schemaLocation="http://morphml.org/neuroml/schema  NeuroML.xsd" lengthUnits="micron">
<meta:notes>This Level 2 NeuroML file (specification version 1.7.1) has been generated by neuroConstruct v1.0.7</meta:notes>
<cells>
    <cell name="HIPPCell">
        <meta:notes>HIPP cell from Santhakumar V, Aradi I, Soltesz I. Role of mossy fiber sprouting and mossy cell loss in hyperexcitability: a network model of the dentate gyrus incorporating cell types and axonal topography. J Neurophysiol. 2005  </meta:notes>
        <mml:segments>
            <mml:segment id="0" name="soma" cable="0">
                <mml:proximal x="0.0" y="0.0" z="0.0" diameter="10.0"/>
                    <mml:distal x="20.0" y="0.0" z="0.0" diameter="10.0"/>
                </mml:segment>
            <mml:segment id="1" name="hcdend1_0_seg" parent="0" cable="1">
                <mml:proximal x="20.0" y="0.0" z="0.0" diameter="3.0"/>
                    <mml:distal x="89.079575" y="-29.206377" z="0.0" diameter="3.0"/>
                </mml:segment>
            <mml:segment id="2" name="hcdend1_1_seg" parent="1" cable="2">
                <mml:proximal x="89.079575" y="-29.206377" z="0.0" diameter="2.0"/>
                    <mml:distal x="158.15915" y="-58.412754" z="0.0" diameter="2.0"/>
                </mml:segment>
            <mml:segment id="3" name="hcdend1_2_seg" parent="2" cable="3">
                <mml:proximal x="158.15915" y="-58.412754" z="0.0" diameter="1.0"/>
                    <mml:distal x="227.23872" y="-87.61913" z="0.0" diameter="1.0"/>
                </mml:segment>
            <mml:segment id="4" name="hcdend2_0_seg" parent="0" cable="4">
                <mml:proximal x="0.0" y="0.0" z="0.0" diameter="3.0"/>
                    <mml:distal x="-69.079575" y="-29.206377" z="0.0" diameter="3.0"/>
                </mml:segment>
            <mml:segment id="5" name="hcdend2_1_seg" parent="4" cable="5">
                <mml:proximal x="-69.079575" y="-29.206377" z="0.0" diameter="2.0"/>
                    <mml:distal x="-138.15915" y="-58.412754" z="0.0" diameter="2.0"/>
                </mml:segment>
            <mml:segment id="6" name="hcdend2_2_seg" parent="5" cable="6">
                <mml:proximal x="-138.15915" y="-58.412754" z="0.0" diameter="1.0"/>
                    <mml:distal x="-207.23872" y="-87.61913" z="0.0" diameter="1.0"/>
                </mml:segment>
            <mml:segment id="7" name="hcdend3_0_seg" parent="0" cable="7">
                <mml:proximal x="20.0" y="0.0" z="0.0" diameter="3.0"/>
                    <mml:distal x="66.05305" y="19.470926" z="0.0" diameter="3.0"/>
                </mml:segment>
            <mml:segment id="8" name="hcdend3_1_seg" parent="7" cable="8">
                <mml:proximal x="66.05305" y="19.470926" z="0.0" diameter="2.0"/>
                    <mml:distal x="112.106094" y="38.941853" z="0.0" diameter="2.0"/>
                </mml:segment>
            <mml:segment id="9" name="hcdend3_2_seg" parent="8" cable="9">
                <mml:proximal x="112.106094" y="38.941853" z="0.0" diameter="1.0"/>
                    <mml:distal x="158.15915" y="58.41278" z="0.0" diameter="1.0"/>
                </mml:segment>
            <mml:segment id="10" name="hcdend4_0_seg" parent="0" cable="10">
                <mml:proximal x="0.0" y="0.0" z="0.0" diameter="3.0"/>
                    <mml:distal x="-46.053047" y="19.470926" z="0.0" diameter="3.0"/>
                </mml:segment>
            <mml:segment id="11" name="hcdend4_1_seg" parent="10" cable="11">
                <mml:proximal x="-46.053047" y="19.470926" z="0.0" diameter="2.0"/>
                    <mml:distal x="-92.106094" y="38.941853" z="0.0" diameter="2.0"/>
                </mml:segment>
            <mml:segment id="12" name="hcdend4_2_seg" parent="11" cable="12">
                <mml:proximal x="-92.106094" y="38.941853" z="0.0" diameter="1.0"/>
                    <mml:distal x="-138.15915" y="58.41278" z="0.0" diameter="1.0"/>
                </mml:segment>
        </mml:segments>
        <mml:cables>
            <mml:cable id="0" name="soma">
                <meta:group>all</meta:group>
                <meta:group>soma_group</meta:group>
            </mml:cable>
            <mml:cable id="1" name="hcdend1_0">
                <meta:group>all</meta:group>
                <meta:group>dendrite_group</meta:group>
                <meta:group>pdend</meta:group>
            </mml:cable>
            <mml:cable id="2" name="hcdend1_1">
                <meta:group>all</meta:group>
                <meta:group>dendrite_group</meta:group>
                <meta:group>ddend</meta:group>
                <meta:group>mdend</meta:group>
            </mml:cable>
            <mml:cable id="3" name="hcdend1_2">
                <meta:group>all</meta:group>
                <meta:group>dendrite_group</meta:group>
                <meta:group>ddend</meta:group>
            </mml:cable>
            <mml:cable id="4" name="hcdend2_0" fractAlongParent="0.0">
                <meta:group>all</meta:group>
                <meta:group>dendrite_group</meta:group>
                <meta:group>pdend</meta:group>
            </mml:cable>
            <mml:cable id="5" name="hcdend2_1">
                <meta:group>all</meta:group>
                <meta:group>dendrite_group</meta:group>
                <meta:group>ddend</meta:group>
                <meta:group>mdend</meta:group>
            </mml:cable>
            <mml:cable id="6" name="hcdend2_2">
                <meta:group>all</meta:group>
                <meta:group>dendrite_group</meta:group>
                <meta:group>ddend</meta:group>
            </mml:cable>
            <mml:cable id="7" name="hcdend3_0">
                <meta:group>all</meta:group>
                <meta:group>dendrite_group</meta:group>
                <meta:group>pdend</meta:group>
            </mml:cable>
            <mml:cable id="8" name="hcdend3_1">
                <meta:group>all</meta:group>
                <meta:group>dendrite_group</meta:group>
                <meta:group>ddend</meta:group>
                <meta:group>mdend</meta:group>
            </mml:cable>
            <mml:cable id="9" name="hcdend3_2">
                <meta:group>all</meta:group>
                <meta:group>dendrite_group</meta:group>
                <meta:group>ddend</meta:group>
            </mml:cable>
            <mml:cable id="10" name="hcdend4_0" fractAlongParent="0.0">
                <meta:group>all</meta:group>
                <meta:group>dendrite_group</meta:group>
                <meta:group>pdend</meta:group>
            </mml:cable>
            <mml:cable id="11" name="hcdend4_1">
                <meta:group>all</meta:group>
                <meta:group>dendrite_group</meta:group>
                <meta:group>ddend</meta:group>
                <meta:group>mdend</meta:group>
            </mml:cable>
            <mml:cable id="12" name="hcdend4_2">
                <meta:group>all</meta:group>
                <meta:group>dendrite_group</meta:group>
                <meta:group>ddend</meta:group>
            </mml:cable>
        </mml:cables>
        <!--Adding the biophysical parameters-->
        <biophysics units="Physiological Units">
            <bio:mechanism name="Nat_CML" type="Channel Mechanism">
                <bio:parameter name="gmax" value="200.0">
                    <bio:group>pdend</bio:group>
                    <bio:group>soma_group</bio:group>
                </bio:parameter>
            </bio:mechanism>
            <bio:mechanism name="lca" type="Channel Mechanism">
                <bio:parameter name="gmax" value="1.5">
                    <bio:group>all</bio:group>
                </bio:parameter>
            </bio:mechanism>
            <bio:mechanism name="gskch" type="Channel Mechanism">
                <bio:parameter name="gmax" value="3.0">
                    <bio:group>all</bio:group>
                </bio:parameter>
            </bio:mechanism>
            <bio:mechanism name="NCa_CML" type="Channel Mechanism">
                <bio:parameter name="gmax" value="0.0">
                    <bio:group>all</bio:group>
                </bio:parameter>
            </bio:mechanism>
            <bio:mechanism name="hyperde3" type="Channel Mechanism">
                <bio:parameter name="gmax" value="0.015">
                    <bio:group>all</bio:group>
                </bio:parameter>
            </bio:mechanism>
            <bio:mechanism name="Kf_CML" type="Channel Mechanism">
                <bio:parameter name="gmax" value="6.0">
                    <bio:group>pdend</bio:group>
                    <bio:group>soma_group</bio:group>
                </bio:parameter>
            </bio:mechanism>
            <bio:mechanism name="borgka" type="Channel Mechanism">
                <bio:parameter name="gmax" value="0.8">
                    <bio:group>all</bio:group>
                </bio:parameter>
            </bio:mechanism>
            <bio:mechanism name="ccanl" type="Channel Mechanism">
                <bio:parameter name="gmax" value="100000.0">
                    <bio:group>all</bio:group>
                </bio:parameter>
            </bio:mechanism>
            <bio:mechanism name="HIPPLeakCond" type="Channel Mechanism">
                <bio:parameter name="gmax" value="0.036">
                    <bio:group>all</bio:group>
                </bio:parameter>
            </bio:mechanism>
            <bio:mechanism name="Kf_CML" type="Channel Mechanism">
                <bio:parameter name="gmax" value="0.0">
                    <bio:group>ddend</bio:group>
                </bio:parameter>
            </bio:mechanism>
            <bio:mechanism name="cagk" type="Channel Mechanism">
                <bio:parameter name="gmax" value="3.0">
                    <bio:group>all</bio:group>
                </bio:parameter>
            </bio:mechanism>
            <bio:mechanism name="Nat_CML" type="Channel Mechanism">
                <bio:parameter name="gmax" value="0.0">
                    <bio:group>ddend</bio:group>
                </bio:parameter>
            </bio:mechanism>
            <bio:specificCapacitance>
                <bio:parameter value="1.1">
                    <bio:group>all</bio:group>
                </bio:parameter>
            </bio:specificCapacitance>
            <bio:specificAxialResistance>
                <bio:parameter value="0.1">
                    <bio:group>all</bio:group>
                </bio:parameter>
            </bio:specificAxialResistance>
            <bio:initialMembPotential>
                <bio:parameter value="-70.0">
                    <bio:group>all</bio:group>
                </bio:parameter>
            </bio:initialMembPotential>
        </biophysics>
    </cell>
</cells></neuroml>
